# methyl ethyl ketone production

Dataset: EcoSpold 2, unit process
Geography: RoW
Time period: 2000-01-01 to 2022-12-31
Technology level: current
Classification: ISIC rev.4 ecoinvent: 2011:Manufacture of basic chemicals
Synonyms: Butan-2-one; Ethyl methyl ketone; Methylethyl ketone; Butanone; 2-Butanone; METHYL ETHYL KETONE
Scenario: Business-as-Usual
System model: Allocation, cut-off by classification
Generated by: Roland Hischier
Published in: Althaus H.-J. 2007
Database: ecoinvent
isCopyrightProtected: true
accessRestrictedTo: 1

## General comment
This dataset represents the production of 1 kg of liquid methyl ethyl ketone (MEK). MEK is at room temperature a colourless liquid with an odour close to that of acetone. It is primarily used as a solvent, and to a small extent as a chemical feedstock.
This dataset is based on stoechiometric calculations and estimations based on data from a large chemical factory (Gendorf 2016).
References:
Althaus H.-J., Chudacoff M., Hischier R., Jungbluth N., Osses M. and Primas A. (2007) Life Cycle Inventories of Chemicals. ecoinvent report No. 8, v2.0. EMPA Dübendorf, Swiss Centre for Life Cycle Inventories, Dübendorf, CH.
Gendorf (2016) Umwelterklärung 2015, Werk Gendorf Industriepark, www.gendorf.de.

## Included activities start
From the reception of n-butene at the factory gate.

## Included activities end
This activity ends with 1 kg of methyl ethyl ketone at the factory gate. The dataset includes the input materials, energy uses, infrastructure and emissions.

## Geography
The data used has no specific geographical origin as it is based on stoechiometric calculations and estimations. It is assumed to be representative of the production processes in this geography. Some values are based on data from a large chemical factory located in Germany. These are assumed to be valid for this geography.

## Technology
About 92% of the worldwide production is produced out of n-butene by (i) hydration to sec-butyl alcohol and (ii) a dehydrogenation of this alcohol. The remaining part of MEK is produced by catalytical oxidation of liquid butane. In this dataset only the first mentioned production scheme is taken into account.
N-butenes are either hydrated by a catalytic two-step process or in a single-step process by direct addition of water. The second step – the dehydrogenation of sec-buthyl al-cohol – is a catalytic reaction, using usually copper, zinc or bronze as catalyst. The whole reaction takes place at a temperature of about 350 to 400°C. The different steps of the process chain are shown in the following figure. The yield of the system is between 90 and 95% - here a yield of 95% is assumed.
The overall reaction of the two steps – hydration of n-butene and dehydrogenation of sec-butyl alco-hols - can be summarized as:
n-C4H8 + H2O -> CH3COC2H5 + H2
References:
Hoell, D., Mensing, T., Roggenbuck, R., Sakuth, M., Sperlich, E., Urban, T., Neier, W. and Strehlke, G. 2009. 2-Butanone. Ullmann's Encyclopedia of Industrial Chemistry.

## Time period
Date of published literature. Some values are based on data published by the Gendorf factory that were collected between 2011 and 2015. The time period has been adjusted accordingly. For more details, see the comments of the exchanges.

## Reference product
- methyl ethyl ketone: 1 kg; By-product classification allocatable product; CPC 34170: Ethers, alcohol peroxides, ether peroxides, epoxides, acetals and hemiacetals, and their halogenated, sulphona[…]
  production volume 4.8125e8 kg
  properties: carbon allocation 0.666667 kg, carbon content 0.666667, carbon content, fossil 0.666667, carbon content, non-fossil 0, dry mass 1 kg, heating value, net 33.63 MJ, price 0.634 EUR2005, water content 0, water in wet mass 0 kg, wet mass 1 kg

## Inputs from technosphere
- butene, mixed: 0.817 kg; lognormal variance with pedigree 0.1786, pedigree (4,5,5,5,5)
  properties: carbon content, fossil 0.857143, dry mass 1 kg, heating value, net 45.3 MJ, wet mass 1 kg
- chemical factory, organics: 4e-10 unit; lognormal variance with pedigree 0.3098, pedigree (2,3,2,4,3)
- electricity, medium voltage: 0.0295802, 0.0148452, 0.271401, 0.0044947, 0.000880897, 0.0947985 kWh (6 suppliers, which the file names only by identifier); sum of these 0.416 kWh; lognormal variance with pedigree 0.0104, pedigree (2,3,2,4,3)
- heat, district or industrial, natural gas: 2.11524, 0.0347588 MJ (2 suppliers, which the file names only by identifier); sum of these 2.15 MJ; lognormal variance with pedigree 0.0104, pedigree (2,3,2,4,3)
  properties: heating value, net 1 MJ
- heat, from steam, in chemical industry: 0.2 MJ; lognormal variance with pedigree 0.0104, pedigree (2,3,2,4,3)
  properties: heating value, net 1 MJ
- nitrogen, liquid: 0.019 kg; lognormal variance with pedigree 0.0104, pedigree (2,3,2,4,3)
  properties: dry mass 1 kg, wet mass 1 kg
- tap water: 0.00203022, 0.000150233, 0.0232328, 0.000404717, 4.8717e-5, 8.05128e-5, 5.28156e-5 kg (7 suppliers, which the file names only by identifier); sum of these 0.026 kg; lognormal variance with pedigree 0.0104, pedigree (2,3,2,4,3)
  properties: carbon content, fossil 0.00178991, dry mass 0.000337476 kg, water content 2962.17, wet mass 1 kg
- wastewater, average: -2.69042e-6, -9.57892e-9 m3 (2 suppliers, which the file names only by identifier); sum of these -2.7e-6 m3; lognormal variance with pedigree 0.0104, pedigree (2,3,1,4,3)
  properties: carbon content, non-fossil 0.194039, dry mass 0.346837 kg, water content 2882.2, wet mass 1000 kg

## Inputs from nature
- Water, cooling, unspecified natural origin [natural resource, in water]: 0.0164 m3; lognormal variance with pedigree 0.0104, pedigree (2,3,2,4,3)
- Water, river [natural resource, in water]: 0.00086 m3; lognormal variance with pedigree 0.0104, pedigree (2,3,2,4,3)
- Water, well, in ground [natural resource, in water]: 0.00083 m3; lognormal variance with pedigree 0.0104, pedigree (2,3,2,4,3)

## Emissions to nature
- Butene [air, urban air close to ground]: 0.00164 kg; lognormal variance with pedigree 0.33, pedigree (5,5,5,5,5)
- Carbon dioxide, fossil [air, urban air close to ground]: 0.111 kg; lognormal variance with pedigree 0.2, pedigree (5,5,5,5,4)
- Hydrogen [air, urban air close to ground]: 5.5e-5 kg; lognormal variance with pedigree 0.33, pedigree (5,5,5,5,5)
- Nitrogen [air, unspecified]: 0.019 kg; lognormal variance with pedigree 0.0104, pedigree (2,3,2,4,3)
- Water [air, unspecified]: 0.0014 m3; lognormal variance with pedigree 0.0104, pedigree (2,3,2,4,3)
- BOD5, Biological Oxygen Demand [water, unspecified]: 0.013467 kg; lognormal variance with pedigree 0.218, pedigree (4,5,5,5,5)
- Butene [water, surface water]: 0.00392 kg; lognormal variance with pedigree 0.51, pedigree (5,5,5,5,4)
- COD, Chemical Oxygen Demand [water, unspecified]: 0.013467 kg; lognormal variance with pedigree 0.218, pedigree (4,5,5,5,5)
- DOC, Dissolved Organic Carbon [water, unspecified]: 0.00323725 kg; lognormal variance with pedigree 0.218, pedigree (4,5,5,5,5)
- TOC, Total Organic Carbon [water, unspecified]: 0.00323725 kg; lognormal variance with pedigree 0.218, pedigree (4,5,5,5,5)
- Water [water, unspecified]: 0.0167 m3; lognormal variance with pedigree 0.0104, pedigree (2,3,2,4,3)

## Sampling procedure
Data estimated based on stoechiometric calculations. Some values are calculated based on data from a large chemical factory located in Germany. For more details, see the comments of the exchanges.

## Extrapolations
This dataset has been copied from an original dataset covering the geography RER. The uncertainty has been adjusted accordingly.

## Review by Gregor Wernet 2017-08-04
This dataset was additionally reviewed in a separate review process by Eric Johnson of Atlantic Consulting as well as Emilia Moreno Ruiz and Gregor Wernet of ecoinvent.
