# barite production

Dataset: EcoSpold 2, unit process
Geography: RoW
Time period: 1978-01-01 to 2022-12-31
Technology level: current
Classification: ISIC rev.4 ecoinvent: 0729:Mining of other non-ferrous metal ores
Synonyms: Barite; Barotrast; Baritop; Barium Sulfate; Barosperse
Scenario: Business-as-Usual
System model: Allocation, cut-off by classification
Generated by: Niels Jungbluth
Published in: Jungbluth, N. 2007
Database: ecoinvent
isCopyrightProtected: true
accessRestrictedTo: 1

## General comment
This dataset represents the production of 1 kg of barite. Barite is the mineralogical name for barium sulfate. Barite refers here to the first marketable product, which includes crude barite that usually has undergone simple beneficiation processes, such as jigging, tabling, and washing, or more complex processes, such as flotation, heavy-media separation, or magnetic separation. Most barite ores require some upgrading to minimum commercial purity or density levels.
Barite is primarily used as a weighting agent in oil and gas well drilling fluids or 'mud'.
The inventory is based on literature data and estimations.
References:
Jungbluth N. (2007) Erdöl. In: Sachbilanzen von Energiesystemen: Grundlagen für den ökologischen Vergleich von Energiesystemen und den Einbezug von Energiesystemen in Ökobilanzen für die Schweiz (ed. Dones R.). Swiss Centre for Life Cycle Inventories, Dübendorf, CH.
Bonel K. A., British Geological Survey (2005) Barytes

## Included activities start
From extraction of barite ore in the ground.

## Included activities end
This activity ends with the production of barite that has undergone beneficiation in order to be marketable. The dataset includes infrastructure use, energy consumption, water use and particle emissions. Land use is included in infrastructure, for which the infrastructure for a bentonite quarry has been used as a proxy.

## Geography
The data is based originally on a publication in the US.

## Technology
Barite is mined both in open pit and underground mines. About 60 to 120 kg of Barite can be yielded from one cubic meter of ore. The ore is transported via lorry (usually less than 5km) to a washing installation. Subsequently, it is separated from the water and grinded wet or dry. Between 65% and 85% of barite contained in the ore can be extracted. This dataset includes resource extraction and processing of the material.

## Time period
Time of publication.

## Parameters
- fraction, process water, to air: 0.205 dimensionless; name fraction_PW_to_air; lognormal variance with pedigree 0.092025, pedigree (4,4,3,2,4)
  Literature value (Statistics Canada, 2007 & Shaffer, K.H., 2008, Consumptive water use in the Great Lakes Basin, USGS) (Vionnet, S., Quantis Water Database - Technical Report, 2012).

## Reference product
- barite: 1 kg; By-product classification allocatable product; CPC 4160: Other non-ferrous metals and articles thereof (including waste and scrap of some metals); cermets and articles […]
  production volume 8.43165e9 kg
  properties: carbon allocation 0 kg, carbon content 0, carbon content, fossil 0, carbon content, non-fossil 0, dry mass 1 kg, price 0.127312 EUR2005, water content 0, water in wet mass 0 kg, wet mass 1 kg

## Inputs from technosphere
- bentonite quarry infrastructure: 5.78e-11 unit; lognormal variance with pedigree 0.1706, pedigree (5,5,5,5,5)
- diesel, burned in building machine: 0.0921 MJ; lognormal variance with pedigree 0.1786, pedigree (4,5,5,5,5)
  properties: heating value, net 1 MJ
- electricity, medium voltage: 1.21623e-5, 5.12506e-5, 2.57208e-5, 0.000470228, 7.78751e-6, 1.52624e-6, 0.000145324 kWh (7 suppliers, which the file names only by identifier); sum of these 0.000714 kWh; lognormal variance with pedigree 0.1786, pedigree (4,5,5,5,5)
- excavation, hydraulic digger: 0.0085 m3; lognormal variance with pedigree 0.1706, pedigree (5,5,5,5,5)
- heat, district or industrial, other than natural gas: 0.008189 MJ; lognormal variance with pedigree 0.1786, pedigree (4,5,5,5,5)
  properties: heating value, net 1 MJ
- transport, freight, lorry 16-32 metric ton, EURO5: 0.00724174, 0.00125826 metric ton*km (2 suppliers, which the file names only by identifier); sum of these 0.0085 metric ton*km; lognormal variance with pedigree 0.1786, pedigree (4,5,5,5,5)

## Inputs from nature
- Barium [natural resource, in ground]: 1.35 kg; lognormal variance with pedigree 0.0146, pedigree (4,4,5,5,1)
- Water, unspecified natural origin [natural resource, in water]: 0.14 m3; lognormal variance with pedigree 0.0146, pedigree (4,4,5,5,1)

## Emissions to nature
- Particulate Matter, > 10 um [air, non-urban air or from high stacks]: 0.00085 kg; lognormal variance with pedigree 0.024, pedigree (4,4,5,5,1)
- Water [air, unspecified]: 0.0287 m3; lognormal variance with pedigree 0.0427, pedigree (2,2,5,5,1)
- Water [water, unspecified]: 0.1113 m3; lognormal variance with pedigree 0.0427, pedigree (2,2,5,5,1)

## Sampling procedure
Literature and estimations.

## Extrapolations
This dataset has been copied from an original dataset covering the geography RER. The uncertainty has been adjusted accordingly.

## Review by Emilia Moreno Ruiz 2017-09-01
This dataset was additionally reviewed in a separate review process by Eric Johnson of Atlantic Consulting as well as Emilia Moreno Ruiz and Gregor Wernet of ecoinvent.
