# treatment of low level radioactive waste for final repository

Dataset: EcoSpold 2, unit process
Geography: RoW
Time period: 1985-01-01 to 2022-12-31
Technology level: current
Classification: ISIC rev.4 ecoinvent: 3822:Treatment and disposal of hazardous waste
Classification: EcoSpold01Categories: nuclear power/waste treatment
Synonyms: Low and intermediate level long-lived radioactive waste
Tags: ConvertedDataset; Treatment
Scenario: Business-as-Usual
System model: Allocation, cut-off by classification
Generated by: Roberto Dones
Published in: Dones, R. 2007
Database: ecoinvent
isCopyrightProtected: true
accessRestrictedTo: 1

## General comment
For operation is meant the input of the waste and the refilling of the tunnels. The waste volume includes always the container. The density of ILW is approximately 2.5 tonne per m3. The total electricity supplied from the grid has been estimated from information on the power and the duration of operations given for the early design of a Swiss LAW repository, adjusted to the new waste inventory. For the transport of the radioactive waste, an average distance of 100 km has been considered. The burdens associated with this repository are allocated to the total amount of radioactive waste, mostly produced by nuclear power plants, but also by medicine and industry.
[This dataset was already contained in the ecoinvent database version 2. It was not individually updated during the transfer to ecoinvent version 3. Life Cycle Impact Assessment results may still have changed, as they are affected by changes in the supply chain, i.e. in other datasets. This dataset was generated following the ecoinvent quality guidelines for version 2. It may have been subject to central changes described in the ecoinvent version 3 change report (http://www.ecoinvent.org/database/ecoinvent-version-3/reports-of-changes/), and the results of the central updates were reviewed extensively. The changes added e.g. consistent water flows and other information throughout the database. The documentation of this dataset can be found in the ecoinvent reports of version 2, which are still available via the ecoinvent website. The change report linked above covers all central changes that were made during the conversion process.]

## Included activities end
This module includes: concrete and energy requirements; transports of radioactive waste and concrete; infrastructure requirement; methan emissions to air; and, seepage water treatement. This describes the operation of a repository for intermediate and long-lived low radioactive waste in the Swiss context.

## Geography
Swiss conditions.

## Technology
Currently available knowledge.

## Parameters
- fraction, process water, to air: 0.15 dimensionless; name fraction_PW_to_air; lognormal variance with pedigree 0.092025, pedigree (4,4,3,2,4)
  Literature value. In case when no industry/process specific data are available, default evaporation fraction value is used. This value is 15% and is based on literature (Statistics Canada, 2007 & Shaffer, K.H., 2008, Consumptive water use in the Great Lakes Basin, USGS & Shiklomanov, 2003, World Water Resources at the Beginning of the 21st Century) and has been approved by an expert.
- fraction, tap water, to air: 0.15 dimensionless; lognormal variance with pedigree 0.092025, pedigree (4,4,3,2,4)

## Reference product
- low level radioactive waste for final repository: -1 m3; By-product classification Waste; CPC 33690: Other radioactive elements and isotopes and compounds; alloys, dispersions, ceramic products and mixtures cont[…]
  production volume 3.96633 m3
  properties: carbon allocation 0 kg, carbon content 0, carbon content, fossil 0, carbon content, non-fossil 0, dry mass 2500 kg, price 0 EUR2005, water content 0, water in wet mass 0 kg, wet mass 2500 kg

## Inputs from technosphere
- concrete, normal strength: 0.0198198, 0.00940455, 0.00179373, 0.0167192, 0.00134329, 0.00206519, 0.709029, 0.0398256 m3 (8 suppliers, which the file names only by identifier); sum of these 0.8 m3; lognormal variance with pedigree 0.122, pedigree (1,1,5,5,1)
  properties: dry mass 2190 kg, water content 0.086758, wet mass 2380 kg
- electricity, medium voltage: 15.1481, 22.2723, 11.1776, 204.35, 3.38426, 0.663267, 48.6267, 71.3781 kWh (8 suppliers, which the file names only by identifier); sum of these 377 kWh; lognormal variance with pedigree 0.122, pedigree (1,1,5,5,1)
- nuclear waste storage, final repository for low level radioactive waste: 1e-5 unit; lognormal variance with pedigree 0.002, pedigree (1,1,5,5,1)
- tap water: 0.126835, 0.00938562, 1.45144, 0.0252842, 0.00304354, 0.00502994, 1.08156, 0.00329959 kg (8 suppliers, which the file names only by identifier); sum of these 2.70588 kg; lognormal variance with pedigree 0.052625, pedigree (4,4,5,2,4)
  properties: carbon content, fossil 0.00178991, dry mass 0.000337476 kg, water content 2962.17, wet mass 1 kg
- wastewater, average: -0.00185084, -6.58969e-6, -0.000442573 m3 (3 suppliers, which the file names only by identifier); sum of these -0.0023 m3; lognormal variance with pedigree 0.122, pedigree (1,1,1,5,1)
  properties: carbon content, non-fossil 0.194039, dry mass 0.346837 kg, water content 2882.2, wet mass 1000 kg

## Inputs from nature
- Volume occupied, final repository for low-active radioactive waste [natural resource, in ground]: 1 m3; lognormal variance with pedigree 0.002, pedigree (1,1,5,5,1)

## Emissions to nature
- Water [air, unspecified]: 0.000405882 m3; lognormal variance with pedigree 0.092025, pedigree (4,4,5,2,4)

## Sampling procedure
Literature

## Extrapolations
none This dataset has been copied from an original dataset covering the geography CH. The uncertainty has been adjusted accordingly.

## Review by Roberto Dones 2004-04-02
Corrected for v1.1
