# acetone production, from isopropanol

Dataset: EcoSpold 2, unit process
Geography: RoW
Time period: 2015-01-01 to 2022-12-31
Technology level: current
Classification: ISIC rev.4 ecoinvent: 2011:Manufacture of basic chemicals
Synonyms: Dimethyl ketone; Acetone; Propanone; Dimethylformaldehyde; Methyl ketone; 2-propanone
Scenario: Business-as-Usual
System model: Allocation, cut-off by classification
Generated by: Lucia Valsasina
Database: ecoinvent
isCopyrightProtected: true
accessRestrictedTo: 1

## General comment
This activity represents the production of acetone from isopropanol. Acetone can be produced both by hydrogenation or oxidation of isopropanol with the aid of a catalyst. This process represents the hydrogenation of isopropanol with the aid of a copper catalyst. Acetone is mainly used as a solvent (Lokras et al. 1970 and Scharf et al. 1981). Global production of acetone is around 5.5 million metric tons (Gallardo Hipolito 2011).
Reference(s):
Gendorf (2016) Umwelterklärung 2015, Werk Gendorf Industriepark, www.gendorf.de
Gallardo Hipolito, M. 2011. Life Cycle Assessment of platform chemicals from fossil and lignocellulosic biomass scenarios LCA of phenolic compounds, solvent, soft and hard plastic precursors. Master in Industrial Ecology. Norwegian University of Science and Technology Department of Energy and Process Engineering. Retrieved from: http://daim.idi.ntnu.no/masteroppgaver/006/6362/tittelside.pdf, accessed 6 January 2017
Lokras et al. 1970 Catalytic Dehydrogenation Of 2-Propanol To Acetone. Ind. Eng. Chem. Process Des. Develop., Vol. 9, no. 2
Scharf et al. 1981 Process For The Production Of Acetone From Isobutyraldehyde. United States Patent 4,205,119
For more information on the model please refer to the dedicate ecoinvent report, access it in the Report section of ecoQuery (http://www.ecoinvent.org/login-databases.html)

## Included activities start
The activity starts when the raw materials enter the process.

## Included activities end
Materials entering the process are included as well as energy uses, infrastructure and emissions.

## Geography
The inputs to the process are calculated based on stoichiometry and literature data, they are therefore considered to be valid for the chosen geography. The inputs of heat, electricity, water, factory and nitrogen are mostly taken as average of industry data. Industry data values are a 5-year average of data (2011 - 2015) published by the Gendorf factory (Gendorf, 2016, Umwelterklärung, www.gendorf.de), (Gendorf, 2015, Umwelterklärung, www.gendorf.de), (Gendorf, 2014, Umwelterklärung, www.gendorf.de). The Gendorf factory is based in Germany, it produces a wide range of chemical substances. The factory produced 1657400 tonnes of chemical substances in the year 2015 (Gendorf, 2016, Umwelterklärung, www.gendorf.de) and 740000 tonnes of intermediate products. Given the range of chemicals produced by the german site, the values are used for the GLO geography, with uncertainty adjusted accordingly.

## Technology
The production of acetone from dehydrogenation of isopropanol is preferred as it as an endothermic reaction and requires less control of the critical temperature. Isopropanol is dehydrogenated to acetone with the aid of a copper catalyst (Lokras et al. 1970 and Scharf et al. 1981). Lokras et al. (1981) suggest the use of Cu-SiO2 as a catalyst. The copper catalyst in not consider significant in terms of emissions for the reaction and it is therefore not included in the dataset and it is assumed to be taken into consideration in the input of chemical factory.
Chemical reaction:
(CH3)2CHOH -> (CH3)2CO + H2
This inventory representing production of a particular chemical compound is at least partially based on a generic model on the production of chemicals. The data generated by this model have been improved by compound-specific data when available.
The model on production of chemicals is using specific industry or literature data wherever possible and more generic data on chemical production processes to fill compound-specific data gaps when necessary. The basic principles of the model have been published in literature (Hischier 2005, Establishing Life Cycle Inventories of Chemicals Based on Differing Data Availability). The model has been updated and extended with newly available data from the chemical industry.
In the model, unreacted fractions are treated in a waste treatment process, and emissions reported are after a waste treatment process that is included in the scope of this dataset. For volatile reactants, a small level of evaporation is assumed. Solvents and catalysts are mostly recycled in closed-loop systems within the scope of the dataset and reported flows are for losses from this system.
The main source of information for the values for heat, electricity, water (process and cooling), nitrogen, chemical factory is industry data from Gendorf. The values are a 5-year average of data (2011 - 2015) published by the Gendorf factory (Gendorf, 2016, Umwelterklärung, www.gendorf.de), (Gendorf, 2015, Umwelterklärung, www.gendorf.de), (Gendorf, 2014, Umwelterklärung, www.gendorf.de). The Gendorf factory is based in Germany, it produces a wide range of chemical substances. The factory produced 1657400 tonnes of chemical substances in the year 2015 (Gendorf, 2016, Umwelterklärung, www.gendorf.de) and 740000 tonnes of intermediate products.
Reference(s):
Hischier, R. (2005) Establishing Life Cycle Inventories of Chemicals Based on Differing Data Availability (9 pp). The International Journal of Life Cycle Assessment, Volume 10, Issue 1, pp 59–67. 10.1065/lca2004.10.181.7
Gendorf (2016) Umwelterklärung 2015, Werk Gendorf Industriepark, www.gendorf.de
Gallardo Hipolito, M. 2011. Life Cycle Assessment of platform chemicals from fossil and lignocellulosic biomass scenarios LCA of phenolic compounds, solvent, soft and hard plastic precursors. Master in Industrial Ecology. Norwegian University of Science and Technology Department of Energy and Process Engineering. Retrieved from: http://daim.idi.ntnu.no/masteroppgaver/006/6362/tittelside.pdf, accessed 6 January 2017
Lokras et al. 1970 Catalytic Dehydrogenation Of 2-Propanol To Acetone. Ind. Eng. Chem. Process Des. Develop., Vol. 9, no. 2
Scharf et al. 1981 Process For The Production Of Acetone From Isobutyraldehyde. United States Patent 4,205,119
For more information on the model please refer to the dedicate ecoinvent report, access it in the Report section of ecoQuery (http://www.ecoinvent.org/login-databases.html)

## Time period
The activity is based on stoichiometry and literature data, it is therefore considered not to change significantly over time in terms of inputs. The inputs of heat, electricity, water, factory and nitrogen are mostly taken as average of industry data. Industry data values are a 5-year average of data (2011 - 2015) published by the Gendorf factory (Gendorf, 2016, Umwelterklärung, www.gendorf.de), (Gendorf, 2015, Umwelterklärung, www.gendorf.de), (Gendorf, 2014, Umwelterklärung, www.gendorf.de). The Gendorf factory is based in Germany, it produces a wide range of chemical substances. The factory produced 1657400 tonnes of chemical substances in the year 2015 (Gendorf, 2016, Umwelterklärung, www.gendorf.de) and 740000 tonnes of intermediate products. The time period is therefore set based on the years from Gendorf reference.

## Reference product
- acetone, liquid: 1 kg; By-product classification allocatable product; CPC 34170: Ethers, alcohol peroxides, ether peroxides, epoxides, acetals and hemiacetals, and their halogenated, sulphona[…]
  production volume 2.85263e8 kg
  properties: carbon allocation 0.62069 kg, carbon content 0.62069, carbon content, fossil 0.62069, carbon content, non-fossil 0, dry mass 1 kg, heating value, net 31.32 MJ, price 0.437564 EUR2005, water content 0, water in wet mass 0 kg, wet mass 1 kg

## Inputs from technosphere
- chemical factory, organics: 4e-10 unit; lognormal variance with pedigree 0.3098, pedigree (2,3,2,4,3)
- electricity, medium voltage: 0.0295802, 0.0148452, 0.271401, 0.0044947, 0.000880897, 0.0947985 kWh (6 suppliers, which the file names only by identifier); sum of these 0.416 kWh; lognormal variance with pedigree 0.0104, pedigree (2,3,2,4,3)
- heat, district or industrial, natural gas: 2.11524, 0.0347588 MJ (2 suppliers, which the file names only by identifier); sum of these 2.15 MJ; lognormal variance with pedigree 0.0104, pedigree (2,3,2,4,3)
  properties: heating value, net 1 MJ
- heat, from steam, in chemical industry: 0.2 MJ; lognormal variance with pedigree 0.0104, pedigree (2,3,2,4,3)
  properties: heating value, net 1 MJ
- isopropanol: 1.0912 kg; lognormal variance with pedigree 0.0099, pedigree (2,3,2,3,3)
  properties: carbon content, fossil 0.6, dry mass 1 kg, heating value, net 34.3 MJ, wet mass 1 kg
- nitrogen, liquid: 0.019 kg; lognormal variance with pedigree 0.0104, pedigree (2,3,2,4,3)
  properties: dry mass 1 kg, wet mass 1 kg
- tap water: 0.00203022, 0.000150233, 0.0232328, 0.000404717, 4.8717e-5, 8.05128e-5, 5.28156e-5 kg (7 suppliers, which the file names only by identifier); sum of these 0.026 kg; lognormal variance with pedigree 0.0104, pedigree (2,3,2,4,3)
  properties: carbon content, fossil 0.00178991, dry mass 0.000337476 kg, water content 2962.17, wet mass 1 kg
- wastewater, average: -2.69042e-6, -9.57892e-9 m3 (2 suppliers, which the file names only by identifier); sum of these -2.7e-6 m3; lognormal variance with pedigree 0.0104, pedigree (2,3,1,4,3)
  properties: carbon content, non-fossil 0.194039, dry mass 0.346837 kg, water content 2882.2, wet mass 1000 kg

## Inputs from nature
- Water, cooling, unspecified natural origin [natural resource, in water]: 0.0164 m3; lognormal variance with pedigree 0.0104, pedigree (2,3,2,4,3)
- Water, river [natural resource, in water]: 0.00086 m3; lognormal variance with pedigree 0.0104, pedigree (2,3,2,4,3)
- Water, well, in ground [natural resource, in water]: 0.00083 m3; lognormal variance with pedigree 0.0104, pedigree (2,3,2,4,3)

## Emissions to nature
- 2-Propanol [air, unspecified]: 0.0407641 kg; lognormal variance with pedigree 0.0104, pedigree (2,3,2,4,3)
- Acetone [air, unspecified]: 0.00186633 kg; lognormal variance with pedigree 0.0104, pedigree (2,3,2,4,3)
- Carbon dioxide, fossil [air, unspecified]: 0.0287938 kg; lognormal variance with pedigree 0.0104, pedigree (2,3,2,4,3)
- Nitrogen [air, unspecified]: 0.019 kg; lognormal variance with pedigree 0.0104, pedigree (2,3,2,4,3)
- Water [air, unspecified]: 0.0014 m3; lognormal variance with pedigree 0.0104, pedigree (2,3,2,4,3)
- 2-Propanol [water, unspecified]: 0.000689794 kg; lognormal variance with pedigree 0.0104, pedigree (2,3,2,4,3)
- BOD5, Biological Oxygen Demand [water, unspecified]: 0.00158675 kg; lognormal variance with pedigree 0.218, pedigree (4,5,5,5,5)
- COD, Chemical Oxygen Demand [water, unspecified]: 0.00158675 kg; lognormal variance with pedigree 0.218, pedigree (4,5,5,5,5)
- DOC, Dissolved Organic Carbon [water, unspecified]: 0.000413216 kg; lognormal variance with pedigree 0.218, pedigree (4,5,5,5,5)
- TOC, Total Organic Carbon [water, unspecified]: 0.000413216 kg; lognormal variance with pedigree 0.218, pedigree (4,5,5,5,5)
- Water [water, unspecified]: 0.0167 m3; lognormal variance with pedigree 0.0104, pedigree (2,3,2,4,3)

## Sampling procedure
Literature data and stochiometric calculation.

## Extrapolations
This dataset is extrapolated from the european dataset. The uncertainty has been adjusted accordingly.

## Review by Emilia Moreno Ruiz 2017-08-10
This dataset was additionally reviewed in a separate review process by Eric Johnson of Atlantic Consulting as well as Emilia Moreno Ruiz and Gregor Wernet of ecoinvent.
