# hexamethylenediamine production

Dataset: EcoSpold 2, unit process
Geography: RoW
Time period: 2021-01-01 to 2022-12-31
Technology level: current
Classification: ISIC rev.4 ecoinvent: 2011:Manufacture of basic chemicals
Scenario: Business-as-Usual
System model: Allocation, cut-off by classification
Generated by: Daria Dellenbach
Database: ecoinvent
isCopyrightProtected: true
accessRestrictedTo: 1

## General comment
This dataset represents the production of 1 kg of hexamethylenediamine. Emissions are estimated. Energy consumptions, infrastructure and transports are calculated with standard values. A yield of 95% per chemical step was assumed.
Hexamethylenediamine is an organic substance with the CAS no.: 000124-09-4. It is called 'hexane-1,6-diamine' under IUPAC naming and its molecular formula is: C6H16N2. It is liquid or solid under normal conditions of temperature and pressure as a crystalline solid or viscous liquid with a characteristic ammonia odor. It is modelled as a pure substance. There are no publicly available information about the consumption of this substance on a consumer level. On industrial sites, the substance is used for the manufacture of products in the following sectors: chemicals, plastic products, rubber products and textile, leather or fur.
Reference(s):
Smiley, R. A. (2009), Hexamethylenediamine, Ullmann's Encyclopedia of Industrial Chemistry, Weinheim, Wiley-VCH.
Curtius, T.; Clemm, H. (1900): Synthese des 1,3-Diaminopropans und 1,6-Diaminohexans aus Glutarsäure resp. Korksäure (Synthesis of 1,3-diaminopropane and 1,6-diaminohexane from glutaric acid and suberic acid, respectively), Journal für praktische Chemie, 2nd series, 62, 189–211.
Chemiepark GENDORF, Umwelterklärung 2016, https://www.gendorf.de/Nachbarn/Umweltschutz/Industrie%20und%20Nachhaltigkeit
Chemiepark GENDORF, Umwelterklärung 2017, https://www.gendorf.de/Nachbarn/Umweltschutz/Industrie%20und%20Nachhaltigkeit
Chemiepark GENDORF, Umwelterklärung 2020, https://www.gendorf.de/Nachbarn/Umweltschutz/Industrie%20und%20Nachhaltigkeit
Hischier, R. (2005) Establishing Life Cycle Inventories of Chemicals Based on Differing Data Availability (9 pp). The International Journal of Life Cycle Assessment, Volume 10, Issue 1, pp 59–67. 10.1065/lca2004.10.181.7

## Included activities start
Cradle to gate. The activity starts when the raw materials enter the process.

## Included activities end
Production of hexamethylenediamine production including materials, energy uses, infrastructure and emissions.

## Technology
This dataset represents the production of 1 kg of hexamethylenediamine through hydrogenation of adiponitrile. Hexamethylenediamine is a colorless to yellow solid with a strong amine odor. Hexamethylenediamine is mainly used for producing polymers. A yield of 95% was assumed.
C6H8N2 + 4 H2 --> C6H16N2
References:
Smiley, R. A. (2009), Hexamethylenediamine, Ullmann's Encyclopedia of Industrial Chemistry, Weinheim, Wiley-VCH.
Curtius, T.; Clemm, H. (1900): Synthese des 1,3-Diaminopropans und 1,6-Diaminohexans aus Glutarsäure resp. Korksäure (Synthesis of 1,3-diaminopropane and 1,6-diaminohexane from glutaric acid and suberic acid, respectively), Journal für praktische Chemie, 2nd series, 62, 189–211.

## Reference product
- hexamethylenediamine: 1 kg; By-product classification allocatable product; CPC 34150: Amine-function compounds; oxygen-function amino-compounds, except lysine and its esters and salts thereof and […]
  production volume 2.9779e9 kg
  properties: carbon allocation 0.620147 kg, carbon content 0.620147, carbon content, fossil 0.620147, carbon content, non-fossil 0, dry mass 1 kg, price 3.47838 EUR2005, water content 0, water in wet mass 0 kg, wet mass 1 kg

## Inputs from technosphere
- adiponitrile: 0.984488 kg; lognormal variance with pedigree 0.0098, pedigree (2,5,2,1,2)
  properties: carbon content, fossil 0.666389, dry mass 1 kg, wet mass 1 kg
- chemical factory, organics: 4e-10 unit; lognormal variance with pedigree 0.3492, pedigree (2,5,2,4,4)
- compressed air, 1000 kPa gauge: 0.45216 m3; lognormal variance with pedigree 0.0498, pedigree (2,5,2,4,4)
- electricity, medium voltage: 0.0283756, 0.0142407, 0.260349, 0.00431167, 0.000845026, 0.0909382 kWh (6 suppliers, which the file names only by identifier); sum of these 0.39906 kWh; lognormal variance with pedigree 0.0498, pedigree (2,5,2,4,4)
- heat, district or industrial, natural gas: 1.856, 0.0304989 MJ (2 suppliers, which the file names only by identifier); sum of these 1.8865 MJ; lognormal variance with pedigree 0.0498, pedigree (2,5,2,4,4)
  properties: heating value, net 1 MJ
- heat, from steam, in chemical industry: 0.2078 MJ; lognormal variance with pedigree 0.0498, pedigree (2,5,2,4,4)
  properties: heating value, net 1 MJ
- hydrogen, liquid: 0.0184439 kg; lognormal variance with pedigree 0.0098, pedigree (2,5,2,1,2)
  properties: dry mass 1 kg, heating value, net 120.21 MJ, wet mass 1 kg
- nitrogen, liquid: 0.014812 kg; lognormal variance with pedigree 0.0498, pedigree (2,5,2,4,4)
  properties: dry mass 1 kg, wet mass 1 kg
- tap water: 0.00175692, 0.000130009, 0.0201053, 0.000350235, 4.21589e-5, 6.96746e-5, 4.57058e-5 kg (7 suppliers, which the file names only by identifier); sum of these 0.0225 kg; lognormal variance with pedigree 0.0498, pedigree (2,5,2,4,4)
  properties: carbon content, fossil 0.00178991, dry mass 0.000337476 kg, water content 2962.17, wet mass 1 kg
- wastewater, average: -2.26892e-6, -8.07823e-9 m3 (2 suppliers, which the file names only by identifier); sum of these -2.277e-6 m3; lognormal variance with pedigree 0.0498, pedigree (2,5,1,4,4)
  properties: carbon content, non-fossil 0.194039, dry mass 0.346837 kg, water content 2882.2, wet mass 1000 kg

## Inputs from nature
- Water, cooling, unspecified natural origin [natural resource, in water]: 0.014707 m3; lognormal variance with pedigree 0.0498, pedigree (2,5,2,4,4)
- Water, river [natural resource, in water]: 0.00096543 m3; lognormal variance with pedigree 0.0498, pedigree (2,5,2,4,4)
- Water, well, in ground [natural resource, in water]: 0.00081652 m3; lognormal variance with pedigree 0.0498, pedigree (2,5,2,4,4)

## Emissions to nature
- Carbon dioxide, fossil [air, unspecified]: 0.124978 kg; lognormal variance with pedigree 0.0098, pedigree (2,5,2,1,2)
- Hydrogen [air, unspecified]: 9.22197e-5 kg; lognormal variance with pedigree 0.0492, pedigree (2,5,2,1,2)
- Nitrogen [air, unspecified]: 0.014812 kg; lognormal variance with pedigree 0.0892, pedigree (2,5,2,4,4)
- Water [air, unspecified]: 0.00147 m3; lognormal variance with pedigree 0.0892, pedigree (2,5,2,4,4)
- BOD5, Biological Oxygen Demand [water, unspecified]: 0.0052846 kg; lognormal variance with pedigree 0.0492, pedigree (2,5,2,1,2)
- COD, Chemical Oxygen Demand [water, unspecified]: 0.0052846 kg; lognormal variance with pedigree 0.0492, pedigree (2,5,2,1,2)
- DOC, Dissolved Organic Carbon [water, unspecified]: 0.00179354 kg; lognormal variance with pedigree 0.0492, pedigree (2,5,2,1,2)
- TOC, Total Organic Carbon [water, unspecified]: 0.00179354 kg; lognormal variance with pedigree 0.0492, pedigree (2,5,2,1,2)
- Water [water, unspecified]: 0.01504 m3; lognormal variance with pedigree 0.0892, pedigree (2,5,2,4,4)

## Sampling procedure
Literature data and stoichiometric calculation. This inventory is partially based on a generic model of the production of chemicals. The data generated by this model have been improved with compound-specific data when available.
The model of the production of chemicals is using specific industry or literature data wherever possible and more generic data on chemical production processes to fill compound-specific data gaps when necessary. The basic principles of the model have been published in literature (Hischier, 2005). The model has been updated and extended with newly available data from the chemical industry.
In the model, unreacted fractions are treated in a waste treatment process, and emissions reported are after a waste treatment process that is included in the scope of this dataset. For volatile reactants, a small level of evaporation is assumed. Solvents and catalysts are mostly recycled in closed-loop systems within the scope of the dataset and reported flows are for losses from this system.
The main source of information for the values for heat, electricity, water (process and cooling), nitrogen, chemical factory is industry data from the GENDORF Chemical Park. The values are a 5-year average of data from 2015 to 2019 published by the GENDORF Chemical Park, which is based in Germany and produced an average of 2462760 tonnes of chemical substances in the years 2015-2019.

Reference(s):
Hischier, R. (2005) Establishing Life Cycle Inventories of Chemicals Based on Differing Data Availability (9 pp). The International Journal of Life Cycle Assessment, Volume 10, Issue 1, pp 59–67. 10.1065/lca2004.10.181.7
Chemiepark GENDORF, Umwelterklärung 2016, https://www.gendorf.de/Nachbarn/Umweltschutz/Industrie%20und%20Nachhaltigkeit
Chemiepark GENDORF, Umwelterklärung 2017, https://www.gendorf.de/Nachbarn/Umweltschutz/Industrie%20und%20Nachhaltigkeit
Chemiepark GENDORF, Umwelterklärung 2020, https://www.gendorf.de/Nachbarn/Umweltschutz/Industrie%20und%20Nachhaltigkeit
Smiley, R. A. (2009), Hexamethylenediamine, Ullmann's Encyclopedia of Industrial Chemistry, Weinheim, Wiley-VCH.
Curtius, T.; Clemm, H. (1900): Synthese des 1,3-Diaminopropans und 1,6-Diaminohexans aus Glutarsäure resp. Korksäure (Synthesis of 1,3-diaminopropane and 1,6-diaminohexane from glutaric acid and suberic acid, respectively), Journal für praktische Chemie, 2nd series, 62, 189–211.
