# heat production, wood pellet, at furnace 25kW, state-of-the-art 2014

Dataset: EcoSpold 2, unit process
Geography: RoW
Time period: 2014-01-01 to 2022-12-31
Technology level: modern
Classification: EcoSpold01Categories: wood energy/heating systems
Classification: ISIC rev.4 ecoinvent: 3530:Steam and air conditioning supply
Scenario: Business-as-Usual
System model: Allocation, cut-off by classification
Share of production covered: 0.1 %
Generated by: Christian Bauer
Published in: Bauer, C. 2007
Database: ecoinvent
isCopyrightProtected: true
accessRestrictedTo: 1

## General comment
Activity represents combustion of wood pellets in new (=installed in 2014) wood pellet furnaces in Switzerland in 2014. Only uncertainty factors were adjusted in order to provide a GLO activity. The inventory shall be considered valid for boilers with nominal capacities in the approximate range of 20 to 100 kW. The activity represents average annual operation including start/stop (warm up and cool down), which reduces the efficiency compared to rated values provided by boiler manufacturers and increases some emission factors such as CO. Air emission factors as well as other exchanges correspond to v2.2 except of PM, CO, NOx, NMVOC. These key emission factors were updated based on latest available information.
[This dataset was already contained in the ecoinvent database version 2. It was not individually updated during the transfer to ecoinvent version 3. Life Cycle Impact Assessment results may still have changed, as they are affected by changes in the supply chain, i.e. in other datasets. This dataset was generated following the ecoinvent quality guidelines for version 2. It may have been subject to central changes described in the ecoinvent version 3 change report (http://www.ecoinvent.org/database/ecoinvent-version-3/reports-of-changes/), and the results of the central updates were reviewed extensively. The changes added e.g. consistent water flows and other information throughout the database. The documentation of this dataset can be found in the ecoinvent reports of version 2, which are still available via the ecoinvent website. The change report linked above covers all central changes that were made during the conversion process.]

## Included activities start
From reception of wood pellets.

## Included activities end
This activity describes the combustion of wood pellets until heat production at the boiler outlet. Included are the infrastructure, the wood requirements (average pellets, u=10%), the emissions to air, the electricity needed for operation, and the disposal of the ashes.

## Geography
based on data from Switzerland

## Technology
Modern boiler technology installed in CH in 2014

## Time period
Some emission data are from the second half of the 1990´s. However, key emission factors (PM, CO, NOx, CH4 and NMVOC) are updated in 2014. Activity can be considered as representative for new installations until 2020.

## Parameters
- scaling factor: 1.25 dimensionless; name scaling_factor; = 1/0.8
  the scaling factor corresponds to the inverse of the annual use efficiency. This efficiency represents an average annual value including start/stop operation (warm-up and cool down), which reduces the efficiency compared to rated values of the manufacturer. Source: Thomas Nussbaumer, Verenum, January 2014, personal communication.

## Reference product
- heat, central or small-scale, other than natural gas: 1 MJ; By-product classification allocatable product; CPC 17300: Steam and hot water
  production volume 9.876e9 MJ
  properties: Corresponding fuel use 1.17647 MJ, carbon allocation 0 kg, carbon content 0, heating value, net 1 MJ, price 0.0106 EUR2005

## Inputs from technosphere
- electricity, low voltage: 0.000204903, 0.00100385, 0.000147543, 5.01043e-5, 0.000292396, 0.000695825, 0.00280877, 9.11167e-6 kWh (8 suppliers, which the file names only by identifier); sum of these 0.0052125 kWh; lognormal variance with pedigree 0.01, pedigree (1,1,4,1,1)
- furnace, pellets, 25kW: 3.47222e-7 unit; lognormal variance with pedigree 0.48, pedigree (2,2,5,5,4)
- wood ash mixture, pure: -0.000201069, -9.64313e-5 kg (2 suppliers, which the file names only by identifier); sum of these -0.0002975 kg
  properties: carbon content, non-fossil 0.012, dry mass 1 kg, wet mass 1 kg
- wood pellet, measured as dry mass: 0.0667062 kg; lognormal variance with pedigree 0, pedigree (1,1,4,1,1)
  properties: carbon content, non-fossil 0.494, dry mass 1 kg, heating value, net 13.38 MJ, water content 0.1, wet mass 1.1 kg

## Emissions to nature
- Acetaldehyde [air, urban air close to ground]: 7.625e-8 kg; lognormal variance with pedigree 0.48, pedigree (2,2,5,5,4)
- Ammonia [air, urban air close to ground]: 2.1625e-6 kg; lognormal variance with pedigree 0.432, pedigree (1,1,4,5,1)
- Arsenic ion [air, urban air close to ground]: 1.25e-9 kg; lognormal variance with pedigree 0.432, pedigree (1,1,4,5,1)
- Benzene [air, urban air close to ground]: 1.1375e-6 kg; lognormal variance with pedigree 0.432, pedigree (1,1,4,5,1)
- Benzene, ethyl- [air, urban air close to ground]: 3.75e-8 kg; lognormal variance with pedigree 0.432, pedigree (1,1,4,5,1)
- Benzene, hexachloro- [air, urban air close to ground]: 9e-15 kg; lognormal variance with pedigree 0.432, pedigree (1,1,4,5,1)
- Benzo(a)pyrene [air, urban air close to ground]: 6.25e-10 kg; lognormal variance with pedigree 0.432, pedigree (1,1,4,5,1)
- Bromine [air, urban air close to ground]: 7.5e-8 kg; lognormal variance with pedigree 0.432, pedigree (1,1,4,5,1)
- Cadmium II [air, urban air close to ground]: 8.75e-10 kg; lognormal variance with pedigree 0.432, pedigree (1,1,4,5,1)
- Calcium [air, urban air close to ground]: 7.3125e-6 kg; lognormal variance with pedigree 0.432, pedigree (1,1,4,5,1)
- Carbon dioxide, non-fossil [air, urban air close to ground]: 0.120625 kg; lognormal variance with pedigree 0.002, pedigree (1,1,4,5,1)
- Carbon monoxide, non-fossil [air, urban air close to ground]: 0.0001875 kg; lognormal variance with pedigree 0.073, pedigree (2,2,4,5,4)
- Chlorine [air, urban air close to ground]: 2.25e-7 kg; lognormal variance with pedigree 0.432, pedigree (1,1,4,5,1)
- Chromium III [air, urban air close to ground]: 4.95e-9 kg; lognormal variance with pedigree 0.432, pedigree (1,1,4,5,1)
- Chromium VI [air, urban air close to ground]: 5e-11 kg; lognormal variance with pedigree 0.482, pedigree (1,1,4,5,1)
- Copper ion [air, urban air close to ground]: 2.75e-8 kg; lognormal variance with pedigree 0.432, pedigree (1,1,4,5,1)
- Dinitrogen monoxide [air, urban air close to ground]: 3.125e-6 kg; lognormal variance with pedigree 0.432, pedigree (1,1,4,5,1)
- Dioxins, measured as 2,3,7,8-tetrachlorodibenzo-p-dioxin [air, urban air close to ground]: 3.875e-14 kg; lognormal variance with pedigree 0.432, pedigree (1,1,4,5,1)
- Fluorine [air, urban air close to ground]: 6.25e-8 kg; lognormal variance with pedigree 0.432, pedigree (1,1,4,5,1)
- Formaldehyde [air, urban air close to ground]: 1.625e-7 kg; lognormal variance with pedigree 0.432, pedigree (1,1,4,5,1)
- Hydrocarbons, aliphatic, alkanes, unspecified [air, urban air close to ground]: 1.1375e-6 kg; lognormal variance with pedigree 0.48, pedigree (2,2,5,5,4)
- Hydrocarbons, aliphatic, unsaturated [air, urban air close to ground]: 3.875e-6 kg; lognormal variance with pedigree 0.432, pedigree (1,1,4,5,1)
- Lead II [air, urban air close to ground]: 3.125e-8 kg; lognormal variance with pedigree 0.432, pedigree (1,1,4,5,1)
- Magnesium [air, urban air close to ground]: 4.5e-7 kg; lognormal variance with pedigree 0.432, pedigree (1,1,4,5,1)
- Manganese II [air, urban air close to ground]: 2.125e-7 kg; lognormal variance with pedigree 0.432, pedigree (1,1,4,5,1)
- Mercury II [air, urban air close to ground]: 3.75e-10 kg; lognormal variance with pedigree 0.432, pedigree (1,1,4,5,1)
- Methane, non-fossil [air, urban air close to ground]: 4.875e-6 kg; lognormal variance with pedigree 0.48, pedigree (2,2,5,5,4)
- NMVOC, non-methane volatile organic compounds [air, urban air close to ground]: 1.1375e-5 kg; lognormal variance with pedigree 0.073, pedigree (2,2,4,5,4)
- Nickel II [air, urban air close to ground]: 7.5e-9 kg; lognormal variance with pedigree 0.432, pedigree (1,1,4,5,1)
- Nitrogen oxides [air, urban air close to ground]: 7.5e-5 kg; lognormal variance with pedigree 0.073, pedigree (2,2,4,5,4)
- PAH, polycyclic aromatic hydrocarbons [air, urban air close to ground]: 1.3875e-8 kg; lognormal variance with pedigree 0.432, pedigree (1,1,4,5,1)
- Particulate Matter, < 2.5 um [air, urban air close to ground]: 3.375e-5 kg; lognormal variance with pedigree 0.073, pedigree (2,2,4,5,4)
- Particulate Matter, > 2.5 um and < 10um [air, urban air close to ground]: 1.875e-6 kg; lognormal variance with pedigree 0.073, pedigree (2,2,4,5,4)
- Phenol, pentachloro- [air, urban air close to ground]: 1.0125e-11 kg; lognormal variance with pedigree 0.432, pedigree (1,1,4,5,1)
- Phosphorus [air, urban air close to ground]: 3.75e-7 kg; lognormal variance with pedigree 0.432, pedigree (1,1,4,5,1)
- Potassium I [air, urban air close to ground]: 2.925e-5 kg; lognormal variance with pedigree 0.432, pedigree (1,1,4,5,1)
- Sodium [air, urban air close to ground]: 1.625e-6 kg; lognormal variance with pedigree 0.48, pedigree (2,2,5,5,4)
- Sulfur dioxide [air, urban air close to ground]: 3.125e-6 kg; lognormal variance with pedigree 0.432, pedigree (1,1,4,5,1)
- Toluene [air, urban air close to ground]: 3.75e-7 kg; lognormal variance with pedigree 0.432, pedigree (1,1,4,5,1)
- Water [air, urban air close to ground]: 6.67e-5 m3; lognormal variance with pedigree 0.0063, pedigree (2,2,4,1,2)
- Zinc II [air, urban air close to ground]: 3.75e-7 kg; lognormal variance with pedigree 0.432, pedigree (1,1,4,5,1)
- m-Xylene [air, urban air close to ground]: 1.5e-7 kg; lognormal variance with pedigree 0.48, pedigree (2,2,5,5,4)

## Sampling procedure
extrapolation

## Extrapolations
inventory data representative for Switzerland. Uncertainty factors adjusted accordingly
