# graphite production, battery grade

Dataset: EcoSpold 2, unit process
Geography: RoW
Time period: 2009-01-01 to 2022-12-31
Technology level: current
Classification: EcoSpold01Categories: chemicals/inorganics
Classification: ISIC rev.4 ecoinvent: 2011:Manufacture of basic chemicals
Tags: ConvertedDataset
Scenario: Business-as-Usual
System model: Allocation, cut-off by classification
Generated by: Dominic Notter
Published in: Hischier, R. 2009
Database: ecoinvent
isCopyrightProtected: true
accessRestrictedTo: 1

## General comment
The functional unit represent 1 kg of graphite battery grade. Large uncertainty of the process data due to weak data on the production process.
[This dataset was already contained in the ecoinvent database version 2. It was not individually updated during the transfer to ecoinvent version 3. Life Cycle Impact Assessment results may still have changed, as they are affected by changes in the supply chain, i.e. in other datasets. This dataset was generated following the ecoinvent quality guidelines for version 2. It may have been subject to central changes described in the ecoinvent version 3 change report (http://www.ecoinvent.org/database/ecoinvent-version-3/reports-of-changes/), and the results of the central updates were reviewed extensively. The changes added e.g. consistent water flows and other information throughout the database. The documentation of this dataset can be found in the ecoinvent reports of version 2, which are still available via the ecoinvent website. The change report linked above covers all central changes that were made during the conversion process.]

## Included activities end
Raw materials, machineries and energy consumption for production, estimated emissions to air from production and infrastructure of the site (approximation). No water emissions. The difference to the dataset "graphite, at plant" is the input of hard coal coke (40 MJ) and electicity (1 kWh).

## Geography
It is assumed that the original dataset (graphite, at plant) can be used for chinese production. Chinese electricity mix is used.

## Technology
Data approximated with data from lime mining, crushing and milling.
Battery grade: Modification: Battery grade graphite is much more energy intense than industrial graphite, that's why aditional inputs (coke and electricity) are added to the ecoinvent original graphite dataset.
Process: Coke is converted to graphite in an electricity-heated oven at 2'800°C according information from www.timcal.com, one of the leading graphite producers in the world (oral communication Dietrich Goers at conference Batteries 2009 in Cannes).
Carbon-precursor (coke) is crushed and mixed, then fed to silos via conveyor belts. The graphitization process takes place in an electric furnace (Acheson-oven) at 2'800°C during about 1 week. The cooling must be very slow and takes another 2-3 weeks before the unloading of the furnace. Purity of synthetic graphite is >99.9%. Typical products of Timcal as active material: Timrex SLP50 with around 45 um particle size.
Input: 1.2 kg coke for 1 kg of graphite.
Energy demand: Q = m x cp x deltaT Q = 1 [kg] x 1.15 [kJ/kgK] x (2800°C - 20°C) [K] = 3200 kJ Energy demand to heat up 1 kg coke to 2800°C.
Energy demand to hold the coke at 2800°C for the graphitisation process during a few days: Assumed to be 10% of the heating energy Total Energy: 3200kJ x 1.1 = 3600kJ = 1 kWh per kg graphite as electricity.
Natural graphite is found in mines, average graphite content is 5-7% in the ores (rock containing graphite). The natural graphite is grinded (ball mill) and mechanically concentrated in a flotation process. Afterwards follows a drying and size separation process: milling, sieving, conditioning. Purity of natural graphite is 93..99.8%.

## Parameters
- fraction, process water, to air: 0.205 dimensionless; lognormal variance with pedigree 0.092025, pedigree (4,4,3,2,4)

## Reference product
- graphite, battery grade: 1 kg; By-product classification allocatable product; CPC 342: Basic inorganic chemicals n.e.c.
  production volume 3.80251 kg
  properties: carbon allocation 1 kg, carbon content 1, carbon content, fossil 1, carbon content, non-fossil 0, dry mass 1 kg, heating value, net 30.3 MJ, price 0.44 EUR2005, water content 0, water in wet mass 0 kg, wet mass 1 kg

## Inputs from technosphere
- blasting: 7.73e-5 kg; lognormal variance with pedigree 0.152, pedigree (4,4,4,5,1)
- coke: 40 MJ; lognormal variance with pedigree 0.0727, pedigree (2,2,4,5,4)
  properties: carbon content, fossil 0.869149, dry mass 0.0328671 kg, heating value, net 28.6 MJ, water content 0.0638298, wet mass 0.034965 kg
- conveyor belt: 2.78e-8 m; lognormal variance with pedigree 0.5, pedigree (5,5,5,5,5)
- diesel, burned in building machine: 0.018 MJ; lognormal variance with pedigree 0.032, pedigree (4,4,4,5,1)
  properties: heating value, net 1 MJ
- electricity, medium voltage: 0.000904144, 0.000393516, 0.0525741, 0.08147, 0.000855923, 0.00131011, 0.0602089, 0.000499656, 0.196879, 0.0138867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 kWh (46 suppliers, which the file names only by identifier); sum of these 1.0325 kWh; lognormal variance with pedigree 0.0727, pedigree (2,2,4,5,4)
- heat, central or small-scale, other than natural gas: 0.0033746 MJ; lognormal variance with pedigree 0.058, pedigree (4,5,5,5,3)
  properties: heating value, net 1 MJ
- heat, district or industrial, other than natural gas: 0.0898 MJ; lognormal variance with pedigree 0.4082, pedigree (5,5,5,5,3)
  properties: heating value, net 1 MJ
- industrial machine, heavy, unspecified: 7.63668e-5, 0.000154633 kg (2 suppliers, which the file names only by identifier); sum of these 0.000231 kg; lognormal variance with pedigree 0.5, pedigree (5,5,5,5,5)
- limestone quarry infrastructure: 5.25e-11 unit; lognormal variance with pedigree 0.032, pedigree (4,4,4,5,1)
- recultivation, limestone mine: 6.52e-6 m2; lognormal variance with pedigree 0.004, pedigree (1,4,4,5,1)

## Inputs from nature
- Graphite [natural resource, in ground]: 1.0526 kg; lognormal variance with pedigree 0.0326, pedigree (2,4,4,5,3)
- Occupation, mineral extraction site [natural resource, land]: 8.48e-5 m2*year; lognormal variance with pedigree 0.0326, pedigree (2,4,4,5,3)
- Transformation, from forest, unspecified [natural resource, land]: 6.52e-6 m2; lognormal variance with pedigree 0.004, pedigree (1,4,4,5,1)
- Transformation, to mineral extraction site [natural resource, land]: 6.52e-6 m2; lognormal variance with pedigree 0.0326, pedigree (2,4,4,5,3)
- Water, well, in ground [natural resource, in water]: 2.93e-5 m3; lognormal variance with pedigree 0.0326, pedigree (2,4,4,5,3)

## Emissions to nature
- Particulate Matter, < 2.5 um [air, unspecified]: 8.87e-6 kg; lognormal variance with pedigree 0.084, pedigree (5,4,4,5,1)
- Particulate Matter, > 10 um [air, unspecified]: 4.78e-5 kg; lognormal variance with pedigree 0.124, pedigree (5,4,4,5,1)
- Particulate Matter, > 2.5 um and < 10um [air, unspecified]: 0.000121 kg; lognormal variance with pedigree 0.032, pedigree (4,4,4,5,1)
- Water [air, unspecified]: 6.0065e-6 m3; lognormal variance with pedigree 0.0427, pedigree (2,2,4,5,1)
- Water [water, unspecified]: 2.32935e-5 m3; lognormal variance with pedigree 0.0427, pedigree (2,2,4,5,1)

## Sampling procedure
approximation with data from literature, website, oral communication,

## Extrapolations
see Geography This dataset has been copied from an original dataset covering the geography CN. The uncertainty has been adjusted accordingly.

## Review by Christian Bauer 2010-02-08
passed
