# concrete production, 25MPa, for building construction, with cement, CEM II/A

Dataset: EcoSpold 2, unit process
Geography: RoW
Time period: 2013-01-01 to 2022-12-31
Technology level: current
Classification: ISIC rev.4 ecoinvent: 2395:Manufacture of articles of concrete, cement and plaster
Synonyms: ready-mixed concrete; béton de bâtiment; Transportbeton; Hochbaubeton
Scenario: Business-as-Usual
System model: Allocation, cut-off by classification
Generated by: Frank Werner
Published in: Werner F. 2014
Database: ecoinvent
isCopyrightProtected: true
accessRestrictedTo: 1

## General comment
This dataset is a copy of the corresponding activity from Switzerland. This dataset contains the production of concrete for use in building construction with cement CEM II/A from primary aggregates (no input of recycled gravel or sand). In its application this concrete contains reinforcement steel or other metals and is exposed to air and humidity as well as to frost-dew cycles.
Density: 2420 kg/m3, content of cement: 290 kg/m3
Exposition class according to EN 206-1: XC1-XC4, XF1
Examples for this exposition class are e.g. reinforced builing elements for interior use; construction elements that are permanently submerged under water such as foundations; horizontal and vertical building elements for exterior use exposed to direct weathering (rain, frost, deicing agents (as spray mist or as spray water) such as lightning masts, balconys; concrete in an outdoor environment protected from rain such as open halls or wet spaces.

## Included activities start
The activity starts with the ingredients for the concrete at the factory gate.

## Included activities end
Includes the whole manufacturing processes to produce ready-mixed concrete, internal processes (transport, etc.) and infrastructure. No administration is included.

## Technology
Typical technology for average Swiss production

## Parameters
- fraction, process water, to air: 0.15 dimensionless; name fraction_PW_to_air; lognormal variance with pedigree 0.092, pedigree (4,4,3,2,4)
  Literature value. In case when no industry/process specific data are available, default evaporation fraction value is used. This value is 15% and is based on literature (Statistics Canada, 2007 & Shaffer, K.H., 2008, Consumptive water use in the Great Lakes Basin, USGS & Shiklomanov, 2003, World Water Resources at the Beginning of the 21st Century) and has been approved by an expert.
- fraction, tap water, to air: 0.15 dimensionless; name fraction_TW_to_air; = fraction_PW_to_air; lognormal variance with pedigree 0.092, pedigree (4,4,3,2,4)
  Calculated value. See comment in the other parametres present in this dataset. Tap water is considered to be always used as process water, thus process water fractions to air are applied to all tap water input flows to calculate the amount of water consumed in the processes.
- fraction, water, completely softened, to air: 0.15 dimensionless; name fraction_WCS_to_air; = fraction_PW_to_air; lognormal variance with pedigree 0.092, pedigree (4,4,3,2,4)
  Calculated value. See comment in the other parametres present in this dataset. Water, completely softened is considered to be always used as process water, thus process water fractions to air are applied to all water, completely softened input flows to calculate the amount of water consumed in the processes.

## Reference product
- concrete, 25MPa: 1 m3; By-product classification allocatable product; CPC 37510: Non-refractory mortars and concretes
  production volume 4.59639e7 m3
  properties: carbon allocation 0 kg, carbon content 0, carbon content, fossil 0, carbon content, non-fossil 0, cement content 206 kg, dry mass 2290 kg, fly ash content 69 kg, gravel content 1100 kg, price 185 EUR2005, sand content 910 kg, water content 0.0764192, water in wet mass 175 kg, wet mass 2465 kg

## Inputs from technosphere
- cement, CEM II/A: 0.133671, 271.034, 18.8321 kg (3 suppliers, which the file names only by identifier); sum of these 290 kg; lognormal variance with pedigree 0.0162, pedigree (4,1,2,5,1)
  properties: dry mass 1 kg, wet mass 1 kg
- concrete mixing factory: 4.17e-7 unit; lognormal variance with pedigree 0.3226, pedigree (2,1,1,5,1)
- diesel, burned in building machine: 0.4 MJ; lognormal variance with pedigree 0.0126, pedigree (2,1,1,5,1)
  properties: heating value, net 1 MJ
- electricity, medium voltage: 0.172777, 0.254034, 0.12749, 2.33078, 0.0386003, 0.00756512, 0.554628, 0.814126 kWh (8 suppliers, which the file names only by identifier); sum of these 4.3 kWh; lognormal variance with pedigree 0.0126, pedigree (2,1,1,5,1)
- gravel, round: 1250 kg; lognormal variance with pedigree 0.0201, pedigree (4,2,1,5,1)
  properties: dry mass 1 kg, wet mass 1 kg
- heat, district or industrial, natural gas: 4.11334, 0.0675927, 1.51907 MJ (3 suppliers, which the file names only by identifier); sum of these 5.7 MJ; lognormal variance with pedigree 0.026, pedigree (3,4,1,5,1)
  properties: heating value, net 1 MJ
- heat, district or industrial, other than natural gas: 7.9929, 0.00370296, 0.203395 MJ (3 suppliers, which the file names only by identifier); sum of these 8.2 MJ; lognormal variance with pedigree 0.026, pedigree (3,4,1,5,1)
  properties: heating value, net 1 MJ
- lubricating oil: 0.02 kg; lognormal variance with pedigree 0.0126, pedigree (2,1,1,5,1)
  properties: carbon content, fossil 0.75, dry mass 1 kg, heating value, net 40.2 MJ, wet mass 1 kg
- municipal solid waste: -1.6437e-5, -0.0461351, -6.52326e-5, -0.00375975, -2.34894e-5 kg (5 suppliers, which the file names only by identifier); sum of these -0.05 kg; lognormal variance with pedigree 0.0126, pedigree (2,1,1,5,1)
  properties: carbon content, fossil 0.171549, carbon content, non-fossil 0.261655, dry mass 0.771 kg, heating value, net 11.74 MJ, water content 0.297017, wet mass 1 kg
- sand: 10.6687, 694.276, 0.055387 kg (3 suppliers, which the file names only by identifier); sum of these 705 kg; lognormal variance with pedigree 0.0482, pedigree (5,1,2,5,1)
  properties: dry mass 1 kg, wet mass 1 kg
- synthetic rubber: 0.12 kg; lognormal variance with pedigree 0.0126, pedigree (2,1,1,5,1)
  properties: carbon content, fossil 0.871949, dry mass 1 kg, heating value, net 26.42 MJ, wet mass 1 kg
- tap water: 8.20293, 0.607005, 93.8703, 1.63523, 0.196837, 0.325306, 69.949, 0.213397 kg (8 suppliers, which the file names only by identifier); sum of these 175 kg; lognormal variance with pedigree 0.0148, pedigree (3,3,2,5,1)
  properties: carbon content, fossil 0.00178991, dry mass 0.000337476 kg, water content 2962.17, wet mass 1 kg
- waste concrete: -0.367691, -5.01231 kg (2 suppliers, which the file names only by identifier); sum of these -5.38 kg; lognormal variance with pedigree 0.0126, pedigree (2,1,1,5,1)
  properties: dry mass 0.5 kg, water content 1, wet mass 1 kg

## Sampling procedure
Measured data of several Swiss plants.
