# phosphate rock beneficiation

Dataset: EcoSpold 2, unit process
Geography: RoW
Time period: 1986-01-01 to 2022-12-31
Technology level: current
Classification: ISIC rev.4 ecoinvent: 0891:Mining of chemical and fertilizer minerals
Synonyms: Rock phosphate, Phosphorite
Scenario: Business-as-Usual
System model: Allocation, cut-off by classification
Generated by: Anna Kounina
Database: ecoinvent
isCopyrightProtected: true
accessRestrictedTo: 1

## General comment
This dataset is a weighted average from the respective regional datasets.
This dataset represents the production of 1 kg of phosphate rock, with 32% P2O5, at the mine. Rock phosphate has a phosphorus content of 32% P2O5 and is mainly used as a raw material for the production of phosphorous fertilisers. In this dataset, the mining technology is based on magmatic apatite phosphate ore (e.g. from Russia). In order to produce 1 tonne of commercial phosphate rock with a content of 32% P2O5, 5 tonnes of phosphate ore must be mined and beneficiated in open pit or underground mines. Rock phosphate processing is energy intensive due to mining, crushing and grinding of the phosphate ore. The phosphated sludge is assumed to be deposited on a landfill site and treated as an inert substance. Large uncertainties exist for data on particle emissions from transfer and storage. Also data of emissions to water and soil are uncertain due to missing data of uncontrolled run off and water use which were estimated.
The main data source for this dataset is Fertilizers Europe (2014), complemented by Althaus et al (2007).
References:
Fertilizers Europe (2014): Average Emissions Year 2011. Fertilizers Europe Environmental report (internal).
Fertilizers Europe (2016): Average Emissions Year 2014. Fertilizers Europe Environmental report (internal). Used for updated energy and GHG emission in Carbon Footprint Calculator
Althaus H.-J., Chudacoff M., Hischier R., Jungbluth N., Osses M. and Primas A. (2007) Life Cycle Inventories of Chemicals. ecoinvent report No. 8, v2.0. EMPA Dübendorf, Swiss Centre for Life Cycle Inventories, Dübendorf, CH.

## Included activities start
The activity starts from phosphate ore in the ground.

## Included activities end
This activites ends with the production of 1 kg of phosphate rock. Mining process, transport to beneficiation plant, dry processing including crushing, screening or washing and flotation. Drying or calcination of washed rock included. Land use for mining and reclamation.

## Geography
This dataset is a weighted average built from the following geographies: MA, US, RER.

## Technology
Average techlogy from the regional counterparts as given in the geography comment.

## Time period
Primary data were collected on fertiliser production for the year 2011. These data were based on annual average data for the year 2011.

## Reference product
- phosphate rock, beneficiated: 1 kg; By-product classification allocatable product; CPC 34629: Other phosphatic fertilizers, n.e.c.
  production volume 1.91062e11 kg
  properties: carbon allocation 0 kg, carbon content 0, carbon content, fossil 0, carbon content, non-fossil 0, dry mass 1 kg, oxygen content 0.180345, phosphorus content 0.139655, price 0.049 EUR2005, water content 0, water in wet mass 0 kg, wet mass 1 kg

## Inputs from technosphere
- diesel, burned in building machine: 0.0381568 MJ; lognormal variance with pedigree 0.0232, pedigree (2,3,5,5,3)
  properties: heating value, net 1 MJ
- electricity, low voltage: 3.6603e-7, 6.58956e-6, 4.61955e-5, 9.38603e-7, 9.81599e-6, 5.27152e-6, 9.4382e-6, 0.000363884, 9.56713e-6, 0.000143214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 kWh (34 suppliers, which the file names only by identifier); sum of these 0.0109276 kWh; lognormal variance with pedigree 0.0053, pedigree (2,2,5,5,1)
- electricity, medium voltage: 1.50449e-5, 0.000593945, 4.70576e-5, 0.00181069, 5.23607e-5, 5.05151e-5, 5.38319e-5, 0.00490394, 4.72806e-6, 1.39665e-6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 kWh (34 suppliers, which the file names only by identifier); sum of these 0.05494 kWh; lognormal variance with pedigree 0.0852, pedigree (2,3,5,5,4)
- ethylenediamine: 0.000614081 kg; lognormal variance with pedigree 0.2266, pedigree (3,3,5,5,5)
  properties: carbon content, fossil 0.5, dry mass 1 kg, heating value, net 28.24 MJ, wet mass 1 kg
- heat, district or industrial, natural gas: 0.0762491, 0.00125297 MJ (2 suppliers, which the file names only by identifier); sum of these 0.077502 MJ; lognormal variance with pedigree 0.0852, pedigree (2,3,5,5,4)
  properties: heating value, net 1 MJ
- heat, district or industrial, other than natural gas: 0.0774661, 3.58886e-5 MJ (2 suppliers, which the file names only by identifier); sum of these 0.077502 MJ; lognormal variance with pedigree 0.052, pedigree (1,1,4,5,1)
  properties: heating value, net 1 MJ
- light fuel oil: 1.28723e-5, 0.000193981, 0.00195431, 9.6114e-5, 1.38612e-5, 1.86515e-5 kg (6 suppliers, which the file names only by identifier); sum of these 0.00228979 kg; lognormal variance with pedigree 0.0866, pedigree (3,3,5,5,4)
  properties: carbon content, fossil 0.862, dry mass 1 kg, heating value, net 42.6 MJ, wet mass 1 kg
- mine infrastructure, phosphate rock: 1.0018e-11 unit; lognormal variance with pedigree 0.41, pedigree (4,5,5,5,4)
- non-sulfidic overburden, off-site: -0.598827 kg; lognormal variance with pedigree 0.0053, pedigree (2,2,3,5,1)
  properties: dry mass 1 kg, wet mass 1 kg
- palm oil, crude: 0.00153211 kg; lognormal variance with pedigree 0.2266, pedigree (3,3,5,5,5)
  properties: carbon content, non-fossil 0.752881, dry mass 1 kg, heating value, net 37 MJ, wet mass 1 kg
- soda ash, light: 0.00153211 kg; lognormal variance with pedigree 0.0866, pedigree (3,3,5,5,4)
  properties: carbon content, fossil 0.0517241, dry mass 1 kg, heating value, net 3.43 MJ, wet mass 1 kg
- sodium silicate, spray powder, 80%: 0.000467395 kg; lognormal variance with pedigree 0.0866, pedigree (3,3,5,5,4)
  properties: dry mass 1 kg, wet mass 1 kg
- steam, in chemical industry: 0.0333655 kg; lognormal variance with pedigree 0.0053, pedigree (2,2,5,5,1)
  properties: dry mass 1 kg, wet mass 1 kg
- sulfuric acid: 0.00228979 kg; lognormal variance with pedigree 0.0866, pedigree (3,3,5,5,4)
  properties: dry mass 1 kg, wet mass 1 kg

## Inputs from nature
- Fluorine [natural resource, in ground]: 0.00722676 kg; lognormal variance with pedigree 0.0053, pedigree (2,2,5,5,1)
- Gangue [natural resource, in ground]: 0.590027 kg; lognormal variance with pedigree 0.0053, pedigree (2,2,5,5,1)
- Occupation, construction site [natural resource, land]: 0.00200907 m2*year; lognormal variance with pedigree 0.218, pedigree (4,5,5,5,4)
- Occupation, mineral extraction site [natural resource, land]: 0.0094855 m2*year; lognormal variance with pedigree 0.218, pedigree (4,5,5,5,4)
- Phosphorus [natural resource, in ground]: 0.161376 kg; lognormal variance with pedigree 0.0053, pedigree (2,2,5,5,1)
- Transformation, from forest, unspecified [natural resource, land]: 0.000112499 m2; lognormal variance with pedigree 0.1932, pedigree (2,3,5,5,1)
- Transformation, from mineral extraction site [natural resource, land]: 0.000475186 m2; lognormal variance with pedigree 0.298, pedigree (4,5,5,5,4)
- Transformation, from pasture, man made [natural resource, land]: 0.000361011 m2; lognormal variance with pedigree 0.298, pedigree (4,5,5,5,4)
- Transformation, to forest, unspecified [natural resource, land]: 5.63225e-5 m2; lognormal variance with pedigree 0.1932, pedigree (2,3,5,5,1)
- Transformation, to mineral extraction site [natural resource, land]: 0.000475186 m2; lognormal variance with pedigree 0.298, pedigree (4,5,5,5,4)
- Transformation, to pasture, man made [natural resource, land]: 0.000419009 m2; lognormal variance with pedigree 0.298, pedigree (4,5,5,5,4)
- Water, well, in ground [natural resource, in water]: 0.00222439 m3; lognormal variance with pedigree 0.11, pedigree (4,5,5,5,4)

## Emissions to nature
- Carbon dioxide, fossil [air, non-urban air or from high stacks]: 0.00914954 kg; lognormal variance with pedigree 0.0166, pedigree (2,4,5,5,1)
- Hydrogen fluoride [air, non-urban air or from high stacks]: 1.61292e-6 kg; lognormal variance with pedigree 0.2126, pedigree (2,4,5,5,3)
- Lead-210 [air, non-urban air or from high stacks]: 0.000784453 kBq; lognormal variance with pedigree 0.426, pedigree (4,5,5,5,3)
- Particulate Matter, < 2.5 um [air, non-urban air or from high stacks]: 0.000113665 kg; lognormal variance with pedigree 0.42, pedigree (3,5,5,5,3)
- Particulate Matter, > 10 um [air, non-urban air or from high stacks]: 0.000488317 kg; lognormal variance with pedigree 0.15, pedigree (3,5,5,5,3)
- Particulate Matter, > 2.5 um and < 10um [air, low population density, long-term]: 1.04905e-5 kg; lognormal variance with pedigree 0.1247, pedigree (2,2,5,5,1)
- Particulate Matter, > 2.5 um and < 10um [air, non-urban air or from high stacks]: 0.000253342 kg; lognormal variance with pedigree 0.23, pedigree (3,5,5,5,3)
- Polonium-210 [air, non-urban air or from high stacks]: 0.000784453 kBq; lognormal variance with pedigree 0.426, pedigree (4,5,5,5,3)
- Radium-226 [air, non-urban air or from high stacks]: 0.00168462 kBq; lognormal variance with pedigree 0.426, pedigree (4,5,5,5,3)
- Thorium-230 [air, non-urban air or from high stacks]: 0.00164225 kBq; lognormal variance with pedigree 0.426, pedigree (4,5,5,5,3)
- Thorium-232 [air, non-urban air or from high stacks]: 2.44015e-5 kBq; lognormal variance with pedigree 0.426, pedigree (4,5,5,5,3)
- Uranium-234 [air, non-urban air or from high stacks]: 0.00164225 kBq; lognormal variance with pedigree 0.426, pedigree (4,5,5,5,3)
- Uranium-238 [air, non-urban air or from high stacks]: 0.00164225 kBq; lognormal variance with pedigree 0.426, pedigree (4,5,5,5,3)
- Water [air, low population density, long-term]: 0.000158814 m3; lognormal variance with pedigree 0.0447, pedigree (2,2,5,5,1)
- Water [air, unspecified]: 0.000605492 m3; lognormal variance with pedigree 0.0447, pedigree (2,2,5,5,1)
- Oils, unspecified [soil, industrial]: 0.00113305 kg; lognormal variance with pedigree 0.352, pedigree (5,5,5,5,5)
- BOD5, Biological Oxygen Demand [water, surface water]: 0.000148373 kg; lognormal variance with pedigree 0.15, pedigree (4,5,5,5,4)
- COD, Chemical Oxygen Demand [water, surface water]: 0.000148373 kg; lognormal variance with pedigree 0.15, pedigree (4,5,5,5,4)
- DOC, Dissolved Organic Carbon [water, surface water]: 1.09514e-7 kg; lognormal variance with pedigree 0.15, pedigree (4,5,5,5,4)
- Fluoride [water, surface water]: 9.94307e-6 kg; lognormal variance with pedigree 0.698, pedigree (3,4,5,5,4)
- Nitrogen [water, surface water]: 7.7717e-6 kg; lognormal variance with pedigree 0.138, pedigree (3,4,5,5,4)
- Phosphorus [water, surface water]: 1.99268e-5 kg; lognormal variance with pedigree 0.138, pedigree (3,4,5,5,4)
- Radioactive species, alpha emitters [water, surface water]: 0.000963064 kBq; lognormal variance with pedigree 0.698, pedigree (3,4,5,5,4)
- Sulfate [water, surface water]: 0.000657734 kg; lognormal variance with pedigree 0.138, pedigree (3,4,5,5,4)
- Suspended solids, unspecified [water, surface water]: 4.97718e-5 kg; lognormal variance with pedigree 0.698, pedigree (3,4,5,5,4)
- TOC, Total Organic Carbon [water, surface water]: 3.97894e-5 kg; lognormal variance with pedigree 0.15, pedigree (4,5,5,5,4)
- Toluene [water, surface water]: 1.19452e-7 kg; lognormal variance with pedigree 0.698, pedigree (3,4,5,5,4)
- Water [water, unspecified]: 0.00146781 m3; lognormal variance with pedigree 0.0447, pedigree (2,2,5,5,1)

## Extrapolations
This dataset was built as a weighted average of regional datasets of the same activityName. Weights are based on production volumes.
MA: production volume = 2.54e+09 kg/year, weight = 0.4271
US: production volume = 2.54e+09 kg/year, weight = 0.4271
RER: production volume = 8.65e+08 kg/year, weight = 0.1457
