# silencer production, steel, DN 315, 50 mm

Dataset: EcoSpold 2, unit process
Geography: RoW
Time period: 2003-01-01 to 2022-12-31
Technology level: current
Classification: EcoSpold01Categories: ventilation/production of components
Classification: ISIC rev.4 ecoinvent: 2819:Manufacture of other general-purpose machinery
Tags: ConvertedDataset
Scenario: Business-as-Usual
System model: Allocation, cut-off by classification
Generated by: Alex Primas
Published in: Hässig, W. 2007
Database: ecoinvent
isCopyrightProtected: true
accessRestrictedTo: 1

## General comment
Production of a typical component used for a ventilation system in a multi family house. The house considered in the investigation includes 6 flats with 130 m2 floor area each and a ventilation rate of 120 m3/h.
[This dataset was already contained in the ecoinvent database version 2. It was not individually updated during the transfer to ecoinvent version 3. Life Cycle Impact Assessment results may still have changed, as they are affected by changes in the supply chain, i.e. in other datasets. This dataset was generated following the ecoinvent quality guidelines for version 2. It may have been subject to central changes described in the ecoinvent version 3 change report (http://www.ecoinvent.org/database/ecoinvent-version-3/reports-of-changes/), and the results of the central updates were reviewed extensively. The changes added e.g. consistent water flows and other information throughout the database. The documentation of this dataset can be found in the ecoinvent reports of version 2, which are still available via the ecoinvent website. The change report linked above covers all central changes that were made during the conversion process.]

## Geography
Data for production in Switzerland used.

## Technology
Silencer made of galvanised steel with 50 mm glass wool for acoustic insulation. Weight of element 20 kg

## Time period
Materials investigated in 2003

## Reference product
- silencer, steel, DN 315, 50 mm: 1 unit; By-product classification allocatable product; CPC 49129: Other parts and accessories n.e.c. of motor vehicles (including brakes, gear boxes, axles, road wheels, suspen[…]
  production volume 3.96633 unit
  properties: carbon allocation 0.0903885 kg, carbon content 0.00451943, carbon content, fossil 0.00451943, carbon content, non-fossil 0, dry mass 20 kg, price 21.3497 EUR2005, water content 0, water in wet mass 0 kg, wet mass 20 kg

## Inputs from technosphere
- electricity, medium voltage: 0.188045, 0.276483, 0.138757, 2.53676, 0.0420115, 0.00823366, 0.603641, 0.886073 kWh (8 suppliers, which the file names only by identifier); sum of these 4.68 kWh; lognormal variance with pedigree 0.11, pedigree (3,5,5,5,3)
- glass wool mat: 3.3 kg; lognormal variance with pedigree 0.0146, pedigree (2,4,5,5,1)
  properties: carbon content, fossil 0.0107327, dry mass 1 kg, wet mass 1 kg
- heat, district or industrial, natural gas: 28.7934, 0.473149, 10.6335 MJ (3 suppliers, which the file names only by identifier); sum of these 39.9 MJ; lognormal variance with pedigree 0.038, pedigree (4,5,5,5,1)
  properties: heating value, net 1 MJ
- heat, district or industrial, other than natural gas: 38.8923, 0.0180181, 0.989689 MJ (3 suppliers, which the file names only by identifier); sum of these 39.9 MJ; lognormal variance with pedigree 0.038, pedigree (4,5,5,5,1)
  properties: heating value, net 1 MJ
- inert waste, for final disposal: -0.3 kg; lognormal variance with pedigree 0.032, pedigree (4,4,1,5,1)
  properties: dry mass 0.995 kg, water content 0.00502513, wet mass 1 kg
- sheet rolling, steel: 18.7 kg; lognormal variance with pedigree 0.016, pedigree (3,4,5,5,1)
- steel, low-alloyed: 6.92 kg; lognormal variance with pedigree 0.0146, pedigree (2,4,5,5,1)
  properties: carbon content, fossil 0.005, dry mass 1 kg, wet mass 1 kg
- steel, unalloyed: 11.8 kg; lognormal variance with pedigree 0.0146, pedigree (2,4,5,5,1)
  properties: carbon content, fossil 0.0025, dry mass 1 kg, wet mass 1 kg
- ventilation components factory: 8e-8 unit; lognormal variance with pedigree 0.356, pedigree (4,5,5,5,3)
- welding, arc, steel: 2 m; lognormal variance with pedigree 0.0326, pedigree (2,4,5,5,3)
- zinc coat, coils: 1.46 m2; lognormal variance with pedigree 0.016, pedigree (3,4,5,5,1)

## Sampling procedure
Questionnaire and technical information of producer. Data of one common product used.

## Extrapolations
none This dataset has been copied from an original dataset covering the geography CH. The uncertainty has been adjusted accordingly.

## Review by Rolf Frischknecht 2007-08-16
passed
none
