# sputtering, indium tin oxide, for liquid crystal display

Dataset: EcoSpold 2, unit process
Geography: RoW
Time period: 2005-01-01 to 2022-12-31
Technology level: current
Classification: ISIC rev.4 ecoinvent: 2592:Treatment and coating of metals; machining
Classification: EcoSpold01Categories: electronics/module
Synonyms: TCO; physical vapour deposition; Transparent and conductive Oxide Layer; PVD; Indium Tin Oxide; TFT; Indium Zinn Oxid
Tags: ConvertedDataset
Scenario: Business-as-Usual
System model: Allocation, cut-off by classification
Generated by: Mischa Classen
Published in: Hischier R. 2007
Database: ecoinvent
isCopyrightProtected: true
accessRestrictedTo: 1

## General comment
This dataset is established for the manufacturing of LCD screens. Due to a lack of structured data the inventory bases on assumptions and lab-scale technology. Direct process emissions are not known and disregarded. The dataset therefore must not be used for the direct comparison of different film deposition technologies. The functional unit of this dataset is cubic meter resulting from the sputtered area times the film thickness. Film thickness depends on display technology: STN LCD: 150nm top; 330nm bottom; 480nm total. TFT LCD: 150nm top; 50nm bottom; 200nm total. Default value: 500nm total, resulting in typical values for a 17'' monitor (893.55 cm2) of 4.5E-8 m3. 85% of the target ends up as scrap.
[This dataset was already contained in the ecoinvent database version 2. It was not individually updated during the transfer to ecoinvent version 3. Life Cycle Impact Assessment results may still have changed, as they are affected by changes in the supply chain, i.e. in other datasets. This dataset was generated following the ecoinvent quality guidelines for version 2. It may have been subject to central changes described in the ecoinvent version 3 change report (http://www.ecoinvent.org/database/ecoinvent-version-3/reports-of-changes/), and the results of the central updates were reviewed extensively. The changes added e.g. consistent water flows and other information throughout the database. The documentation of this dataset can be found in the ecoinvent reports of version 2, which are still available via the ecoinvent website. The change report linked above covers all central changes that were made during the conversion process.]

## Included activities end
Sputtering process and infrastructure, as well as the transportation of the targets. No pre and post treatment of the surfaces are considered.

## Technology
Relates to RF magentron sputtering techniquewith commercially available sputtering targets. Pre-sputtering phase and subsequent main sputtering.

## Reference product
- sputtering, indium tin oxide, for liquid crystal display: 1 m3; By-product classification allocatable product; CPC 88731: Metal treatment and coating services
  production volume 2.67763 m3
  properties: carbon allocation 0 kg, carbon content 0, price 8.09473e6 EUR2005

## Inputs from technosphere
- building, multi-storey: 147.06 m3; lognormal variance with pedigree 0.542, pedigree (4,4,5,5,5)
- chemical factory, organics: 4.66857e-5 unit; lognormal variance with pedigree 0.542, pedigree (4,4,5,5,5)
- electricity, medium voltage: 2.0817e6, 1.04473e6, 1.90998e7, 316314, 61993.1, 6.67144e6 kWh (6 suppliers, which the file names only by identifier); sum of these 2.9276e7 kWh; lognormal variance with pedigree 0.242, pedigree (4,4,5,5,5)
- sputtering target, sintered, indium tin oxide: 47733 kg; lognormal variance with pedigree 0.242, pedigree (4,4,5,5,5)
  properties: dry mass 1 kg, wet mass 1 kg

## Sampling procedure
Literature

## Extrapolations
see General Comments This dataset has been copied from an original dataset covering the geography RER. The uncertainty has been adjusted accordingly.

## Review by Roberto Dones 2007-08-22
Passed
