# treatment of scrap tin sheet, municipal incineration

Dataset: EcoSpold 2, unit process
Geography: RoW
Time period: 2006-01-01 to 2022-12-31
Technology level: current
Classification: ISIC rev.4 ecoinvent: 3821:Treatment and disposal of non-hazardous waste
Synonyms: Kehrichtverbrennung; municipal waste incineration; Siedlungsabfallverbrennung
Scenario: Business-as-Usual
System model: Allocation, cut-off by classification
Share of production covered: 1.8 %
Generated by: Gabor Doka
Published in: Doka G. 2013
Database: ecoinvent
isCopyrightProtected: true

## General comment
This dataset represents the activity of waste disposal of scrap tin sheet in a municipal solid waste incinerator (MSWI) // Recommended use of this dataset: For disposal of tin sheet packaging (tin cans, paint buckets) but without paper parts (please inventory any paper separately), which go to disposal as part of communal waste. Larger amounts of separated tin sheet will not be disposed in incinerators or landfills, but rather go to recycling. // Inventoried waste contains 99.8% tin sheet inert; 0.195% tin volatile; . // Waste composition (wet, in ppm): H2O n.a.; O n.a.; H n.a.; C n.a.; S n.a.; N n.a.; P n.a.; B n.a.; Cl 750; Br n.a.; F n.a.; I n.a.; Ag n.a.; As n.a.; Ba n.a.; Cd 30; Co n.a.; Cr n.a.; Cu 199; Hg n.a.; Mn n.a.; Mo n.a.; Ni n.a.; Pb 380; Sb n.a.; Se n.a.; Sn 3900; V n.a.; Zn 202; Be n.a.; Sc n.a.; Sr n.a.; Ti n.a.; Tl n.a.; W n.a.; Si n.a.; Fe 994570; Ca n.a.; Al n.a.; K n.a.; Mg n.a.; Na n.a.; // Share of carbon in waste that is biogenic 60.4%. // Share of metals in waste not oxidised and bulk-recyclable (exclude very small or thin parts) Iron: 100%; Alu: 0%; Copper: 0%. // One kg of this waste produces 0.5089 kg of slag and 0.001552 kg of residues, which are landfilled. Additional solidification with 0.000621 kg of cement. // Net energy production: 0MJ/kg electric energy and 0MJ/kg thermal energy. // Recovery of metal scrap to recycling: 576.85g iron scrap, 0g aluminium scrap, 0g copper scrap.

## Included activities start
waste incineration from waste reception gate and delivery into waste bunker at incinerator plant site (without transports to the incinerator)

## Included activities end
Waste-specific short-term emissions to water from leachate. Long-term emissions from landfill to ground water.

## Geography
Specific to the technology mix encountered in Switzerland in 2010. Well applicable to modern incineration practices in Europe, North America or Japan.

## Technology
average Swiss MSWI plants in 2010 (grate incinerators) with electrostatic precipitator for fly ash (ESP), wet flue gas scrubber and 25% SNCR , 42.77% SCR-high dust , 32.68% SCR-low dust -DeNOx facilities and 0% without Denox (weighted according to mass of burnt waste, representing Swiss average). Efficiency of iron scrap separation from slag : 58%. Efficiency of non-ferrous scrap separation from slag : 31%. Gross electric efficiency technology mix 15.84% and Gross thermal efficiency technology mix 28.51%

## Time period
Waste composition as given in literature reference, theoretical data or other source. Transfer coefficients for modern MSWI.

## Reference product
- scrap tin sheet: -1 kg; By-product classification Waste; CPC 39366: Waste and scrap of tin
  Main reference product of this activity (supply of disposal service).
  production volume 2.56e9 kg
    assumed to be 80% of total steel in MSW, based on Swiss waste analysis picture (BUWAL 2003)
  property price 0 EUR2005
    Waste products are assigned a price of zero as they are assumed to require further treatment.
  properties: carbon allocation 0 kg, carbon content 0, carbon content, fossil 0, carbon content, non-fossil 0, dry mass 1 kg, water content 0, water in wet mass 0 kg, wet mass 1 kg

## Inputs from technosphere
- ammonia, anhydrous, liquid: 1.26191e-8, 2.74896e-8, 1.03744e-7, 2.9853e-7, 2.82282e-9, 2.69325e-8, 8.91802e-9, 1.38741e-8 kg (8 suppliers, which the file names only by identifier); sum of these 4.9493e-7 kg; lognormal variance with pedigree 1.0496, pedigree (1,1,4,1,1)
  Input to DeNOx stage (100% NH3).
  Uncertainty: uncertainty calculated from uncertainty in average DeNOx input, uncertainty in the share of thermal NOx, uncertainty of nitrogen content in average municipal waste and the uncertainty in nitrogen content in *this* waste.
  properties: dry mass 1 kg, wet mass 1 kg
- cement, unspecified: 0.000512326, 8.16341e-6, 1.92222e-6, 6.32611e-7, 3.08217e-5, 1.33958e-5, 1.25731e-6, 1.59687e-6, 5.08738e-5 kg (9 suppliers, which the file names only by identifier); sum of these 0.00062099 kg; lognormal variance with pedigree 0.34434, pedigree (1,1,4,1,1)
  Cement required for solidification of landfilled residual material.
  Uncertainty: Uncertainty calculated from uncertainty of the waste composition of this waste, of transfer coefficients in the incinerator and of the solidification recipe.
  properties: dry mass 1 kg, wet mass 1 kg
- chemical, inorganic: 1.1286e-10 kg; lognormal variance with pedigree 0.33023, pedigree (1,1,4,1,1)
  Auxilliary inputs for the wastewater treatment stage of the incinerator plant. Proxy for Polyelectrolyte.
  Uncertainty: uncertainty calculated from uncertainty in average Polyelectrolyte input, of transfer coefficients in the incinerator, and the uncertainty of the waste composition of this waste
  properties: carbon content, fossil 0.003, dry mass 1 kg, wet mass 1 kg
- chromium oxide, flakes: 6.3283e-10 kg; lognormal variance with pedigree 1.807, pedigree (1,1,4,1,1)
  Input to DeNOx stage.
  Uncertainty: uncertainty calculated from uncertainty in average DeNOx input, uncertainty in the share of thermal NOx, uncertainty of nitrogen content in average municipal waste and the uncertainty in nitrogen content in *this* waste.
  properties: dry mass 1 kg, wet mass 1 kg
- electricity, for reuse in municipal waste incineration only: 3.58721e-5, 2.11302e-5, 0.000262898, 9.33658e-6, 0.000864371, 1.7199e-5, 9.38572e-5, 0.00071302, 0.000218181, 5.74937e-5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 kWh (25 suppliers, which the file names only by identifier); sum of these 0.11156 kWh; lognormal variance with pedigree 0.00859512, pedigree (1,1,4,1,1)
  Net electricity required to incinerate this waste (subsidiesed from high-calorific waste fractions).
  Uncertainty: uncertainty is calculated from uncertainties in waste composition and uncertainties in energy efficiency and the uncertainty in internal energy demand
- heat, district or industrial, natural gas: 6.6789e-5, 1.09752e-6, 2.46655e-5 MJ (3 suppliers, which the file names only by identifier); sum of these 9.2552e-5 MJ; lognormal variance with pedigree 1.0496, pedigree (1,1,4,1,1)
  Input to DeNOx stage, to heat up flue gas in low-dust SCR.
  Uncertainty: uncertainty calculated from uncertainty in average DeNOx input, uncertainty in the share of thermal NOx, uncertainty of nitrogen content in average municipal waste and the uncertainty in nitrogen content in *this* waste.
  properties: heating value, net 1 MJ
- heat, for reuse in municipal waste incineration only: 8.05081e-6, 5.78302e-7, 2.563e-5, 8.94703e-6, 3.91187e-6, 3.54248e-7, 4.9958e-7, 8.28698e-6, 1.61985e-6, 1.30194e-7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 MJ (25 suppliers, which the file names only by identifier); sum of these 0.00068718 MJ; lognormal variance with pedigree 0.00859512, pedigree (1,1,4,1,1)
  Net heat required to incinerate this waste (subsidiesed from high-calorific waste fractions).
  Uncertainty: uncertainty is calculated from uncertainties in waste composition and uncertainties in energy efficiency and the uncertainty in internal energy demand
- hydrochloric acid, without water, in 30% solution state: 2.9664e-11 kg; lognormal variance with pedigree 0.33023, pedigree (1,1,4,1,1)
  Auxilliary inputs for the wastewater treatment stage of the incinerator plant.
  Uncertainty: uncertainty calculated from uncertainty in average HCl input, of transfer coefficients in the incinerator, and the uncertainty of the waste composition of this waste
  properties: dry mass 1 kg, heating value, net 3.32 MJ, wet mass 1 kg
- iron (III) chloride, without water, in 40% solution state: 5.6234e-9 kg; lognormal variance with pedigree 0.33023, pedigree (1,1,4,1,1)
  Auxilliary inputs for the wastewater treatment stage of the incinerator plant.
  Uncertainty: uncertainty calculated from uncertainty in average FeCl3 input, of transfer coefficients in the incinerator, and the uncertainty of the waste composition of this waste
  properties: dry mass 1 kg, wet mass 1 kg
- iron scrap, sorted, pressed: -0.57685 kg; lognormal variance with pedigree 0.009085, pedigree (1,1,1,1,1)
  Iron scrap recovered from this waste.
  Uncertainty: uncertainty calculated from uncertainty in waste composition, uncertainty of share of recyclable metal, uncertainty of transfer coefficient to bottom ash, uncertainty of the efficiency of scrap removal in MSWI plant.
  production volume
    calculated in proportion to reference product waste input to incinerator
  properties: dry mass 1 kg, price 0.175 EUR2005, wet mass 1 kg
- municipal waste incineration facility: 2.5e-10 unit
  Demands per kilogram waste.
- process-specific burdens, residual material landfill: 0.00111334, 0.000439163 kg (2 suppliers, which the file names only by identifier); sum of these 0.0015525 kg; lognormal variance with pedigree 0.33526, pedigree (1,1,4,1,1)
  Mass-specific expenditures required for landfilling of incineration residues.
  Uncertainty: uncertainty is calculated from uncertainties in waste composition and transfer coefficients in incinerator
- process-specific burdens, slag landfill: 0.364909, 0.143941 kg (2 suppliers, which the file names only by identifier); sum of these 0.50885 kg; lognormal variance with pedigree 0.0117386, pedigree (1,1,4,1,1)
  Mass-specific expenditures required for landfilling of bottom ash.
  Uncertainty: uncertainty is calculated from uncertainties in waste composition and transfer coefficients in incinerator
- residual material landfill: 3.2343e-12 unit; lognormal variance with pedigree 0.33526, pedigree (1,1,4,1,1)
  Landfill infrastructure required for landfilling of incineration residues.
  Uncertainty: uncertainty is calculated from uncertainties in waste composition and transfer coefficients in incinerator
- slag landfill: 9.0463e-10 unit; lognormal variance with pedigree 0.0117386, pedigree (1,1,4,1,1)
  Landfill infrastructure required for landfilling of bottom ash.
  Uncertainty: uncertainty is calculated from uncertainties in waste composition and transfer coefficients in incinerator
- titanium dioxide: 3.1009e-8 kg; lognormal variance with pedigree 1.807, pedigree (1,1,4,1,1)
  Input to DeNOx stage (TiO2 catalyst carrier)
  Uncertainty: uncertainty calculated from uncertainty in average DeNOx input, uncertainty in the share of thermal NOx, uncertainty of nitrogen content in average municipal waste and the uncertainty in nitrogen content in *this* waste.
  properties: dry mass 1 kg, wet mass 1 kg
- transport, freight, lorry, unspecified: 0.0177138, 0.000365798, 0.00233642 metric ton*km (3 suppliers, which the file names only by identifier); sum of these 0.020416 metric ton*km; lognormal variance with pedigree 0.0117169, pedigree (1,1,4,1,1)
  Transport services to transport incineration residues to landfills.
  Uncertainty: uncertainty calculated from uncertainty of the waste composition of this waste, uncertainty of transfer coefficients and the uncertainty in generic transportation distances
- waste cement, hydrated: -0.00111334, -0.000439163 kg (2 suppliers, which the file names only by identifier); sum of these -0.0015525 kg; lognormal variance with pedigree 0.33634, pedigree (1,1,1,1,1)
  Hydrated cement output for solidification of landfilled residual material.
  Uncertainty: Uncertainty calculated from uncertainty of the waste composition of this waste and transfer coefficients in the incinerator and of the solidification recipe.
  production volume
    calculated in proportion to reference product waste input to incinerator
  properties: dry mass 1 kg, wet mass 1 kg
- water, decarbonised: 3.09171e-8, 1.13142e-9, 3.75558e-8, 2.35577e-7, 1.26609e-7, 2.04945e-8, 1.54112e-9, 1.99974e-7, 6.23274e-9, 1.20643e-8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 kg (12 suppliers, which the file names only by identifier); sum of these 7.1961e-7 kg; lognormal variance with pedigree 0.33023, pedigree (1,1,4,1,1)
  Incinerator process water used in flue gas scrubber stage.
  Uncertainty: uncertainty calculated from uncertainty in average water input, and the uncertainty of the waste composition of this waste
  properties: wet mass 1 kg

## Inputs from nature
- Oxygen [natural resource, in air]: 0.0015231 kg; lognormal variance with pedigree 0.008, pedigree (1,1,4,1,1)
  Oxygen from ambient air needed to combust and oxidise this waste. Net demand, i.e. without O2 leaving the plant in flue gas uncombusted.
  Uncertainty: uncertainty is calculated from uncertainties in waste composition and transfer coefficients to flue gas and soild residues in incinerator

## Emissions to nature
- Ammonia [air, urban air close to ground]: 5.8191e-10 kg; lognormal variance with pedigree 1.1676, pedigree (1,1,4,1,1)
  Nitrogen species emitted to air after DeNOx stage.
  Uncertainty: uncertainty calculated from uncertainty in average N-emissions and uncertainty in the share of thermal NOx and the uncertainty in nitrogen content in *this* waste.
- Benzene [air, urban air close to ground]: 4.9966e-8 kg; lognormal variance with pedigree 0.46653, pedigree (1,1,4,1,1)
  Incomplete combustion product emitted to air.
  Uncertainty: uncertainty calculated from uncertainty in average operation emissions, and the uncertainty of the flue gas volume from this waste.
- Benzene, hexachloro- [air, urban air close to ground]: 1.0448e-10 kg; lognormal variance with pedigree 0.46653, pedigree (1,1,4,1,1)
  (same comment as for Benzene)
- Benzene, pentachloro- [air, urban air close to ground]: 2.6399e-10 kg; lognormal variance with pedigree 0.46653, pedigree (1,1,4,1,1)
  (same comment as for Benzene)
- Benzo(a)pyrene [air, urban air close to ground]: 1.1119e-12 kg; lognormal variance with pedigree 1.056, pedigree (1,1,4,1,1)
  (same comment as for Benzene)
- Carbon monoxide, fossil [air, urban air close to ground]: 3.3626e-5 kg; lognormal variance with pedigree 1.6442, pedigree (1,1,4,1,1)
  (same comment as for Benzene)
- Carbon monoxide, non-fossil [air, urban air close to ground]: 5.131e-5 kg; lognormal variance with pedigree 1.6442, pedigree (1,1,4,1,1)
  (same comment as for Benzene)
- Dioxins, measured as 2,3,7,8-tetrachlorodibenzo-p-dioxin [air, urban air close to ground]: 9.9925e-14 kg; lognormal variance with pedigree 1.056, pedigree (1,1,4,1,1)
  (same comment as for Benzene)
- Heat, waste [air, urban air close to ground]: 0.32688 MJ; lognormal variance with pedigree 0.00898726, pedigree (1,1,4,1,1)
  Waste heat generated from heating value of this waste plus any electricity required to process it.
  Uncertainty: uncertainty is calculated from uncertainties in waste composition and uncertainties in energy efficiency and the uncertainty in internal energy demand
- Methane, fossil [air, urban air close to ground]: 2.9672e-7 kg; lognormal variance with pedigree 0.46653, pedigree (1,1,4,1,1)
  (same comment as for Benzene)
- Methane, non-fossil [air, urban air close to ground]: 4.5277e-7 kg; lognormal variance with pedigree 0.46653, pedigree (1,1,4,1,1)
  (same comment as for Benzene)
- NMVOC, non-methane volatile organic compounds [air, urban air close to ground]: 2.2739e-6 kg; lognormal variance with pedigree 0.46653, pedigree (1,1,4,1,1)
  (same comment as for Benzene)
- Nitrogen oxides [air, urban air close to ground]: 1.8427e-7 kg; lognormal variance with pedigree 1.1676, pedigree (1,1,4,1,1)
  Sum of fuel-Nox and thermal-NOx emitted to air after DeNOx stage.
  Uncertainty: uncertainty calculated from uncertainty in average N-emissions and uncertainty in the share of thermal NOx and the uncertainty in nitrogen content in *this* waste.
- Particulate Matter, < 2.5 um [air, urban air close to ground]: 5.9655e-6 kg; lognormal variance with pedigree 1.056, pedigree (1,1,4,1,1)
  (same comment as for Benzene)
- Particulate Matter, > 2.5 um and < 10um [air, urban air close to ground]: 2.9978e-8 kg; lognormal variance with pedigree 0.68203, pedigree (1,1,4,1,1)
  (same comment as for Benzene)
- Phenol, pentachloro- [air, urban air close to ground]: 2.1759e-11 kg; lognormal variance with pedigree 0.46653, pedigree (1,1,4,1,1)
  (same comment as for Benzene)
- Tin ion [air, urban air close to ground]: 1.2738e-9 kg; lognormal variance with pedigree 0.57263, pedigree (1,1,4,1,1)
  Emission to air from waste composition and transfer coefficients.
  Uncertainty: uncertainty is calculated from uncertainties in waste composition and transfer coefficients in incinerator
- Toluene [air, urban air close to ground]: 9.9932e-8 kg; lognormal variance with pedigree 0.46653, pedigree (1,1,4,1,1)
  (same comment as for Benzene)
- Water [air, urban air close to ground]: 0.00085711 m3; lognormal variance with pedigree 1.4055, pedigree (1,1,4,1,1)
  Water vapour from waste humidity, hydrogen oxidation and part of the process water.
  Uncertainty: Uncertainty calculated from uncertainty in waste composition, process water input and the uncertainty of fraction to air.
- Cadmium II [water, ground-, long-term]: 2.9985e-5 kg; lognormal variance with pedigree 1.1302, pedigree (1,1,4,1,1)
  Long-term emissions from landfilling of incineration residues.
  Uncertainty: uncertainty is calculated from uncertainties in waste composition and transfer coefficients in incinerator and landfills.
- Cadmium II [water, surface water]: 1.5435e-8 kg; lognormal variance with pedigree 1.8697, pedigree (1,1,4,1,1)
  Emissions to water from waste composition and transfer coefficients in incinerator and landfills.
  Uncertainty: uncertainty is calculated from uncertainties in waste composition and transfer coefficients in incinerator and landfills
- Chloride [water, ground-, long-term]: 0.00010216 kg; lognormal variance with pedigree 0.72266, pedigree (1,1,4,1,1)
  (same comment as for Cadmium II)
- Chloride [water, surface water]: 0.00064784 kg; lognormal variance with pedigree 0.7039, pedigree (1,1,4,1,1)
  (same comment as for Cadmium II)
- Copper ion [water, ground-, long-term]: 0.00019899 kg; lognormal variance with pedigree 0.8785, pedigree (1,1,4,1,1)
  (same comment as for Cadmium II)
- Copper ion [water, surface water]: 6.9091e-9 kg; lognormal variance with pedigree 1.9741, pedigree (1,1,4,1,1)
  (same comment as for Cadmium II)
- Heat, waste [water, surface water]: 0.074737 MJ; lognormal variance with pedigree 0.00898726, pedigree (1,1,4,1,1)
  (same comment as for Heat, waste)
- Iron ion [water, ground-, long-term]: 0.21729 kg; lognormal variance with pedigree 0.11478, pedigree (1,1,4,1,1)
  (same comment as for Cadmium II)
- Iron ion [water, surface water]: 3.4951e-6 kg; lognormal variance with pedigree 1.2913, pedigree (1,1,4,1,1)
  (same comment as for Cadmium II)
- Lead II [water, ground-, long-term]: 0.00037999 kg; lognormal variance with pedigree 0.79276, pedigree (1,1,4,1,1)
  (same comment as for Cadmium II)
- Lead II [water, surface water]: 6.9364e-9 kg; lognormal variance with pedigree 1.9733, pedigree (1,1,4,1,1)
  (same comment as for Cadmium II)
- Tin ion [water, ground-, long-term]: 0.0026854 kg; lognormal variance with pedigree 0.60408, pedigree (1,1,4,1,1)
  (same comment as for Cadmium II)
- Tin ion [water, surface water]: 8.2779e-8 kg; lognormal variance with pedigree 1.1176, pedigree (1,1,4,1,1)
  (same comment as for Cadmium II)
- Water [water, surface water]: 0.00044719 m3; lognormal variance with pedigree 1.3943, pedigree (1,1,4,1,1)
  Process water released to surface water.
  Uncertainty: uncertainty calculated from uncertainty in process water input and the uncertainty of fraction to surface water.
- Zinc II [water, ground-, long-term]: 0.00020199 kg; lognormal variance with pedigree 0.87652, pedigree (1,1,4,1,1)
  (same comment as for Cadmium II)
- Zinc II [water, surface water]: 6.0131e-9 kg; lognormal variance with pedigree 1.9925, pedigree (1,1,4,1,1)
  (same comment as for Cadmium II)
