# sulfate pulp production, from eucalyptus, bleached

Dataset: EcoSpold 2, unit process
Geography: RoW
Time period: 2020-01-01 to 2022-12-31
Technology level: current
Classification: ISIC rev.4 ecoinvent: 1701:Manufacture of pulp, paper and paperboard
Synonyms: kraft pulp; Kraftzellstoff
Scenario: Business-as-Usual
System model: Allocation, cut-off by classification
Generated by: Nora Minas
Database: ecoinvent
isCopyrightProtected: true

## General comment
This dataset is a weighted average built from the following geographies: RER, RLA. It represents the production of Elemental Chlorine Free (ECF) and Totally Chlorine Free (TCF) kraft pulp, obtained eucalyptus wood in 2020.
PULP is a wood-based raw material to make different paper, board and other products. The pulp, or fibers from the wood are separated in a kraft cooking process in a so-called fiber line. In a recovery line, the chemicals used in the cooking process are recovered to be used again and energy is produced. The third process is effluent treatment where gaseous and liquid discharges to the environment are continuously minimized and monitored.
MAIN END USES FOR MARKET PULP • Tissue (toilet paper) • Graphic papers • Specialty products • Packaging • Fluff pulp • Viscose • CMC etc.
PRODUCTS GENERATED IN THE PULPING PROCESS include electricity and heat
CAPACITIES World’s total market capacities for softwood kraft pulp, hardwood kraft pulp, and eucalyptus kraft pulp were 28.9 million tons, 15 million tons, and 26.2 million tons, respectively.
SPECIES Softwood pulp is made from coniferous trees, most typically from different species of pine and spruce. Hardwood pulp is made from non-coniferous trees, in Nordic countries primarily of birch. Eucalyptus hardwood pulp is made exclusively of eucalyptus species.
CHARACTERISTICS Softwood fibers are long and slender and are used to give the paper and board products their strength properties. Hardwood fibers are short and can be rounder and their number per gram of pulp is much larger; they give the end product its smoothness, softness and optical properties like opacity (that you cannot see through the paper).

## Included activities start
This activity starts with the reception of the pulpwood at the factory gate.

## Included activities end
The process includes wood handling, chemical pulping and bleaching, drying process, energy production on-site, recovery cycles of chemicals and internal waste water treatment. The activity ends when the kraft pulp is ready to be sold.

## Geography
This dataset is a weighted average built from the following geographies: RLA, RER.

## Time period
Data gathered in 2021 and represents data of 2020 values. Recent technology valid for the upcoming years.

## Reference product
- heat, district or industrial, other than natural gas: 1 MJ; name a_heat; By-product classification allocatable product; CPC 17300: Steam and hot water; lognormal variance with pedigree 0.0027, pedigree (1,2,1,5,1)
  Caluclated as weighted average of regional datasets of the same activityName
  production volume 7.10049e7 MJ
    calculated with PV of reference product and ratio of amount of reference product and byproduct
  property price 0.0106 EUR2005
    Average European district heat price from Ecoheatcool and Euroheat 2005-2006, Ecoheat Work package 1: The European heat market. Final report. 10.6 EUR/GJ i s the price of district heat. http://www.solarthermalworld.org/files/Ecoheatcool%20WP1%20Web.pdf?download
  property true value relation 0.1842; name a_heat_true_value_relation
    property to calculate "true value" from
  properties: allocation factor 0.00315667, carbon allocation 0 kg, carbon content 0, corresponding fuel use, propane, furnace >100kW 0 MJ, heating value, net 1 MJ, true value 0.0138143

## Inputs from technosphere
- aluminium scrap, post-consumer: -1.11753e-7 kg; name a_al_scrap; lognormal variance with pedigree 0.0027, pedigree (1,2,1,5,1)
  Caluclated as weighted average of regional datasets of the same activityName
  production volume
    (same comment as for heat, district or industrial, other than natural gas)
  properties: dry mass 1 kg, price 0.685 EUR2005, wet mass 1 kg
- aluminium sulfate, powder: 6.29417e-6 kg; lognormal variance with pedigree 0.0027, pedigree (1,2,1,5,1)
  Caluclated as weighted average of regional datasets of the same activityName
  properties: dry mass 1 kg, wet mass 1 kg
- bark chips, wet, measured as dry mass: 5.25383e-5, 0.00253161 kg (2 suppliers, which the file names only by identifier); sum of these 0.00258415 kg; lognormal variance with pedigree 0.0113, pedigree (2,2,1,5,3)
  Caluclated as weighted average of regional datasets of the same activityName
  properties: carbon content, non-fossil 0.494, dry mass 1 kg, heating value, net 4.81 MJ, water content 1.4, wet mass 2.4 kg
- biogas: 0.00106969 m3; lognormal variance with pedigree 0.0113, pedigree (2,2,1,5,3)
  Caluclated as weighted average of regional datasets of the same activityName
  properties: carbon content, non-fossil 0.449939, dry mass 1.15 kg, heating value, net 22.73 MJ, wet mass 1.15 kg
- calcium carbonate, precipitated: 2.52387e-5 kg; lognormal variance with pedigree 0.0027, pedigree (1,2,1,5,1)
  Caluclated as weighted average of regional datasets of the same activityName
  properties: carbon content, fossil 0.120005, dry mass 1 kg, wet mass 1 kg
- chemical, inorganic: 2.65285e-6 kg; lognormal variance with pedigree 0.0038, pedigree (2,3,1,5,1)
  Caluclated as weighted average of regional datasets of the same activityName
  properties: carbon content, fossil 0.003, dry mass 1 kg, wet mass 1 kg
- chemical, organic: 4.58581e-6 kg; lognormal variance with pedigree 0.0038, pedigree (2,3,1,5,1)
  Caluclated as weighted average of regional datasets of the same activityName
  properties: carbon content, fossil 0.628, dry mass 1 kg, heating value, net 19.03 MJ, wet mass 1 kg
- chlorine dioxide: 9.14364e-5 kg; lognormal variance with pedigree 0.0027, pedigree (1,2,1,5,1)
  Caluclated as weighted average of regional datasets of the same activityName
  properties: dry mass 1 kg, wet mass 1 kg
- coke: 9.39447e-5 MJ; lognormal variance with pedigree 0.0113, pedigree (2,2,1,5,3)
  Caluclated as weighted average of regional datasets of the same activityName
  properties: carbon content, fossil 0.869149, dry mass 0.0328671 kg, heating value, net 28.6 MJ, water content 0.0638298, wet mass 0.034965 kg
- copper scrap, sorted, pressed: -1.17635e-8 kg; name a_cu_scrap; lognormal variance with pedigree 0.0027, pedigree (1,2,1,5,1)
  Caluclated as weighted average of regional datasets of the same activityName
  production volume
    (same comment as for heat, district or industrial, other than natural gas)
  properties: dry mass 1 kg, price 2.84 EUR2005, wet mass 1 kg
- diesel: 1.2888e-7, 1.30482e-8, 1.27262e-6 kg (3 suppliers, which the file names only by identifier); sum of these 1.41455e-6 kg; lognormal variance with pedigree 0.0113, pedigree (2,2,1,5,3)
  Caluclated as weighted average of regional datasets of the same activityName
  properties: carbon content, fossil 0.865, dry mass 1 kg, heating value, net 42.8 MJ, wet mass 1 kg
- digester sludge: -4.94416e-6 kg; name a_digester_sludge; lognormal variance with pedigree 0.0027, pedigree (1,2,1,5,1)
  Caluclated as weighted average of regional datasets of the same activityName
  production volume
    (same comment as for heat, district or industrial, other than natural gas)
  properties: carbon content, non-fossil 0.3444, dry mass 0.05 kg, heating value, net 2.42 MJ, water content 19, wet mass 1 kg
- electricity, high voltage: 0.000442306, 7.32974e-6, 1.43488e-6, 2.44263e-5, 0.000153868 kWh (5 suppliers, which the file names only by identifier); sum of these 0.000629366 kWh; lognormal variance with pedigree 0.0027, pedigree (1,2,1,5,1)
  Caluclated as weighted average of regional datasets of the same activityName
- electronics scrap: -7.89764e-11 kg; name a_electronic_scrap; lognormal variance with pedigree 0.0026, pedigree (1,1,1,5,1)
  Caluclated as weighted average of regional datasets of the same activityName
  production volume
    (same comment as for heat, district or industrial, other than natural gas)
  properties: carbon content, fossil 0.317311, carbon content, non-fossil 0.004557, dry mass 1 kg, price 16.1 EUR2005, wet mass 1 kg
- green liquor dregs: -0.000132738 kg; name a_green_liquor_dregs; lognormal variance with pedigree 0.0027, pedigree (1,2,1,5,1)
  Caluclated as weighted average of regional datasets of the same activityName
  production volume
    (same comment as for heat, district or industrial, other than natural gas)
  properties: carbon content, non-fossil 0.390667, dry mass 0.75 kg, water content 0.333333, wet mass 1 kg
- hazardous waste, for incineration: -2.22154e-6 kg; name a_hazardous; lognormal variance with pedigree 0.0027, pedigree (1,2,1,5,1)
  Caluclated as weighted average of regional datasets of the same activityName
  production volume
    (same comment as for heat, district or industrial, other than natural gas)
  properties: carbon content, fossil 0.554667, dry mass 0.75 kg, heating value, net 17 MJ, water content 0.333333, wet mass 1 kg
- heavy fuel oil: 5.7604e-6, 0.000134658, 1.45358e-6 kg (3 suppliers, which the file names only by identifier); sum of these 0.000141872 kg; lognormal variance with pedigree 0.0113, pedigree (2,2,1,5,3)
  Caluclated as weighted average of regional datasets of the same activityName
  properties: carbon content, fossil 0.849, dry mass 1 kg, heating value, net 41.2 MJ, wet mass 1 kg
- hydrochloric acid, without water, in 30% solution state: 6.7344e-6 kg; lognormal variance with pedigree 0.0027, pedigree (1,2,1,5,1)
  Caluclated as weighted average of regional datasets of the same activityName
  properties: dry mass 1 kg, heating value, net 3.32 MJ, wet mass 1 kg
- hydrogen peroxide, without water, in 50% solution state: 9.21204e-5 kg; lognormal variance with pedigree 0.0027, pedigree (1,2,1,5,1)
  Caluclated as weighted average of regional datasets of the same activityName
  properties: dry mass 1 kg, heating value, net 7.13 MJ, wet mass 1 kg
- iron scrap, unsorted: -1.05283e-6 kg; name a_iron_scrap; lognormal variance with pedigree 0.0027, pedigree (1,2,1,5,1)
  Caluclated as weighted average of regional datasets of the same activityName
  production volume
    (same comment as for heat, district or industrial, other than natural gas)
  properties: dry mass 1 kg, price 0.149 EUR2005, wet mass 1 kg
- light fuel oil: 1.74612e-6, 1.75918e-5, 1.67892e-7 kg (3 suppliers, which the file names only by identifier); sum of these 1.95058e-5 kg; lognormal variance with pedigree 0.0113, pedigree (2,2,1,5,3)
  Caluclated as weighted average of regional datasets of the same activityName
  properties: carbon content, fossil 0.862, dry mass 1 kg, heating value, net 42.6 MJ, wet mass 1 kg
- limestone residue: -5.0414e-5 kg; name a_limestone_residues; lognormal variance with pedigree 0.0027, pedigree (1,2,1,5,1)
  Caluclated as weighted average of regional datasets of the same activityName
  production volume
    (same comment as for heat, district or industrial, other than natural gas)
  properties: carbon content, fossil 0.0119726, dry mass 0.995 kg, water content 0.00502513, wet mass 1 kg
  note on carbon content, fossil: Calculated based on the carbon content of the input “calcium carbonate, precipitated”
- magnesium sulfate: 7.20342e-6 kg; lognormal variance with pedigree 0.0027, pedigree (1,2,1,5,1)
  Caluclated as weighted average of regional datasets of the same activityName
  properties: dry mass 1 kg, wet mass 1 kg
- malusil: 1.64839e-5 kg; lognormal variance with pedigree 0.0027, pedigree (1,2,1,5,1)
  Caluclated as weighted average of regional datasets of the same activityName
  properties: dry mass 1 kg, wet mass 1 kg
- municipal solid waste: -3.63784e-8, -0.000102106, -5.19868e-8, -1.44373e-7 kg (4 suppliers, which the file names only by identifier); sum of these -0.000102339 kg; lognormal variance with pedigree 0.0027, pedigree (1,2,1,5,1)
  Caluclated as weighted average of regional datasets of the same activityName
  production volume
    (same comment as for heat, district or industrial, other than natural gas)
  properties: carbon content, fossil 0.171549, carbon content, non-fossil 0.261655, dry mass 0.771 kg, heating value, net 11.74 MJ, water content 0.297017, wet mass 1 kg
- natural gas, high pressure: 5.49534e-6, 2.26428e-5, 2.37826e-6, 2.3088e-6, 1.50104e-6, 5.73703e-6, 2.7782e-5, 5.74975e-6, 0.00013454, 8.01403e-6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 m3 (19 suppliers, which the file names only by identifier); sum of these 0.000382456 m3; lognormal variance with pedigree 0.0113, pedigree (2,2,1,5,3)
  Caluclated as weighted average of regional datasets of the same activityName
  properties: carbon content, fossil 0.75, dry mass 0.84 kg, heating value, net 36 MJ, wet mass 0.84 kg
  note on heating value, net: Literature value, Source: Christoph Meili;Niels Jungbluth;Maresa Bussa (2021) Life cycle inventories of crude oil and natural gas extraction. ESU-services Ltd. commissioned by BAFU & VSG, Schaffhausen, Switzerland, http://esu-services.ch/data/public-lci-reports/
- oxygen, liquid: 0.000603758 kg; lognormal variance with pedigree 0.0027, pedigree (1,2,1,5,1)
  Caluclated as weighted average of regional datasets of the same activityName
  properties: dry mass 1 kg, wet mass 1 kg
- ozone, liquid: 4.25848e-6 kg; lognormal variance with pedigree 0.0027, pedigree (1,2,1,5,1)
  Caluclated as weighted average of regional datasets of the same activityName
  properties: dry mass 1 kg, wet mass 1 kg
- propane: 3.1083e-8 kg; lognormal variance with pedigree 0.0113, pedigree (2,2,1,5,3)
  Caluclated as weighted average of regional datasets of the same activityName
  properties: carbon content, fossil 0.817139, dry mass 1 kg, heating value, net 46.4 MJ, wet mass 1 kg
- pulp factory: 6.38849e-13 unit; lognormal variance with pedigree 0.3041, pedigree (3,2,1,5,1)
  Caluclated as weighted average of regional datasets of the same activityName
- quicklime, milled, loose: 0.000101867 kg; lognormal variance with pedigree 0.0027, pedigree (1,2,1,5,1)
  Caluclated as weighted average of regional datasets of the same activityName
  properties: dry mass 0.99 kg, water content 0.010101, wet mass 1 kg
- sawlog and veneer log, eucalyptus ssp., measured as solid wood under bark: 2.41002e-7, 3.43429e-5 m3 (2 suppliers, which the file names only by identifier); sum of these 3.45839e-5 m3; lognormal variance with pedigree 0.0047, pedigree (3,2,1,5,1)
  Caluclated as weighted average of regional datasets of the same activityName
  properties: carbon content, non-fossil 0.494, dry mass 645.246 kg, heating value, net 11336.5 MJ, water content 0.5, wet mass 967.869 kg
- sludge from pulp and paper production: -0.000100095 kg; name a_sludge; lognormal variance with pedigree 0.0027, pedigree (1,2,1,5,1)
  Caluclated as weighted average of regional datasets of the same activityName
  production volume
    (same comment as for heat, district or industrial, other than natural gas)
  properties: carbon content, non-fossil 0.21, dry mass 0.75 kg, heating value, net 2.65 MJ, water content 0.333333, wet mass 1 kg
- sodium chlorate, powder: 0.000100548 kg; lognormal variance with pedigree 0.0027, pedigree (1,2,1,5,1)
  Caluclated as weighted average of regional datasets of the same activityName
  properties: dry mass 1 kg, wet mass 1 kg
- sodium hydrogen sulfite: 1.27371e-6 kg; lognormal variance with pedigree 0.0027, pedigree (1,2,1,5,1)
  Caluclated as weighted average of regional datasets of the same activityName
  properties: dry mass 1 kg, wet mass 1 kg
- sodium hydroxide, without water, in 50% solution state: 0.000300126 kg; lognormal variance with pedigree 0.0027, pedigree (1,2,1,5,1)
  Caluclated as weighted average of regional datasets of the same activityName
  properties: dry mass 1 kg, heating value, net 3.03 MJ, wet mass 1 kg
- sodium hypochlorite, without water, in 15% solution state: 9.84978e-6 kg; lognormal variance with pedigree 0.0027, pedigree (1,2,1,5,1)
  Caluclated as weighted average of regional datasets of the same activityName
  properties: dry mass 1 kg, wet mass 1 kg
- sodium sulfate, anhydrite: 2.82545e-5 kg; lognormal variance with pedigree 0.0027, pedigree (1,2,1,5,1)
  Caluclated as weighted average of regional datasets of the same activityName
  properties: dry mass 1 kg, wet mass 1 kg
- sodium sulfite: 4.81343e-7 kg; lognormal variance with pedigree 0.0027, pedigree (1,2,1,5,1)
  Caluclated as weighted average of regional datasets of the same activityName
  properties: dry mass 1 kg, wet mass 1 kg
- sulfuric acid: 0.000223753 kg; lognormal variance with pedigree 0.0027, pedigree (1,2,1,5,1)
  Caluclated as weighted average of regional datasets of the same activityName
  properties: dry mass 1 kg, wet mass 1 kg
- tap water: 1.24262e-7, 4.02953e-8, 1.67925e-6, 1.92166e-5 kg (4 suppliers, which the file names only by identifier); sum of these 2.10604e-5 kg; lognormal variance with pedigree 0.0027, pedigree (1,2,1,5,1)
  Caluclated as weighted average of regional datasets of the same activityName
  properties: carbon content, fossil 0.00178991, dry mass 0.000337476 kg, water content 2962.17, wet mass 1 kg
- waste mineral oil: -9.14329e-8 kg; name a_waste_mineral_oil; lognormal variance with pedigree 0.0027, pedigree (1,2,1,5,1)
  Caluclated as weighted average of regional datasets of the same activityName
  production volume
    (same comment as for heat, district or industrial, other than natural gas)
  properties: carbon content, fossil 0.864444, dry mass 0.9 kg, heating value, net 34.7 MJ, water content 0.111111, wet mass 1 kg
- waste packaging paper: -5.105e-8 kg; name a_packaging_paper; lognormal variance with pedigree 0.0027, pedigree (1,2,1,5,1)
  Caluclated as weighted average of regional datasets of the same activityName
  production volume
    (same comment as for heat, district or industrial, other than natural gas)
  properties: carbon content, fossil 0.3635, carbon content, non-fossil 0.1432, dry mass 1 kg, heating value, net 14.11 MJ, price 0.1 EUR2005, wet mass 1 kg
- waste plastic, mixture: -7.76935e-11, -1.97082e-8, -7.37772e-11, -1.4226e-11 kg (4 suppliers, which the file names only by identifier); sum of these -1.98739e-8 kg; lognormal variance with pedigree 0.0027, pedigree (1,2,1,5,1)
  Caluclated as weighted average of regional datasets of the same activityName
  production volume
    (same comment as for heat, district or industrial, other than natural gas)
  properties: carbon content, fossil 0.747344, dry mass 0.847 kg, heating value, net 30.79 MJ, water content 0.180638, wet mass 1 kg
- waste wood, untreated: -1.73978e-6, -4.52871e-8, -6.61854e-5, -4.15528e-7 kg (4 suppliers, which the file names only by identifier); sum of these -6.8386e-5 kg; lognormal variance with pedigree 0.0027, pedigree (1,2,1,5,1)
  Caluclated as weighted average of regional datasets of the same activityName
  production volume
    (same comment as for heat, district or industrial, other than natural gas)
  properties: carbon content, non-fossil 0.48632, dry mass 0.8 kg, heating value, net 13.99 MJ, water content 0.25, wet mass 1 kg

## Inputs from nature
- Carbon dioxide, non-fossil, resource correction [natural resource, in air]: -0.0217422 kg
- Oxygen [natural resource, in air]: 0.0191543 kg; lognormal variance with pedigree 0.0512, pedigree (2,5,1,5,4)
  Caluclated as weighted average of regional datasets of the same activityName
- Water, unspecified natural origin [natural resource, in water]: 0.000375861 m3; lognormal variance with pedigree 0.0027, pedigree (1,2,1,5,1)
  Caluclated as weighted average of regional datasets of the same activityName
- Water, well, in ground [natural resource, in water]: 2.28246e-6 m3; lognormal variance with pedigree 0.0027, pedigree (1,2,1,5,1)
  Caluclated as weighted average of regional datasets of the same activityName

## Emissions to nature
- Acetaldehyde [air, urban air close to ground]: 5.5111e-9 kg; lognormal variance with pedigree 0.1406, pedigree (2,5,1,5,4)
  Caluclated as weighted average of regional datasets of the same activityName
- Acetic acid [air, urban air close to ground]: 9.44074e-9 kg; lognormal variance with pedigree 0.1406, pedigree (2,5,1,5,4)
  Caluclated as weighted average of regional datasets of the same activityName
- Acetone [air, urban air close to ground]: 8.64019e-10 kg; lognormal variance with pedigree 0.1406, pedigree (2,5,1,5,4)
  Caluclated as weighted average of regional datasets of the same activityName
- Aluminium III [air, urban air close to ground]: 1.00527e-9 kg; lognormal variance with pedigree 0.7006, pedigree (2,5,1,5,4)
  Caluclated as weighted average of regional datasets of the same activityName
- Ammonia [air, urban air close to ground]: 1.30854e-7 kg; lognormal variance with pedigree 0.1406, pedigree (2,5,1,5,4)
  Caluclated as weighted average of regional datasets of the same activityName
- Antimony ion [air, urban air close to ground]: 1.48442e-13 kg; lognormal variance with pedigree 0.7006, pedigree (2,5,1,5,4)
  Caluclated as weighted average of regional datasets of the same activityName
- Arsenic ion [air, urban air close to ground]: 1.52786e-10 kg; lognormal variance with pedigree 0.1406, pedigree (2,5,1,5,4)
  Caluclated as weighted average of regional datasets of the same activityName
- Barium II [air, urban air close to ground]: 1.18377e-11 kg; lognormal variance with pedigree 0.7006, pedigree (2,5,1,5,4)
  Caluclated as weighted average of regional datasets of the same activityName
- Benzene [air, urban air close to ground]: 8.47496e-8 kg; lognormal variance with pedigree 0.1406, pedigree (2,5,1,5,4)
  Caluclated as weighted average of regional datasets of the same activityName
- Benzene, ethyl- [air, urban air close to ground]: 2.26583e-9 kg; lognormal variance with pedigree 0.1406, pedigree (2,5,1,5,4)
  Caluclated as weighted average of regional datasets of the same activityName
- Benzene, hexachloro- [air, urban air close to ground]: 5.43799e-16 kg; lognormal variance with pedigree 0.1406, pedigree (2,5,1,5,4)
  Caluclated as weighted average of regional datasets of the same activityName
- Benzo(a)pyrene [air, urban air close to ground]: 3.83499e-11 kg; lognormal variance with pedigree 0.1406, pedigree (2,5,1,5,4)
  Caluclated as weighted average of regional datasets of the same activityName
- Beryllium II [air, urban air close to ground]: 1.18377e-13 kg; lognormal variance with pedigree 0.7006, pedigree (2,5,1,5,4)
  Caluclated as weighted average of regional datasets of the same activityName
- Boron [air, urban air close to ground]: 4.45325e-11 kg; lognormal variance with pedigree 0.7006, pedigree (2,5,1,5,4)
  Caluclated as weighted average of regional datasets of the same activityName
- Bromine [air, urban air close to ground]: 4.53255e-9 kg; lognormal variance with pedigree 0.1406, pedigree (2,5,1,5,4)
  Caluclated as weighted average of regional datasets of the same activityName
- Butane [air, urban air close to ground]: 2.82086e-8 kg; lognormal variance with pedigree 0.4006, pedigree (2,5,1,5,4)
  Caluclated as weighted average of regional datasets of the same activityName
- Cadmium II [air, urban air close to ground]: 5.30178e-11 kg; lognormal variance with pedigree 0.7006, pedigree (2,5,1,5,4)
  Caluclated as weighted average of regional datasets of the same activityName
- Calcium [air, urban air close to ground]: 4.42589e-7 kg; lognormal variance with pedigree 0.4006, pedigree (2,5,1,5,4)
  Caluclated as weighted average of regional datasets of the same activityName
- Carbon dioxide, fossil [air, urban air close to ground]: 0.00136616 kg; lognormal variance with pedigree 0.0512, pedigree (2,5,1,5,4)
  Caluclated as weighted average of regional datasets of the same activityName
- Carbon dioxide, non-fossil [air, urban air close to ground]: 0.0249537 kg; lognormal variance with pedigree 0.0027, pedigree (1,2,1,5,1)
  Caluclated as weighted average of regional datasets of the same activityName
- Carbon monoxide, fossil [air, urban air close to ground]: 7.89096e-8 kg; lognormal variance with pedigree 0.7006, pedigree (2,5,1,5,4)
  Caluclated as weighted average of regional datasets of the same activityName
- Carbon monoxide, non-fossil [air, urban air close to ground]: 2.1909e-5 kg; lognormal variance with pedigree 0.7006, pedigree (2,5,1,5,4)
  Caluclated as weighted average of regional datasets of the same activityName
- Chlorine [air, urban air close to ground]: 1.3595e-8 kg; lognormal variance with pedigree 0.4006, pedigree (2,5,1,5,4)
  Caluclated as weighted average of regional datasets of the same activityName
- Chromium III [air, urban air close to ground]: 3.29716e-10 kg; lognormal variance with pedigree 0.7006, pedigree (2,5,1,5,4)
  Caluclated as weighted average of regional datasets of the same activityName
- Chromium VI [air, urban air close to ground]: 3.57029e-12 kg; lognormal variance with pedigree 0.7006, pedigree (2,5,1,5,4)
  Caluclated as weighted average of regional datasets of the same activityName
- Cobalt II [air, urban air close to ground]: 1.90381e-10 kg; lognormal variance with pedigree 0.7006, pedigree (2,5,1,5,4)
  Caluclated as weighted average of regional datasets of the same activityName
- Copper ion [air, urban air close to ground]: 2.37784e-9 kg; lognormal variance with pedigree 0.7006, pedigree (2,5,1,5,4)
  Caluclated as weighted average of regional datasets of the same activityName
- Dinitrogen monoxide [air, urban air close to ground]: 1.82939e-7 kg; lognormal variance with pedigree 0.1406, pedigree (2,5,1,5,4)
  Caluclated as weighted average of regional datasets of the same activityName
- Dioxins, measured as 2,3,7,8-tetrachlorodibenzo-p-dioxin [air, urban air close to ground]: 2.34742e-15 kg; lognormal variance with pedigree 0.1406, pedigree (2,5,1,5,4)
  Caluclated as weighted average of regional datasets of the same activityName
- Ethane [air, urban air close to ground]: 1.40925e-10 kg; lognormal variance with pedigree 0.0906, pedigree (2,5,1,5,4)
  Caluclated as weighted average of regional datasets of the same activityName
- Ethanol [air, urban air close to ground]: 1.72804e-9 kg; lognormal variance with pedigree 0.1406, pedigree (2,5,1,5,4)
  Caluclated as weighted average of regional datasets of the same activityName
- Ethylene [air, urban air close to ground]: 2.81851e-10 kg; lognormal variance with pedigree 0.0906, pedigree (2,5,1,5,4)
  Caluclated as weighted average of regional datasets of the same activityName
- Ethyne [air, urban air close to ground]: 4.69752e-11 kg; lognormal variance with pedigree 0.0906, pedigree (2,5,1,5,4)
  Caluclated as weighted average of regional datasets of the same activityName
- Fluorine [air, urban air close to ground]: 3.77638e-9 kg; lognormal variance with pedigree 0.1406, pedigree (2,5,1,5,4)
  Caluclated as weighted average of regional datasets of the same activityName
- Formaldehyde [air, urban air close to ground]: 1.72083e-8 kg; lognormal variance with pedigree 0.1406, pedigree (2,5,1,5,4)
  Caluclated as weighted average of regional datasets of the same activityName
- Hydrocarbons, aliphatic, alkanes, unspecified [air, urban air close to ground]: 7.26601e-8 kg; lognormal variance with pedigree 0.1406, pedigree (2,5,1,5,4)
  Caluclated as weighted average of regional datasets of the same activityName
- Hydrocarbons, aliphatic, unsaturated [air, urban air close to ground]: 2.34355e-7 kg; lognormal variance with pedigree 0.1406, pedigree (2,5,1,5,4)
  Caluclated as weighted average of regional datasets of the same activityName
- Hydrocarbons, aromatic [air, urban air close to ground]: 8.90698e-10 kg; lognormal variance with pedigree 0.1406, pedigree (2,5,1,5,4)
  Caluclated as weighted average of regional datasets of the same activityName
- Hydrochloric acid [air, urban air close to ground]: 1.21832e-8 kg; lognormal variance with pedigree 0.1406, pedigree (2,5,1,5,4)
  Caluclated as weighted average of regional datasets of the same activityName
- Hydrogen fluoride [air, urban air close to ground]: 4.02867e-10 kg; lognormal variance with pedigree 0.1406, pedigree (2,5,1,5,4)
  Caluclated as weighted average of regional datasets of the same activityName
- Hydrogen sulfide [air, urban air close to ground]: 1.61762e-7 kg; lognormal variance with pedigree 0.0421, pedigree (1,2,1,5,1)
  Caluclated as weighted average of regional datasets of the same activityName
- Iodine [air, urban air close to ground]: 1.07103e-12 kg; lognormal variance with pedigree 0.7006, pedigree (2,5,1,5,4)
  Caluclated as weighted average of regional datasets of the same activityName
- Iron ion [air, urban air close to ground]: 5.13856e-9 kg; lognormal variance with pedigree 0.7006, pedigree (2,5,1,5,4)
  Caluclated as weighted average of regional datasets of the same activityName
- Lead II [air, urban air close to ground]: 2.73053e-9 kg; lognormal variance with pedigree 0.7006, pedigree (2,5,1,5,4)
  Caluclated as weighted average of regional datasets of the same activityName
- Lead-210 [air, urban air close to ground]: 4.36869e-9 kBq; lognormal variance with pedigree 0.7006, pedigree (2,5,1,5,4)
  Caluclated as weighted average of regional datasets of the same activityName
- Magnesium [air, urban air close to ground]: 2.7546e-8 kg; lognormal variance with pedigree 0.7006, pedigree (2,5,1,5,4)
  Caluclated as weighted average of regional datasets of the same activityName
- Manganese II [air, urban air close to ground]: 1.28418e-8 kg; lognormal variance with pedigree 0.7006, pedigree (2,5,1,5,4)
  Caluclated as weighted average of regional datasets of the same activityName
- Mercury II [air, urban air close to ground]: 2.54307e-11 kg; lognormal variance with pedigree 0.7006, pedigree (2,5,1,5,4)
  Caluclated as weighted average of regional datasets of the same activityName
- Methane, fossil [air, urban air close to ground]: 4.89436e-8 kg; lognormal variance with pedigree 0.1406, pedigree (2,5,1,5,4)
  Caluclated as weighted average of regional datasets of the same activityName
- Methane, non-fossil [air, urban air close to ground]: 2.76544e-7 kg; lognormal variance with pedigree 0.1406, pedigree (2,5,1,5,4)
  Caluclated as weighted average of regional datasets of the same activityName
- Methanol [air, urban air close to ground]: 2.93766e-9 kg; lognormal variance with pedigree 0.1406, pedigree (2,5,1,5,4)
  Caluclated as weighted average of regional datasets of the same activityName
- Molybdenum VI [air, urban air close to ground]: 4.65263e-11 kg; lognormal variance with pedigree 0.7006, pedigree (2,5,1,5,4)
  Caluclated as weighted average of regional datasets of the same activityName
- NMVOC, non-methane volatile organic compounds [air, urban air close to ground]: 5.28855e-7 kg; lognormal variance with pedigree 0.1406, pedigree (2,5,1,5,4)
  Caluclated as weighted average of regional datasets of the same activityName
- Nickel II [air, urban air close to ground]: 3.27741e-9 kg; lognormal variance with pedigree 0.7006, pedigree (2,5,1,5,4)
  Caluclated as weighted average of regional datasets of the same activityName
- Nitrogen oxides [air, urban air close to ground]: 1.49021e-5 kg; lognormal variance with pedigree 0.0421, pedigree (1,2,1,5,1)
  Caluclated as weighted average of regional datasets of the same activityName
- PAH, polycyclic aromatic hydrocarbons [air, urban air close to ground]: 1.24119e-9 kg; lognormal variance with pedigree 0.1406, pedigree (2,5,1,5,4)
  Caluclated as weighted average of regional datasets of the same activityName
- Particulate Matter, < 2.5 um [air, unspecified]: 4.06267e-6 kg; lognormal variance with pedigree 0.3021, pedigree (1,2,1,5,1)
  Caluclated as weighted average of regional datasets of the same activityName
- Particulate Matter, > 10 um [air, urban air close to ground]: 1.47638e-8 kg; lognormal variance with pedigree 0.0906, pedigree (2,5,1,5,4)
  Caluclated as weighted average of regional datasets of the same activityName
- Particulate Matter, > 2.5 um and < 10um [air, unspecified]: 1.9761e-7 kg; lognormal variance with pedigree 0.1706, pedigree (2,5,1,5,4)
  Caluclated as weighted average of regional datasets of the same activityName
- Pentane [air, urban air close to ground]: 4.80641e-8 kg; lognormal variance with pedigree 0.1406, pedigree (2,5,1,5,4)
  Caluclated as weighted average of regional datasets of the same activityName
- Phenol, pentachloro- [air, urban air close to ground]: 6.11774e-13 kg; lognormal variance with pedigree 0.1406, pedigree (2,5,1,5,4)
  Caluclated as weighted average of regional datasets of the same activityName
- Phosphorus [air, urban air close to ground]: 2.26642e-8 kg; lognormal variance with pedigree 0.1406, pedigree (2,5,1,5,4)
  Caluclated as weighted average of regional datasets of the same activityName
- Polonium-210 [air, urban air close to ground]: 7.98578e-9 kBq; lognormal variance with pedigree 0.7006, pedigree (2,5,1,5,4)
  Caluclated as weighted average of regional datasets of the same activityName
- Potassium I [air, urban air close to ground]: 1.76747e-6 kg; lognormal variance with pedigree 0.7006, pedigree (2,5,1,5,4)
  Caluclated as weighted average of regional datasets of the same activityName
- Potassium-40 [air, urban air close to ground]: 1.26833e-9 kBq; lognormal variance with pedigree 0.7006, pedigree (2,5,1,5,4)
  Caluclated as weighted average of regional datasets of the same activityName
- Propane [air, urban air close to ground]: 8.26418e-9 kg; lognormal variance with pedigree 0.1406, pedigree (2,5,1,5,4)
  Caluclated as weighted average of regional datasets of the same activityName
- Propene [air, urban air close to ground]: 4.69752e-11 kg; lognormal variance with pedigree 0.0906, pedigree (2,5,1,5,4)
  Caluclated as weighted average of regional datasets of the same activityName
- Propionic acid [air, urban air close to ground]: 7.97955e-10 kg; lognormal variance with pedigree 0.1406, pedigree (2,5,1,5,4)
  Caluclated as weighted average of regional datasets of the same activityName
- Radium-226 [air, urban air close to ground]: 1.1274e-9 kBq; lognormal variance with pedigree 0.7006, pedigree (2,5,1,5,4)
  Caluclated as weighted average of regional datasets of the same activityName
- Radium-228 [air, urban air close to ground]: 6.10677e-9 kBq; lognormal variance with pedigree 0.7006, pedigree (2,5,1,5,4)
  Caluclated as weighted average of regional datasets of the same activityName
- Radon-220 [air, urban air close to ground]: 9.39503e-11 kBq; lognormal variance with pedigree 0.7006, pedigree (2,5,1,5,4)
  Caluclated as weighted average of regional datasets of the same activityName
- Radon-222 [air, urban air close to ground]: 9.39503e-11 kBq; lognormal variance with pedigree 0.7006, pedigree (2,5,1,5,4)
  Caluclated as weighted average of regional datasets of the same activityName
- Scandium [air, urban air close to ground]: 1.18377e-13 kg; lognormal variance with pedigree 0.7006, pedigree (2,5,1,5,4)
  Caluclated as weighted average of regional datasets of the same activityName
- Selenium IV [air, urban air close to ground]: 7.00122e-11 kg; lognormal variance with pedigree 0.7006, pedigree (2,5,1,5,4)
  Caluclated as weighted average of regional datasets of the same activityName
- Silicon [air, urban air close to ground]: 1.48442e-9 kg; lognormal variance with pedigree 0.7006, pedigree (2,5,1,5,4)
  Caluclated as weighted average of regional datasets of the same activityName
- Sodium [air, urban air close to ground]: 1.02565e-7 kg; lognormal variance with pedigree 0.7006, pedigree (2,5,1,5,4)
  Caluclated as weighted average of regional datasets of the same activityName
- Strontium [air, urban air close to ground]: 1.78506e-11 kg; lognormal variance with pedigree 0.7006, pedigree (2,5,1,5,4)
  Caluclated as weighted average of regional datasets of the same activityName
- Sulfur dioxide [air, urban air close to ground]: 3.01515e-6 kg; lognormal variance with pedigree 0.0027, pedigree (1,2,1,5,1)
  Caluclated as weighted average of regional datasets of the same activityName
- Sulfur oxides [air, unspecified]: 2.17906e-6 kg; lognormal variance with pedigree 0.0027, pedigree (1,2,1,5,1)
  Caluclated as weighted average of regional datasets of the same activityName
- Thallium I [air, urban air close to ground]: 1.48442e-13 kg; lognormal variance with pedigree 0.7006, pedigree (2,5,1,5,4)
  Caluclated as weighted average of regional datasets of the same activityName
- Thorium [air, urban air close to ground]: 1.78506e-13 kg; lognormal variance with pedigree 0.7006, pedigree (2,5,1,5,4)
  Caluclated as weighted average of regional datasets of the same activityName
- Thorium-228 [air, urban air close to ground]: 5.16727e-10 kBq; lognormal variance with pedigree 0.7006, pedigree (2,5,1,5,4)
  Caluclated as weighted average of regional datasets of the same activityName
- Thorium-232 [air, urban air close to ground]: 3.28826e-10 kBq; lognormal variance with pedigree 0.7006, pedigree (2,5,1,5,4)
  Caluclated as weighted average of regional datasets of the same activityName
- Tin ion [air, urban air close to ground]: 5.93766e-14 kg; lognormal variance with pedigree 0.7006, pedigree (2,5,1,5,4)
  Caluclated as weighted average of regional datasets of the same activityName
- Titanium ion [air, urban air close to ground]: 3.56072e-11 kg; lognormal variance with pedigree 0.7006, pedigree (2,5,1,5,4)
  Caluclated as weighted average of regional datasets of the same activityName
- Toluene [air, urban air close to ground]: 3.08467e-8 kg; lognormal variance with pedigree 0.1406, pedigree (2,5,1,5,4)
  Caluclated as weighted average of regional datasets of the same activityName
- Uranium [air, urban air close to ground]: 2.37694e-13 kg; lognormal variance with pedigree 0.7006, pedigree (2,5,1,5,4)
  Caluclated as weighted average of regional datasets of the same activityName
- Uranium-238 [air, urban air close to ground]: 9.39503e-10 kBq; lognormal variance with pedigree 0.7006, pedigree (2,5,1,5,4)
  Caluclated as weighted average of regional datasets of the same activityName
- Vanadium V [air, urban air close to ground]: 5.76369e-9 kg; lognormal variance with pedigree 0.7006, pedigree (2,5,1,5,4)
  Caluclated as weighted average of regional datasets of the same activityName
- Water [air, unspecified]: 8.01354e-6 m3; lognormal variance with pedigree 0.0446, pedigree (3,3,1,5,1)
  Caluclated as weighted average of regional datasets of the same activityName
- Xylene [air, urban air close to ground]: 9.39503e-12 kg; lognormal variance with pedigree 0.1006, pedigree (2,5,1,5,4)
  Caluclated as weighted average of regional datasets of the same activityName
- Zinc II [air, urban air close to ground]: 2.35979e-8 kg; lognormal variance with pedigree 0.7006, pedigree (2,5,1,5,4)
  Caluclated as weighted average of regional datasets of the same activityName
- m-Xylene [air, urban air close to ground]: 9.06332e-9 kg; lognormal variance with pedigree 0.1406, pedigree (2,5,1,5,4)
  Caluclated as weighted average of regional datasets of the same activityName
- AOX, Adsorbable Organic Halogen [water, surface water]: 7.20175e-7 kg; lognormal variance with pedigree 0.0421, pedigree (1,2,1,5,1)
  Caluclated as weighted average of regional datasets of the same activityName
- BOD5, Biological Oxygen Demand [water, surface water]: 3.11623e-6 kg; lognormal variance with pedigree 0.0421, pedigree (1,2,1,5,1)
  Caluclated as weighted average of regional datasets of the same activityName
- COD, Chemical Oxygen Demand [water, surface water]: 8.27887e-5 kg; lognormal variance with pedigree 0.0421, pedigree (1,2,1,5,1)
  Caluclated as weighted average of regional datasets of the same activityName
- DOC, Dissolved Organic Carbon [water, surface water]: 3.06625e-5 kg; lognormal variance with pedigree 0.0432, pedigree (2,3,1,5,1)
  Caluclated as weighted average of regional datasets of the same activityName
- Nitrogen [water, surface water]: 1.38119e-6 kg; lognormal variance with pedigree 0.0421, pedigree (1,2,1,5,1)
  Caluclated as weighted average of regional datasets of the same activityName
- Phosphorus [water, surface water]: 4.59277e-7 kg; lognormal variance with pedigree 0.0421, pedigree (1,2,1,5,1)
  Caluclated as weighted average of regional datasets of the same activityName
- Suspended solids, unspecified [water, surface water]: 6.51184e-6 kg; lognormal variance with pedigree 0.0421, pedigree (1,2,1,5,1)
  Caluclated as weighted average of regional datasets of the same activityName
- TOC, Total Organic Carbon [water, surface water]: 3.06625e-5 kg; lognormal variance with pedigree 0.0432, pedigree (2,3,1,5,1)
  Caluclated as weighted average of regional datasets of the same activityName
- Water [water, unspecified]: 0.000378266 m3; lognormal variance with pedigree 0.0421, pedigree (1,2,1,5,1)
  Caluclated as weighted average of regional datasets of the same activityName

## Extrapolations
This dataset was built as a weighted average of regional datasets of the same activityName. Weights are based on production volumes. RLA: production volume = 2.33e+10 kg/year, weight = 0.9007 RER: production volume = 2.57e+09 kg/year, weight = 0.09932
