# treatment of digester sludge, municipal incineration, future

Dataset: EcoSpold 2, unit process
Geography: CH
Time period: 2010-01-01 to 2022-12-31
Technology level: current
Classification: ISIC rev.4 ecoinvent: 3821:Treatment and disposal of non-hazardous waste
Classification: EcoSpold01Categories: waste management/municipal incineration
Synonyms: fermented sewage sludge; Vergärter Klärschlamm der Kläranlage; Gärschlamm
Tags: Treatment; ConvertedDataset
Scenario: Business-as-Usual
System model: Allocation, cut-off by classification
Generated by: Gabor Doka (obsolete)
Published in: Jungbluth N. 2007
Database: ecoinvent
isCopyrightProtected: true

## General comment
Incinerated amount = 0.1793 kg. Functional unit refers to 1 kilogram wet sludge with 95% water. Incinerated waste contains 100% digested sludge, 73% H2O; .
waste composition (wet, in ppm): upper heating value 4.257 MJ/kg; lower heating value 2.421 MJ/kg; H2O 730000; O 51118; H 11618; C 92941; S 6170.9; N 5783.7; P 8623.9; B n.a.; Cl n.a.; Br n.a.; F n.a.; I n.a.; Ag n.a.; As 0.77881; Ba n.a.; Cd 0.5542; Co 3.1948; Cr 24.157; Cu 111.2; Hg 0.5542; Mn 104.67; Mo 1.8908; Ni 10.399; Pb 30.807; Sb n.a.; Se n.a.; Sn 7.9304; V n.a.; Zn 302.95; Be n.a.; Sc n.a.; Sr n.a.; Ti n.a.; Tl n.a.; W n.a.; Si 11784; Fe 53213; Ca 19996; Al 5907.2; K n.a.; Mg 2245; Na n.a.;
Share of carbon in waste that is biogenic 100%.
Share of iron in waste that is metallic/recyclable 0%.
Net energy produced in MSWI: 0.04MJ/kg waste electric energy and 1.26MJ/kg waste thermal energy

One kg of this waste produces 0.1543 kg of slag and 0.02427 kg of residues, which are landfilled. Additional solidification with 0.009707 kg of cement.
[This dataset was already contained in the ecoinvent database version 2. It was not individually updated during the transfer to ecoinvent version 3. Life Cycle Impact Assessment results may still have changed, as they are affected by changes in the supply chain, i.e. in other datasets. This dataset was generated following the ecoinvent quality guidelines for version 2. It may have been subject to central changes described in the ecoinvent version 3 change report (http://www.ecoinvent.org/database/ecoinvent-version-3/reports-of-changes/), and the results of the central updates were reviewed extensively. The changes added e.g. consistent water flows and other information throughout the database. The documentation of this dataset can be found in the ecoinvent reports of version 2, which are still available via the ecoinvent website. The change report linked above covers all central changes that were made during the conversion process.]

## Included activities end
dewatering of sludge. treatment of dewatering liquid. transport of dewatered sludge to incinerator. waste-specific air and water emisions from incineration, auxiliary material consumption for flue gas cleaning. Short-term emissions to river water and long-term emisisons to ground water from slag compartment (from bottom slag) and residual material landfill (from solidified fly ashes and scrubber slugde). Process energy demands for (future) MSWI.

## Geography
Based on planing data for modernisation of a Swiss MSWI plant

## Technology
Based on average Swiss MSWI plants in 2000 (grate incinerators) with electrostatic precipitator for fly ash (ESP), wet flue gas scrubber and 29.4% SNCR , 32.2% SCR-high dust , 24.6% SCR-low dust -DeNOx facilities and 13.8% without Denox (by burnt waste, according to Swiss average). Modernised (future) energy production. Gross electric efficiency technology mix 16.7% and Gross thermal efficiency technology mix 56.3%

## Time period
Waste composition as given in literature reference. Transfer coefficients for modern Swiss MSWI. Emission speciation based on early 90ies data.

## Reference product
- heat, future: 1 MJ; By-product classification allocatable product; CPC 17300: Steam and hot water
  production volume 0 MJ
    Calculated from the production volume of digester sludge in proportion to the respective output amounts.
  property exergy 0.1842 MJ
    This exergy property is based on the exergy content of the product.
  property price 0.0106 EUR2005
    Average European district heat price from Ecoheatcool and Euroheat 2005-2006, Ecoheat Work package 1: The European heat market. Final report. 10.6 EUR/GJ i s the price of district heat. http://www.solarthermalworld.org/files/Ecoheatcool%20WP1%20Web.pdf?download
  properties: allocation factor 0.840207, carbon allocation 0 kg, carbon content 0, heating value, net 1 MJ, true value 0.00219711, true value relation 0.1842

## Inputs from technosphere
- aluminium sulfate, powder: 6.37272e-5 kg; lognormal variance with pedigree 0.0502, pedigree (1,1,2,1,1)
  burden from treatment of dewatering liquid, uncertainty calculated from waste composition and treatment model
  properties: dry mass 1 kg, wet mass 1 kg
- ammonia, anhydrous, liquid: 0.000194177 kg; lognormal variance with pedigree 1.3502, pedigree (1,1,2,1,1)
  burden from municipal incineration, uncertainty calculated from waste composition and treatment model
  properties: dry mass 1 kg, wet mass 1 kg
- cement, unspecified: 0.00645994 kg; lognormal variance with pedigree 0.0502, pedigree (1,1,2,1,1)
  (same comment as for ammonia, anhydrous, liquid)
  properties: dry mass 1 kg, wet mass 1 kg
- chemical, inorganic: 2.96713e-6 kg; lognormal variance with pedigree 0.1302, pedigree (1,1,2,1,1)
  (same comment as for ammonia, anhydrous, liquid)
  properties: carbon content, fossil 0.003, dry mass 1 kg, wet mass 1 kg
  note on carbon content, fossil: This dataset is an unweighted average of 20 inorganic substances (listed in Tab 88.1, ecoinvent v2.2 report 8, part II), being part of the top100 chemicals included in this database. The C-content has also been calculated as an unweighted average of the C content of the substances composing this dataset.
- chemical, organic: 0.000976524 kg; lognormal variance with pedigree 0.0002, pedigree (1,1,2,1,1)
  burden from dewatering process, municipal incineration, uncertainty calculated from waste composition and treatment model
  properties: carbon content, fossil 0.628, dry mass 1 kg, heating value, net 19.03 MJ, wet mass 1 kg
  note on carbon content, fossil: This dataset is an unweighted average of 20 organic substances (listed in Tab 88.1, ecoinvent v2.2 report 8, part II), being part of the top100 chemicals included in this database. The C-content has also been calculated as an unweighted average of the C content of the substances composing this dataset.
- chromium oxide, flakes: 1.13433e-7 kg; lognormal variance with pedigree 2.0602, pedigree (1,1,2,1,1)
  (same comment as for ammonia, anhydrous, liquid)
  properties: dry mass 1 kg, wet mass 1 kg
- digester sludge: 3.71133 kg
  production volume
    future
  properties: carbon content, non-fossil 0.3444, dry mass 0.05 kg, heating value, net 2.42 MJ, water content 19, wet mass 1 kg
  note on heating value, net: Value taken from the general comment of the treatment dataset.
- electricity, low voltage: 0.0201492 kWh; lognormal variance with pedigree 0.0302, pedigree (1,1,2,1,1)
  burden from dewatering process, treatment of dewatering liquid, uncertainty calculated from waste composition and treatment model
- heat, district or industrial, natural gas: 0.017043 MJ; lognormal variance with pedigree 1.3502, pedigree (1,1,2,1,1)
  (same comment as for ammonia, anhydrous, liquid)
  properties: heating value, net 1 MJ
- hydrochloric acid, without water, in 30% solution state: 1.78029e-6 kg; lognormal variance with pedigree 0.1302, pedigree (1,1,2,1,1)
  (same comment as for ammonia, anhydrous, liquid)
  properties: dry mass 1 kg, heating value, net 3.32 MJ, wet mass 1 kg
- iron (III) chloride, without water, in 40% solution state: 0.0049858 kg; lognormal variance with pedigree 0.0002, pedigree (1,1,2,1,1)
  burden from dewatering process, treatment of dewatering liquid, municipal incineration, uncertainty calculated from waste composition and treatment model
  properties: dry mass 1 kg, wet mass 1 kg
- iron sulfate: 0.000235795 kg; lognormal variance with pedigree 0.0502, pedigree (1,1,2,1,1)
  (same comment as for aluminium sulfate, powder)
  properties: dry mass 1 kg, wet mass 1 kg
- municipal waste incineration facility: 1.66368e-10 unit; lognormal variance with pedigree 0.0002, pedigree (1,1,2,1,1)
  (same comment as for ammonia, anhydrous, liquid)
- process-specific burdens, municipal waste incineration: 0.665478 kg; lognormal variance with pedigree 0.0002, pedigree (1,1,2,1,1)
  burden from municipal incineration, uncertainty calculated from waste composition and treatment model;activityLink introduced to establish a direct link to the corresponding regional supply of this product
- process-specific burdens, residual material landfill: 0.0161502 kg; lognormal variance with pedigree 0.0402, pedigree (1,1,2,1,1)
  (same comment as for process-specific burdens, municipal waste incineration)
- process-specific burdens, slag landfill: 0.102663 kg; lognormal variance with pedigree 0.0602, pedigree (1,1,2,1,1)
  (same comment as for process-specific burdens, municipal waste incineration)
- pump station: 3.71133e-11 unit; lognormal variance with pedigree 0.0002, pedigree (1,1,2,1,1)
  burden from dewatering process, uncertainty calculated from waste composition and treatment model
  This exchange has an activity link directly to the producing activity because the product is primarily consumed in the same geographical area where it is produced.
- quicklime, milled, packed: 0.00866409 kg; lognormal variance with pedigree 0.0002, pedigree (1,1,2,1,1)
  (same comment as for chemical, organic)
  properties: dry mass 0.99 kg, water content 0.010101, wet mass 1 kg
- residual material landfill: 3.36462e-11 unit; lognormal variance with pedigree 0.0402, pedigree (1,1,2,1,1)
  (same comment as for ammonia, anhydrous, liquid)
- slag landfill: 1.82512e-10 unit; lognormal variance with pedigree 0.0602, pedigree (1,1,2,1,1)
  (same comment as for ammonia, anhydrous, liquid)
- sodium hydroxide, without water, in 50% solution state: 0.00152573 kg; lognormal variance with pedigree 0.2402, pedigree (1,1,2,1,1)
  (same comment as for ammonia, anhydrous, liquid)
  properties: dry mass 1 kg, heating value, net 3.03 MJ, wet mass 1 kg
- titanium dioxide: 5.55846e-6 kg; lognormal variance with pedigree 2.0602, pedigree (1,1,2,1,1)
  (same comment as for ammonia, anhydrous, liquid)
  properties: dry mass 1 kg, wet mass 1 kg
- waste cement, hydrated: -0.0161502 kg; lognormal variance with pedigree 0.05, pedigree (1,1,1,1,1)
  (same comment as for ammonia, anhydrous, liquid)
  production volume
    (same comment as for heat, future)
  properties: dry mass 1 kg, wet mass 1 kg
- waste graphical paper: -4.72118e-5 kg
  (same comment as for aluminium sulfate, powder)
  production volume
    (same comment as for heat, future)
  properties: carbon content, non-fossil 0.454955, dry mass 0.888 kg, heating value, net 14.12 MJ, water content 0.126126, wet mass 1 kg
- waste plastic, mixture: -4.72118e-5 kg
  (same comment as for aluminium sulfate, powder)
  production volume
    (same comment as for heat, future)
  properties: carbon content, fossil 0.747344, dry mass 0.847 kg, heating value, net 30.79 MJ, water content 0.180638, wet mass 1 kg
  note on carbon content, fossil: C content in 1 kg DM was calculated using data in Tab A.2, ecoinvent v2.2 report 13_I
- wastewater treatment facility, capacity 5E9l/year: 1.73252e-11 unit; lognormal variance with pedigree 0.0002, pedigree (1,1,2,1,1)
  (same comment as for aluminium sulfate, powder)

## Emissions to nature
- Aluminium III [air, urban air close to ground]: 6.14113e-6 kg; lognormal variance with pedigree 0.4502, pedigree (1,1,2,1,1)
  emission from municipal incineration, uncertainty calculated from waste composition and treatment model
- Ammonia [air, urban air close to ground]: 7.57222e-6 kg; lognormal variance with pedigree 0.7402, pedigree (1,1,2,1,1)
  emission from treatment of dewatering liquid, municipal incineration, uncertainty calculated from waste composition and treatment model
- Arsenic ion [air, urban air close to ground]: 5.28641e-15 kg; lognormal variance with pedigree 1.7202, pedigree (1,1,2,1,1)
  (same comment as for Aluminium III)
- Cadmium II [air, urban air close to ground]: 2.03095e-11 kg; lognormal variance with pedigree 1.6802, pedigree (1,1,2,1,1)
  (same comment as for Aluminium III)
- Calcium [air, urban air close to ground]: 2.2183e-5 kg; lognormal variance with pedigree 0.3102, pedigree (1,1,2,1,1)
  (same comment as for Aluminium III)
- Carbon dioxide, non-fossil [air, urban air close to ground]: 0.228618 kg; lognormal variance with pedigree 0.1202, pedigree (1,1,2,1,1)
  (same comment as for Ammonia)
- Carbon monoxide, non-fossil [air, urban air close to ground]: 0.000153126 kg; lognormal variance with pedigree 0.6302, pedigree (1,1,2,1,1)
  (same comment as for Ammonia)
- Chromium III [air, urban air close to ground]: 1.18866e-12 kg; lognormal variance with pedigree 1.2402, pedigree (1,1,2,1,1)
  (same comment as for Aluminium III)
- Cobalt II [air, urban air close to ground]: 6.75016e-14 kg; lognormal variance with pedigree 1.5202, pedigree (1,1,2,1,1)
  (same comment as for Aluminium III)
- Copper ion [air, urban air close to ground]: 5.4627e-10 kg; lognormal variance with pedigree 1.0002, pedigree (1,1,2,1,1)
  (same comment as for Aluminium III)
- Cyanide [air, urban air close to ground]: 3.464e-6 kg; lognormal variance with pedigree 1.4602, pedigree (1,1,2,1,1)
  (same comment as for Aluminium III)
- Dinitrogen monoxide [air, urban air close to ground]: 2.53064e-5 kg; lognormal variance with pedigree 1.1102, pedigree (1,1,2,1,1)
  (same comment as for Ammonia)
- Iron ion [air, urban air close to ground]: 1.18221e-6 kg; lognormal variance with pedigree 0.2202, pedigree (1,1,2,1,1)
  (same comment as for Aluminium III)
- Lead II [air, urban air close to ground]: 7.60971e-10 kg; lognormal variance with pedigree 1.1602, pedigree (1,1,2,1,1)
  (same comment as for Aluminium III)
- Magnesium [air, urban air close to ground]: 2.05719e-6 kg; lognormal variance with pedigree 0.5702, pedigree (1,1,2,1,1)
  (same comment as for Aluminium III)
- Manganese II [air, urban air close to ground]: 3.79261e-13 kg; lognormal variance with pedigree 1.0702, pedigree (1,1,2,1,1)
  (same comment as for Aluminium III)
- Mercury II [air, urban air close to ground]: 1.27376e-14 kg; lognormal variance with pedigree 1.7502, pedigree (1,1,2,1,1)
  (same comment as for Aluminium III)
- Methane, non-fossil [air, urban air close to ground]: 1.99814e-5 kg; lognormal variance with pedigree 0.0302, pedigree (1,1,2,1,1)
  (same comment as for Ammonia)
- Molybdenum VI [air, urban air close to ground]: 2.51658e-9 kg; lognormal variance with pedigree 1.5102, pedigree (1,1,2,1,1)
  (same comment as for Aluminium III)
- NMVOC, non-methane volatile organic compounds [air, urban air close to ground]: 7.15173e-8 kg; lognormal variance with pedigree 0.1602, pedigree (1,1,2,1,1)
  emission from treatment of dewatering liquid, uncertainty calculated from waste composition and treatment model
- Nickel II [air, urban air close to ground]: 2.9868e-13 kg; lognormal variance with pedigree 1.3602, pedigree (1,1,2,1,1)
  (same comment as for Aluminium III)
- Nitrogen oxides [air, urban air close to ground]: 0.000163161 kg; lognormal variance with pedigree 1.2302, pedigree (1,1,2,1,1)
  (same comment as for Ammonia)
- Phosphorus [air, urban air close to ground]: 5.73883e-6 kg; lognormal variance with pedigree 0.4002, pedigree (1,1,2,1,1)
  (same comment as for Aluminium III)
- Silicon [air, urban air close to ground]: 1.82568e-5 kg; lognormal variance with pedigree 0.3702, pedigree (1,1,2,1,1)
  (same comment as for Aluminium III)
- Sulfur dioxide [air, urban air close to ground]: 1.74948e-5 kg; lognormal variance with pedigree 0.4402, pedigree (1,1,2,1,1)
  (same comment as for Aluminium III)
- Tin ion [air, urban air close to ground]: 7.00068e-9 kg; lognormal variance with pedigree 1.3202, pedigree (1,1,2,1,1)
  (same comment as for Aluminium III)
- Water [air, unspecified]: 0.00352576 m3; name water_to_air_unspecified; lognormal variance with pedigree 1.21, pedigree (5,5,5,5,5)
  property fraction, origin: fresh water 0; name fraction_origin_fresh_water
  property fraction, origin: salt water 0; name fraction_origin_salt_water
  property fraction, origin: unspecified 1; name fraction_origin_unspecified
- Zinc II [air, urban air close to ground]: 3.29354e-9 kg; lognormal variance with pedigree 0.8602, pedigree (1,1,2,1,1)
  (same comment as for Aluminium III)
- Aluminium III [water, ground-, long-term]: 0.00290912 kg; lognormal variance with pedigree 0.4002, pedigree (1,1,2,1,1)
  (same comment as for Aluminium III)
- Aluminium III [water, surface water]: 3.27098e-7 kg; lognormal variance with pedigree 0.8602, pedigree (1,1,2,1,1)
  (same comment as for Aluminium III)
- Ammonium [water, surface water]: 0.000993819 kg; lognormal variance with pedigree 0.0502, pedigree (1,1,2,1,1)
  (same comment as for NMVOC, non-methane volatile organic compounds)
- Arsenic ion [water, ground-, long-term]: 2.84622e-7 kg; lognormal variance with pedigree 1.6002, pedigree (1,1,2,1,1)
  (same comment as for Aluminium III)
- Arsenic ion [water, surface water]: 2.3365e-7 kg; lognormal variance with pedigree 1.3502, pedigree (1,1,2,1,1)
  (same comment as for Aluminium III)
- BOD5, Biological Oxygen Demand [water, ground-, long-term]: 0.000499248 kg; lognormal variance with pedigree 0.0902, pedigree (1,1,2,1,1)
  (same comment as for Aluminium III)
- BOD5, Biological Oxygen Demand [water, surface water]: 0.00025783 kg; lognormal variance with pedigree 0.0102, pedigree (1,1,2,1,1)
  (same comment as for Ammonia)
- COD, Chemical Oxygen Demand [water, ground-, long-term]: 0.00152628 kg; lognormal variance with pedigree 0.0902, pedigree (1,1,2,1,1)
  (same comment as for Aluminium III)
- COD, Chemical Oxygen Demand [water, surface water]: 0.000866484 kg; lognormal variance with pedigree 0.0002, pedigree (1,1,2,1,1)
  (same comment as for Ammonia)
- Cadmium II [water, ground-, long-term]: 3.7006e-9 kg; lognormal variance with pedigree 7.3502, pedigree (1,1,2,1,1)
  (same comment as for Aluminium III)
- Cadmium II [water, surface water]: 1.67258e-10 kg; lognormal variance with pedigree 1.6102, pedigree (1,1,2,1,1)
  (same comment as for Aluminium III)
- Calcium II [water, ground-, long-term]: 0.0115801 kg; lognormal variance with pedigree 0.2802, pedigree (1,1,2,1,1)
  (same comment as for Aluminium III)
- Calcium II [water, surface water]: 5.03033e-5 kg; lognormal variance with pedigree 0.7502, pedigree (1,1,2,1,1)
  (same comment as for Aluminium III)
- Chloride [water, surface water]: 0.000211382 kg; lognormal variance with pedigree 0.0502, pedigree (1,1,2,1,1)
  (same comment as for NMVOC, non-methane volatile organic compounds)
- Chromium III [water, surface water]: 5.12349e-8 kg; lognormal variance with pedigree 1.1702, pedigree (1,1,2,1,1)
  (same comment as for Aluminium III)
- Chromium VI [water, ground-, long-term]: 1.70175e-6 kg; lognormal variance with pedigree 1.3702, pedigree (1,1,2,1,1)
  (same comment as for Aluminium III)
- Chromium VI [water, surface water]: 5.2378e-7 kg; lognormal variance with pedigree 1.0802, pedigree (1,1,2,1,1)
  (same comment as for Aluminium III)
- Cobalt II [water, ground-, long-term]: 1.86142e-6 kg; lognormal variance with pedigree 1.3602, pedigree (1,1,2,1,1)
  (same comment as for Aluminium III)
- Cobalt II [water, surface water]: 3.63699e-10 kg; lognormal variance with pedigree 1.8502, pedigree (1,1,2,1,1)
  (same comment as for Aluminium III)
- Copper ion [water, ground-, long-term]: 5.98155e-5 kg; lognormal variance with pedigree 0.9202, pedigree (1,1,2,1,1)
  (same comment as for Aluminium III)
- Copper ion [water, surface water]: 3.00491e-9 kg; lognormal variance with pedigree 1.5702, pedigree (1,1,2,1,1)
  (same comment as for Aluminium III)
- DOC, Dissolved Organic Carbon [water, ground-, long-term]: 0.000603944 kg; lognormal variance with pedigree 0.0902, pedigree (1,1,2,1,1)
  (same comment as for Aluminium III)
- DOC, Dissolved Organic Carbon [water, surface water]: 0.000202553 kg; lognormal variance with pedigree 0.0102, pedigree (1,1,2,1,1)
  (same comment as for Ammonia)
- Iron ion [water, ground-, long-term]: 0.016587 kg; lognormal variance with pedigree 0.9902, pedigree (1,1,2,1,1)
  (same comment as for Aluminium III)
- Iron ion [water, surface water]: 1.21182e-5 kg; lognormal variance with pedigree 0.2002, pedigree (1,1,2,1,1)
  (same comment as for Aluminium III)
- Lead II [water, ground-, long-term]: 1.46067e-6 kg; lognormal variance with pedigree 7.1702, pedigree (1,1,2,1,1)
  (same comment as for Aluminium III)
- Lead II [water, surface water]: 5.71062e-10 kg; lognormal variance with pedigree 1.1302, pedigree (1,1,2,1,1)
  (same comment as for Aluminium III)
- Magnesium [water, ground-, long-term]: 0.00137913 kg; lognormal variance with pedigree 0.5402, pedigree (1,1,2,1,1)
  (same comment as for Aluminium III)
- Magnesium [water, surface water]: 5.23e-6 kg; lognormal variance with pedigree 1.0302, pedigree (1,1,2,1,1)
  (same comment as for Aluminium III)
- Manganese II [water, ground-, long-term]: 5.99788e-5 kg; lognormal variance with pedigree 1.0502, pedigree (1,1,2,1,1)
  (same comment as for Aluminium III)
- Manganese II [water, surface water]: 3.89689e-9 kg; lognormal variance with pedigree 1.7202, pedigree (1,1,2,1,1)
  (same comment as for Aluminium III)
- Mercury II [water, ground-, long-term]: 1.91887e-8 kg; lognormal variance with pedigree 3.4102, pedigree (1,1,2,1,1)
  (same comment as for Aluminium III)
- Mercury II [water, surface water]: 3.94403e-9 kg; lognormal variance with pedigree 1.6102, pedigree (1,1,2,1,1)
  (same comment as for Aluminium III)
- Molybdenum VI [water, ground-, long-term]: 1.04084e-6 kg; lognormal variance with pedigree 1.4902, pedigree (1,1,2,1,1)
  (same comment as for Aluminium III)
- Molybdenum VI [water, surface water]: 2.14908e-7 kg; lognormal variance with pedigree 0.9702, pedigree (1,1,2,1,1)
  (same comment as for Aluminium III)
- Nickel II [water, ground-, long-term]: 6.47961e-6 kg; lognormal variance with pedigree 1.2102, pedigree (1,1,2,1,1)
  (same comment as for Aluminium III)
- Nickel II [water, surface water]: 4.34077e-9 kg; lognormal variance with pedigree 1.8402, pedigree (1,1,2,1,1)
  (same comment as for Aluminium III)
- Nitrate [water, ground-, long-term]: 0.000138266 kg; lognormal variance with pedigree 0.4502, pedigree (1,1,2,1,1)
  (same comment as for Aluminium III)
- Nitrate [water, surface water]: 0.00455974 kg; lognormal variance with pedigree 0.0502, pedigree (1,1,2,1,1)
  (same comment as for Ammonia)
- Nitrogen [water, surface water]: 6.82179e-5 kg; lognormal variance with pedigree 0.0702, pedigree (1,1,2,1,1)
  (same comment as for NMVOC, non-methane volatile organic compounds)
- Phosphate [water, ground-, long-term]: 0.000672121 kg; lognormal variance with pedigree 4.5802, pedigree (1,1,2,1,1)
  (same comment as for Aluminium III)
- Phosphate [water, surface water]: 5.3766e-5 kg; lognormal variance with pedigree 0.0502, pedigree (1,1,2,1,1)
  (same comment as for Ammonia)
- Silicon [water, ground-, long-term]: 0.000680954 kg; lognormal variance with pedigree 5.1402, pedigree (1,1,2,1,1)
  (same comment as for Aluminium III)
- Silicon [water, surface water]: 1.66175e-6 kg; lognormal variance with pedigree 0.6202, pedigree (1,1,2,1,1)
  (same comment as for Aluminium III)
- Sulfate [water, ground-, long-term]: 0.0102997 kg; lognormal variance with pedigree 0.2302, pedigree (1,1,2,1,1)
  (same comment as for Aluminium III)
- Sulfate [water, surface water]: 0.0021967 kg; lognormal variance with pedigree 0.1602, pedigree (1,1,2,1,1)
  (same comment as for Ammonia)
- TOC, Total Organic Carbon [water, ground-, long-term]: 0.000603944 kg; lognormal variance with pedigree 0.0902, pedigree (1,1,2,1,1)
  (same comment as for Aluminium III)
- TOC, Total Organic Carbon [water, surface water]: 0.000202553 kg; lognormal variance with pedigree 0.0002, pedigree (1,1,2,1,1)
  (same comment as for Ammonia)
- Tin ion [water, ground-, long-term]: 2.65286e-6 kg; lognormal variance with pedigree 1.6402, pedigree (1,1,2,1,1)
  (same comment as for Aluminium III)
- Tin ion [water, surface water]: 1.95802e-10 kg; lognormal variance with pedigree 1.3702, pedigree (1,1,2,1,1)
  (same comment as for Aluminium III)
- Zinc II [water, ground-, long-term]: 3.12568e-6 kg; lognormal variance with pedigree 5.4302, pedigree (1,1,2,1,1)
  (same comment as for Aluminium III)
- Zinc II [water, surface water]: 3.70661e-8 kg; lognormal variance with pedigree 0.7202, pedigree (1,1,2,1,1)
  (same comment as for Aluminium III)

## Sampling procedure
waste-specific calculation based on literature data

## Extrapolations
Typical elemental transfer coefficients from current studies for modern MSWI, completed with data from coal power plants and estimates, adapted for inert/burnable waste.

## Review by Niels Jungbluth 2006-08-15
Passed.
none
