# treatment of scrap steel, municipal incineration

Dataset: EcoSpold 2, unit process
Geography: RoW
Time period: 2006-01-01 to 2022-12-31
Technology level: current
Classification: ISIC rev.4 ecoinvent: 3821:Treatment and disposal of non-hazardous waste
Synonyms: Siedlungsabfallverbrennung; municipal waste incineration; Kehrichtverbrennung
Scenario: Business-as-Usual
System model: Allocation, cut-off by classification
Share of production covered: 1.8 %
Generated by: Gabor Doka
Published in: Doka G. 2013
Database: ecoinvent
isCopyrightProtected: true

## General comment
This dataset represents the activity of waste disposal of scrap steel in a municipal solid waste incinerator (MSWI) // Recommended use of this dataset: For disposal of bulky, non-dust steel which goes to incineration as part of a larger item or in small amounts only. Pure, isolated steel fractions will not be disposed in incinerators, but rather go to recycling. // // Waste composition (wet, in ppm): H2O n.a.; O 121260; H n.a.; C n.a.; S 760; N n.a.; P 800; B n.a.; Cl 750; Br n.a.; F n.a.; I n.a.; Ag n.a.; As n.a.; Ba n.a.; Cd 3; Co n.a.; Cr 1200; Cu 13570; Hg n.a.; Mn 2400; Mo n.a.; Ni 1050; Pb 380; Sb 210; Se n.a.; Sn 670; V 250; Zn 202; Be n.a.; Sc n.a.; Sr n.a.; Ti n.a.; Tl n.a.; W n.a.; Si 30950; Fe 815330; Ca n.a.; Al 10220; K n.a.; Mg n.a.; Na n.a.; // Share of carbon in waste that is biogenic 60.4%. // Share of metals in waste not oxidised and bulk-recyclable (exclude very small or thin parts) Iron: 100%; Alu: 0%; Copper: 0%. // One kg of this waste produces 0.551 kg of slag and 0 kg of residues, which are landfilled. // Net energy production: 0MJ/kg electric energy and 0MJ/kg thermal energy. // Recovery of metal scrap to recycling: 472.89g iron scrap, 0g aluminium scrap, 0g copper scrap.

## Included activities start
waste incineration from waste reception gate and delivery into waste bunker at incinerator plant site (without transports to the incinerator)

## Included activities end
Waste-specific short-term emissions to water from leachate. Long-term emissions from landfill to ground water.

## Geography
Specific to the technology mix encountered in Switzerland in 2010. Well applicable to modern incineration practices in Europe, North America or Japan.

## Technology
average Swiss MSWI plants in 2010 (grate incinerators) with electrostatic precipitator for fly ash (ESP), wet flue gas scrubber and 25% SNCR , 42.77% SCR-high dust , 32.68% SCR-low dust -DeNOx facilities and 0% without Denox (weighted according to mass of burnt waste, representing Swiss average). Efficiency of iron scrap separation from slag : 58%. Efficiency of non-ferrous scrap separation from slag : 31%. Gross electric efficiency technology mix 15.84% and Gross thermal efficiency technology mix 28.51%

## Time period
Waste composition as given in literature reference, theoretical data or other source. Transfer coefficients for modern MSWI.

## Reference product
- scrap steel: -1 kg; By-product classification Waste; CPC 39310: Slag, dross, scalings and other waste from the manufacture of iron or steel; CAS 7439-89-6
  Main reference product of this activity (supply of disposal service).
  production volume 2.1696e9 kg
    based on estimate on MSW in WTE globally and share of iron metal in Swiss MSW
  property price 0 EUR2005
    Waste products are assigned a price of zero as they are assumed to require further treatment.
  properties: carbon allocation 0 kg, carbon content 0, carbon content, fossil 0, carbon content, non-fossil 0, dry mass 1 kg, water content 0, water in wet mass 0 kg, wet mass 1 kg

## Inputs from technosphere
- electricity, for reuse in municipal waste incineration only: 3.57085e-5, 0.00133882, 0.00336002, 0.0910617, 8.0711e-5 kWh (5 suppliers, which the file names only by identifier); sum of these 0.095877 kWh; lognormal variance with pedigree 0.00859512, pedigree (1,1,4,1,1)
  Net electricity required to incinerate this waste (subsidiesed from high-calorific waste fractions).
  Uncertainty: uncertainty is calculated from uncertainties in waste composition and uncertainties in energy efficiency and the uncertainty in internal energy demand
- iron scrap, sorted, pressed: -0.47289 kg; lognormal variance with pedigree 0.0104, pedigree (1,1,1,1,1)
  Iron scrap recovered from this waste.
  Uncertainty: uncertainty calculated from uncertainty in waste composition, uncertainty of share of recyclable metal, uncertainty of transfer coefficient to bottom ash, uncertainty of the efficiency of scrap removal in MSWI plant.
  production volume
    calculated in proportion to reference product waste input to incinerator
  properties: dry mass 1 kg, price 0.175 EUR2005, wet mass 1 kg
- municipal waste incineration facility: 2.5e-10 unit
  Demands per kilogram waste.
- process-specific burdens, slag landfill: 0.55097 kg; lognormal variance with pedigree 0.0145848, pedigree (1,1,4,1,1)
  Mass-specific expenditures required for landfilling of bottom ash.
  Uncertainty: uncertainty is calculated from uncertainties in waste composition and transfer coefficients in incinerator
- slag landfill: 9.795e-10 unit; lognormal variance with pedigree 0.0145848, pedigree (1,1,4,1,1)
  Landfill infrastructure required for landfilling of bottom ash.
  Uncertainty: uncertainty is calculated from uncertainties in waste composition and transfer coefficients in incinerator
- transport, freight, lorry, unspecified: 0.019122, 0.000394877, 0.00252216 metric ton*km (3 suppliers, which the file names only by identifier); sum of these 0.022039 metric ton*km; lognormal variance with pedigree 0.0145848, pedigree (1,1,4,1,1)
  Transport services to transport incineration residues to landfills.
  Uncertainty: uncertainty calculated from uncertainty of the waste composition of this waste, uncertainty of transfer coefficients and the uncertainty in generic transportation distances

## Inputs from nature
- Oxygen [natural resource, in air]: 0.052319 kg; lognormal variance with pedigree 0.11258, pedigree (1,1,4,1,1)
  Oxygen from ambient air needed to combust and oxidise this waste. Net demand, i.e. without O2 leaving the plant in flue gas uncombusted.
  Uncertainty: uncertainty is calculated from uncertainties in waste composition and transfer coefficients to flue gas and soild residues in incinerator

## Emissions to nature
- Benzene [air, urban air close to ground]: 4.9984e-8 kg; lognormal variance with pedigree 0.0491, pedigree (1,1,4,1,1)
  Incomplete combustion product emitted to air.
  Uncertainty: uncertainty calculated from uncertainty in average operation emissions, and the uncertainty of the flue gas volume from this waste.
- Benzene, hexachloro- [air, urban air close to ground]: 1.0451e-10 kg; lognormal variance with pedigree 0.0491, pedigree (1,1,4,1,1)
  (same comment as for Benzene)
- Benzene, pentachloro- [air, urban air close to ground]: 2.6408e-10 kg; lognormal variance with pedigree 0.0491, pedigree (1,1,4,1,1)
  (same comment as for Benzene)
- Benzo(a)pyrene [air, urban air close to ground]: 1.1123e-12 kg; lognormal variance with pedigree 0.30974, pedigree (1,1,4,1,1)
  (same comment as for Benzene)
- Carbon monoxide, fossil [air, urban air close to ground]: 3.3639e-5 kg; lognormal variance with pedigree 0.65557, pedigree (1,1,4,1,1)
  (same comment as for Benzene)
- Carbon monoxide, non-fossil [air, urban air close to ground]: 5.1329e-5 kg; lognormal variance with pedigree 0.65557, pedigree (1,1,4,1,1)
  (same comment as for Benzene)
- Dioxins, measured as 2,3,7,8-tetrachlorodibenzo-p-dioxin [air, urban air close to ground]: 9.9962e-14 kg; lognormal variance with pedigree 0.30974, pedigree (1,1,4,1,1)
  (same comment as for Benzene)
- Heat, waste [air, urban air close to ground]: 0.28093 MJ; lognormal variance with pedigree 0.00898726, pedigree (1,1,4,1,1)
  Waste heat generated from heating value of this waste plus any electricity required to process it.
  Uncertainty: uncertainty is calculated from uncertainties in waste composition and uncertainties in energy efficiency and the uncertainty in internal energy demand
- Methane, fossil [air, urban air close to ground]: 2.9683e-7 kg; lognormal variance with pedigree 0.0491, pedigree (1,1,4,1,1)
  (same comment as for Benzene)
- Methane, non-fossil [air, urban air close to ground]: 4.5293e-7 kg; lognormal variance with pedigree 0.0491, pedigree (1,1,4,1,1)
  (same comment as for Benzene)
- NMVOC, non-methane volatile organic compounds [air, urban air close to ground]: 2.2748e-6 kg; lognormal variance with pedigree 0.0491, pedigree (1,1,4,1,1)
  (same comment as for Benzene)
- Particulate Matter, < 2.5 um [air, urban air close to ground]: 5.9677e-6 kg; lognormal variance with pedigree 0.30974, pedigree (1,1,4,1,1)
  (same comment as for Benzene)
- Particulate Matter, > 2.5 um and < 10um [air, urban air close to ground]: 2.9989e-8 kg; lognormal variance with pedigree 0.12811, pedigree (1,1,4,1,1)
  (same comment as for Benzene)
- Phenol, pentachloro- [air, urban air close to ground]: 2.1767e-11 kg; lognormal variance with pedigree 0.0491, pedigree (1,1,4,1,1)
  (same comment as for Benzene)
- Toluene [air, urban air close to ground]: 9.9969e-8 kg; lognormal variance with pedigree 0.0491, pedigree (1,1,4,1,1)
  (same comment as for Benzene)
- Water [air, urban air close to ground]: 0.00085245 m3; lognormal variance with pedigree 0.12113, pedigree (1,1,4,1,1)
  Water vapour from waste humidity, hydrogen oxidation and part of the process water.
  Uncertainty: Uncertainty calculated from uncertainty in waste composition, process water input and the uncertainty of fraction to air.
- Aluminium III [water, ground-, long-term]: 0.0083483 kg; lognormal variance with pedigree 0.38303, pedigree (1,1,4,1,1)
  Long-term emissions from landfilling of incineration residues.
  Uncertainty: uncertainty is calculated from uncertainties in waste composition and transfer coefficients in incinerator and landfills.
- Aluminium III [water, surface water]: 1.3428e-7 kg; lognormal variance with pedigree 1.5967, pedigree (1,1,4,1,1)
  Emissions to water from waste composition and transfer coefficients in incinerator and landfills.
  Uncertainty: uncertainty is calculated from uncertainties in waste composition and transfer coefficients in incinerator and landfills
- Antimony ion [water, ground-, long-term]: 3.0388e-5 kg; lognormal variance with pedigree 1.8054, pedigree (1,1,4,1,1)
  (same comment as for Aluminium III)
- Antimony ion [water, surface water]: 1.4161e-7 kg; lognormal variance with pedigree 1.5755, pedigree (1,1,4,1,1)
  (same comment as for Aluminium III)
- Cadmium II [water, ground-, long-term]: 2.9985e-6 kg; lognormal variance with pedigree 1.4343, pedigree (1,1,4,1,1)
  (same comment as for Aluminium III)
- Cadmium II [water, surface water]: 1.5435e-9 kg; lognormal variance with pedigree 2.1738, pedigree (1,1,4,1,1)
  (same comment as for Aluminium III)
- Chloride [water, ground-, long-term]: 0.00010216 kg; lognormal variance with pedigree 0.72266, pedigree (1,1,4,1,1)
  (same comment as for Aluminium III)
- Chloride [water, surface water]: 0.00064784 kg; lognormal variance with pedigree 0.7039, pedigree (1,1,4,1,1)
  (same comment as for Aluminium III)
- Chromium VI [water, ground-, long-term]: 7.8523e-6 kg; lognormal variance with pedigree 3.9597, pedigree (1,1,4,1,1)
  (same comment as for Aluminium III)
- Chromium VI [water, surface water]: 3.4315e-8 kg; lognormal variance with pedigree 1.7631, pedigree (1,1,4,1,1)
  (same comment as for Aluminium III)
- Copper ion [water, ground-, long-term]: 0.01357 kg; lognormal variance with pedigree 0.33925, pedigree (1,1,4,1,1)
  (same comment as for Aluminium III)
- Copper ion [water, surface water]: 4.7114e-7 kg; lognormal variance with pedigree 1.4349, pedigree (1,1,4,1,1)
  (same comment as for Aluminium III)
- Heat, waste [water, surface water]: 0.064231 MJ; lognormal variance with pedigree 0.00898726, pedigree (1,1,4,1,1)
  (same comment as for Heat, waste)
- Iron ion [water, ground-, long-term]: 0.17813 kg; lognormal variance with pedigree 0.1161, pedigree (1,1,4,1,1)
  (same comment as for Aluminium III)
- Iron ion [water, surface water]: 2.8653e-6 kg; lognormal variance with pedigree 1.2926, pedigree (1,1,4,1,1)
  (same comment as for Aluminium III)
- Lead II [water, ground-, long-term]: 0.00037999 kg; lognormal variance with pedigree 0.79276, pedigree (1,1,4,1,1)
  (same comment as for Aluminium III)
- Lead II [water, surface water]: 6.9364e-9 kg; lognormal variance with pedigree 1.9733, pedigree (1,1,4,1,1)
  (same comment as for Aluminium III)
- Manganese II [water, ground-, long-term]: 0.0023999 kg; lognormal variance with pedigree 0.55252, pedigree (1,1,4,1,1)
  (same comment as for Aluminium III)
- Manganese II [water, surface water]: 1.2284e-7 kg; lognormal variance with pedigree 1.5968, pedigree (1,1,4,1,1)
  (same comment as for Aluminium III)
- Nickel II [water, ground-, long-term]: 0.0010493 kg; lognormal variance with pedigree 0.65925, pedigree (1,1,4,1,1)
  (same comment as for Aluminium III)
- Nickel II [water, surface water]: 6.612e-7 kg; lognormal variance with pedigree 1.3723, pedigree (1,1,4,1,1)
  (same comment as for Aluminium III)
- Phosphate [water, ground-, long-term]: 3.2362e-5 kg; lognormal variance with pedigree 5.3766, pedigree (1,1,4,1,1)
  (same comment as for Aluminium III)
- Phosphate [water, surface water]: 5.4027e-8 kg; lognormal variance with pedigree 1.8505, pedigree (1,1,4,1,1)
  (same comment as for Aluminium III)
- Silicon [water, ground-, long-term]: 0.00026481 kg; lognormal variance with pedigree 5.9131, pedigree (1,1,4,1,1)
  (same comment as for Aluminium III)
- Silicon [water, surface water]: 1.142e-6 kg; lognormal variance with pedigree 1.3336, pedigree (1,1,4,1,1)
  (same comment as for Aluminium III)
- Sulfate [water, ground-, long-term]: 0.0020721 kg; lognormal variance with pedigree 0.70212, pedigree (1,1,4,1,1)
  (same comment as for Aluminium III)
- Sulfate [water, surface water]: 0.00020792 kg; lognormal variance with pedigree 0.82995, pedigree (1,1,4,1,1)
  (same comment as for Aluminium III)
- Tin ion [water, ground-, long-term]: 0.00066626 kg; lognormal variance with pedigree 0.71803, pedigree (1,1,4,1,1)
  (same comment as for Aluminium III)
- Tin ion [water, surface water]: 1.0717e-8 kg; lognormal variance with pedigree 1.916, pedigree (1,1,4,1,1)
  (same comment as for Aluminium III)
- Vanadium V [water, ground-, long-term]: 2.4434e-5 kg; lognormal variance with pedigree 2.2001, pedigree (1,1,4,1,1)
  (same comment as for Aluminium III)
- Vanadium V [water, surface water]: 1.1091e-7 kg; lognormal variance with pedigree 1.6071, pedigree (1,1,4,1,1)
  (same comment as for Aluminium III)
- Water [water, surface water]: 0.00044475 m3; lognormal variance with pedigree 0.10997, pedigree (1,1,4,1,1)
  Process water released to surface water.
  Uncertainty: uncertainty calculated from uncertainty in process water input and the uncertainty of fraction to surface water.
- Zinc II [water, ground-, long-term]: 0.00020199 kg; lognormal variance with pedigree 0.87652, pedigree (1,1,4,1,1)
  (same comment as for Aluminium III)
- Zinc II [water, surface water]: 6.0131e-9 kg; lognormal variance with pedigree 1.9925, pedigree (1,1,4,1,1)
  (same comment as for Aluminium III)
