# electricity, high voltage, residual mix

Dataset: EcoSpold 2, unit process
Geography: GR
Time period: 2021-01-01 to 2022-12-31
Technology level: current
Classification: ISIC rev.4 ecoinvent: 3510:Electric power generation, transmission and distribution
Scenario: Business-as-Usual
System model: Allocation, cut-off by classification
Generated by: [System]
Database: ecoinvent
isCopyrightProtected: true

## General comment
This dataset describes the residual mix on the high voltage level in Greece. The residual mix is a virtual mix. It represents the energy mix of untracked consumption , i.e., electricity consumption that is not explicitly tracked through mechanisms such as Guarantees of Origin (GO). The shares have been calculated based on statistics from AIB (2022) following the methodology of grexel (2020).
The calculation area considered for the calculation of the residual mixes covers all members of EU28, Iceland, Norway, Serbia and Switzerland.
The residual mix of a country is calculated based on the domestic residual mix. The domestic residual mix represents the sum of all domestic electricity production considering imports and export outside the calculation area and issued and expired attributes.
In countries for which the volume of untracked consumption is smaller than the volume of the domestic residual mix, the composition of the residual mix is equal to the composition of the domestic residual mix. In countries for which the volume of untracked consumption is larger than the volume of the domestic residual mix, the European Attribute Mix (EAM) is used to account for the deficits. Thus, in countries with a deficit in their domestic residual mix, the residual mix is equal to the domestic residual mix plus the respective amount taken from the EAM. For a detailed description of the methodology refer to grexel (2020).
The composition of the residual mix of this activity is valid for the year 2021.
Sources:
- AIB (2022), Association of Issuing Bodies, European Residual Mixes, Results of the calculation of Residual Mixes for the calendar year 2021, Version 1.0, 2022-05-31, https://www.aib-net.org/facts/european-residual-mix/2021
- grexel (2020), Issuance Based Residual Mix Calculation Methodology, Published 31.03.2020, Version 1.1, https://www.aib-net.org/sites/default/files/assets/facts/residual-mix/2022/RM%20EAM%20IB%20Calculation%20Methodology%20V1_2.pdf

## Included activities start
This activity starts from 1kWh of electricity from untracked consumption.

## Included activities end
This activity ends with the transport of 1 kWh of high voltage electricity from untracked consumption in the transmission network over aerial lines and cables.
This dataset includes: - electricity inputs of the untracked consumption in this country - the transmission network - direct emissions to air (ozone and N2O). - electricity losses during transmission This dataset doesn't include - electricity losses during transformation, as these are included in the dataset for transformation - - SF6 emissions during the transmission, as these are allocated to the residual mix dataset for medium voltage. - SF6 emissions during production and deconstruction of the switchgear, as these are accounted for in the transmission network dataset.

## Technology
Average technology used to transmit and distribute electricity. Includes underground and overhead lines. Electricity production according to related technology datasets.
Electricity from untracked consumption. Average technology used to transmit and distribute electricity. Includes underground and overhead lines. Electricity production according to related technology datasets. Definition of the voltage levels: - High voltage level above 24 kV (large scale industry) - Medium voltage level between 1 kV and 24 kV (medium to small scale industry, service sector and public buildings) - Low voltage level below 1 kV (Households)

## Time period
The annual production volumes of this market are taken from AIB (2022). 2021 European Residual Mix - Results of the calculation of Residual Mixes for the calendar year 2021 (Version 1.0, 2022-05-31) and are valid for the year 2021. The data on the european residual mixes is based on the transactions of guarantees of origin representing the time period of 1.4.2021 - 31.3.2022.

## Reference product
- electricity, high voltage: 1 kWh; By-product classification allocatable product; CPC 17100: Electrical energy
  production volume 4.62913e10 kWh
    Calculated value. Based on AIB (2021), Association of Issuing Bodies, European Residual Mixes, Results of the calculation of Residual Mixes for the calendar year 2021, Version 1.0, 2022-05-31, https://www.aib-net.org/facts/european-residual-mix/2021
  property price 0.0977 EUR2005
    Temporary price data. Calculated as 90% of purchasers price based on: 94% of the average price (to account for a 6% loss in transformation and transmission) for electricity for industrial consumersin 2005 (excluded taxes). From IEA.
  properties: carbon allocation 0 kg, carbon content 0

## Inputs from technosphere
- electricity, high voltage: 0.000237916, 0.00469176, 0.000340624, 0.00473326, 0.000820771, 0.00951801, 0.000425631, 0.00297875, 0.35303, 0.000336144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 kWh (33 suppliers, which the file names only by identifier); sum of these 0.854198 kWh
  Calcualted value. Shares of electricity producing technologies based on Tab. 2 of AIB(2021). Technology splits of corresponding ecoinvent electricity markets are used.
  AIB (2021), Association of Issuing Bodies, European Residual Mixes, Results of the calculation of Residual Mixes for the calendar year 2021, Version 1.0, 2022-05-31, https://www.aib-net.org/facts/european-residual-mix/2021
- electricity, high voltage: 0.145802 kWh
  Calculated Value. For this country the domestic residual mix has lower volume than the final residual mix, thus the missing electricity is supplied by the European Attribute Mix (EAM). The EAM is a virtual mix and is calculated as the sum of all surplus attributes from countries with a domestic residual mix larger than the national consumption.
- electricity, high voltage: 0.0284962 kWh
  Calculated Value. Represents losses occuring during transmission of the electricity.
- transmission network, electricity, high voltage direct current aerial line: 6.22806e-9 km; lognormal variance with pedigree 0.304725, pedigree (3,2,3,2,2)
  The amount of required transmission infrastructure is based on the Global Transmission Report (2022) assuming a lifetime of 40 years for the infrastrure.
  - Global Electricity Transmission Report and Database, 2022-2031, Global Transmission Research, accessed March 2022
  properties: lifetime 40 year
- transmission network, electricity, high voltage direct current land cable: 1.87171e-10 km; lognormal variance with pedigree 0.304725, pedigree (3,2,3,2,2)
  (same comment as for transmission network, electricity, high voltage direct current aerial )
  properties: lifetime 40 year
- transmission network, electricity, high voltage direct current subsea cable: 5.07319e-10 km; lognormal variance with pedigree 0.304725, pedigree (3,2,3,2,2)
  (same comment as for transmission network, electricity, high voltage direct current aerial )
  properties: lifetime 40 year

## Emissions to nature
- Dinitrogen monoxide [air, unspecified]: 5e-6 kg; lognormal variance with pedigree 0.56, pedigree (5,5,5,5,5)
  Literatur value/estimation. The electro-magnetic field near high voltage aerial lines can lead to the ionisation of air molecules and to the formation of nitrous oxide and ozone. This reaction happens in a boundary layer called corona. The formation of pollutants depends on the weather and the surface of the conductor. Therefore, only a few general assumptions can be made.
  Hill et al. 1984 report a nitrous oxide formation rate between 0.01 and 0.21 g per kWh of electricity transmitted, valid for North American conditions. The geometric mean of 0.05 g/kWh. The emission rates are reduced by a factor of 10 to account for the shorter transmission distances in most of the countries.
- Ozone [air, unspecified]: 4.15773e-6 kg; lognormal variance with pedigree 0.71, pedigree (5,5,5,5,5)
  Literatur value/estimation. The electro-magnetic field near high voltage aerial lines can lead to the ionisation of air molecules and to the formation of nitrous oxide and ozone. This reaction happens in a boundary layer called corona. The formation of pollutants depends on the weather and the surface of the conductor. Therefore, only a few general assumptions can be made.
  Bohlin et al. 1991 and Böhringer et al. 1988 report very low ozone concentrations near the corona, which hardly can be measured. The value here is estimated from Swiss data:
  - annual ozone emissions: 50-1250 tons (Knoepfel 1995, p. 99). The geometric mean of 250 t/year is used for calculations.
  - annual amount of electricity transported in Switzerland: 60129 GWh.
  S. Bohlin, K. Eriksson, G. Flisberg, 'Electrical transmission', World Clean Energy Conf., Geneva, Nov. 1991
  A. Böhringer et al., 'Ozonbildung an Hochspannungsfreileitungen', Elektrizitätswirtschaft 87(1988) Nr. 21, S. 1017-1022
